// SBML level 3 version 2
// Created with https://github.com/matthiaskoenig/sbmlutils.

model Sphingolipid_rheostat_Cer_activation()
  // Model for the Sphingolipid rheostat with an assumed Cer activation feedback.
  // SBML format.
  // version: 1
  // Changelog
  // version 1
  // initial model

  // Compartments:
  compartment C = 1;

  // Species:
  species Cer in C = 0.988; Cer is "Ceramide";
  species Sphingo in C = 0.000395; Sphingo is "Sphingosine";
  species S1P in C = 1.551; S1P is "Sphingosine-1-Phosphate";
  species Sphinga in C = 0.000732; Sphinga is "Sphinganine";

  // Parameters:
  k00 = 1; k00 is "Basal Sphinganine production rate";  // SBO:0000009
  k0 = 1; k0 is "Sphinganine to Ceramide conversion rate";  // SBO:0000009
  k1 = 1; k1 is "Ceramide to Sphingosine conversion rate";  // SBO:0000009
  k2 = 1; k2 is "Sphingosine to Ceramide conversion rate";  // SBO:0000009
  k3 = 1; k3 is "Sphingosine to S1P conversion rate";  // SBO:0000009
  k4 = 1; k4 is "S1P to Sphingosine conversion rate";  // SBO:0000009
  k5 = 1; k5 is "S1P degradation rate";  // SBO:0000009
  k_d = 1; k_d is "Ceramide degradation rate";  // SBO:0000009
  alpha_cer = 1; alpha_cer is "feedback factor";  // SBO:0000009
  alpha_hai1a = 1; alpha_hai1a is "Rate of Hai1a inhibition";  // SBO:0000009
  S_on = 1; S_on is "Boolean Paramter if Hai1a is active or not";  // SBO:0000009

  // Reactions:
  Sphinganine_de_novo_production: => Sphinga; k00*(1 + S_on*alpha_cer);
  Sphinganine_Ceramide_conversion: Sphinga => Cer; k0*Sphinga;
  R3: Cer => Sphingo; k1*Cer; R3 is "Ceramide to Sphingosine conversion";
  R4: Sphingo => Cer; k2*Sphingo; R4 is "Sphingosine to Ceramide conversion";
  Ceramide_degradation: Cer => ; k_d*Cer;
  Sphingosine_to_S1P_conversion: Sphingo => S1P; k3*(1 - S_on*alpha_hai1a)*Sphingo;
  S1P_to_Sphingosine_conversion: S1P => Sphingo; k4*S1P;
  S1P_degradation: S1P => ; k5*S1P;
end
