// SBML level 2 version 4

model Becker_Science2010__BaF3_Exp()
  // epo_int_rep
  // PEtab implementation of the model from Becker et al. (2010), Science.;328(5984): 1404-8
  // isDescribedBy doi:10.1126/science.1184913

  // Compartments:
  compartment default = 1 volume;

  // Species:
  species Epo in default = init_Epo;
  species EpoR in default = 4*init_Epo*init_EpoR_rel;
  species Epo_EpoR in default = 0;
  species Epo_EpoR_i in default = 0;
  species dEpo_i in default = 0;
  species dEpo_e in default = 0;

  // Parameters:
  init_Epo = 1347.49 substance;
  init_EpoR_rel = 0.09205155;
  kde = 0.01198817;
  kdi = 0.001272664;
  ke = 0.05546006;
  kex = 0.0005780045;
  koff = 0.08068608;
  kon = 0.1513435;
  kt = 0.01601252;
  noiseParameter1_Epo_ext_cpm = 0.008422494 substance;
  noiseParameter1_Epo_int_cpm = 0.05535 substance;
  noiseParameter1_Epo_mem_cpm = 0.04782697 substance;
  observable_Epo_ext_cpm has substance;
  observable_Epo_mem_cpm has substance;
  observable_Epo_int_cpm has substance;
  observableParameter1_Epo_ext_cpm = 1e-5 substance;
  observableParameter2_Epo_ext_cpm = 0.9798296 substance;
  observableParameter3_Epo_ext_cpm = 0 substance;
  observableParameter1_Epo_mem_cpm = 1e-5 substance;
  observableParameter2_Epo_mem_cpm = 0.9798296 substance;
  observableParameter3_Epo_mem_cpm = 0 substance;
  observableParameter1_Epo_int_cpm = 1e-5 substance;
  observableParameter2_Epo_int_cpm = 0.9798296 substance;
  observableParameter3_Epo_int_cpm = 0 substance;
  sigma_Epo_ext_cpm has substance;
  sigma_Epo_int_cpm has substance;
  sigma_Epo_mem_cpm has substance;

  // Assignment rules:
  observable_Epo_ext_cpm := observableParameter1_Epo_ext_cpm + observableParameter2_Epo_ext_cpm*(Epo + dEpo_e)/observableParameter3_Epo_ext_cpm;
  observable_Epo_mem_cpm := observableParameter1_Epo_mem_cpm + Epo_EpoR*observableParameter2_Epo_mem_cpm/observableParameter3_Epo_mem_cpm;
  observable_Epo_int_cpm := observableParameter1_Epo_int_cpm + observableParameter2_Epo_int_cpm*(Epo_EpoR_i + dEpo_i)/observableParameter3_Epo_int_cpm;
  sigma_Epo_int_cpm := noiseParameter1_Epo_int_cpm;
  sigma_Epo_mem_cpm := noiseParameter1_Epo_mem_cpm;
  sigma_Epo_ext_cpm := noiseParameter1_Epo_ext_cpm;

  // Reactions:
  v_0: Epo + EpoR => Epo_EpoR; Epo*EpoR*kon/init_Epo;
  v_1: Epo_EpoR => Epo + EpoR; Epo_EpoR*koff;
  v_2: => EpoR; 4*init_Epo*init_EpoR_rel*kt;
  v_3: EpoR => ; EpoR*kt;
  v_4: Epo_EpoR => Epo_EpoR_i; Epo_EpoR*ke;
  v_5: Epo_EpoR_i => Epo + EpoR; Epo_EpoR_i*kex;
  v_6: Epo_EpoR_i => dEpo_i; Epo_EpoR_i*kdi;
  v_7: Epo_EpoR_i => dEpo_e; Epo_EpoR_i*kde;

  // Unit definitions:
  unit time = 60 second;
  unit substance = mole;
  unit volume = litre;
  unit area = metre^2;
  unit length = metre;
end
