// SBML level 2 version 4

model Becker_Science2010__binding()
  // epo_int_rep

  // Compartments:
  compartment default = 1 volume;

  // Species:
  species EpoR in default = Epo_free*init_EpoR_rel;
  species Epo_EpoR in default = 0;

  // Parameters:
  Epo_free = 1347.49 substance;
  init_EpoR_rel = 0.09205155 time;
  koff = 0.08068608;
  kon = 0.1513435;
  noiseParameter1_Epo_bound = 0.036798 substance;
  observable_Epo_bound has substance;
  sigma_Epo_bound has substance;

  // Assignment rules:
  observable_Epo_bound := Epo_EpoR;
  sigma_Epo_bound := noiseParameter1_Epo_bound;

  // Reactions:
  v_0: EpoR => Epo_EpoR; kon*Epo_free*EpoR;
  v_1: Epo_EpoR => EpoR; koff*Epo_EpoR;

  // Unit definitions:
  unit time = 60 second;
  unit substance = mole;
  unit volume = litre;
  unit area = metre^2;
  unit length = metre;
end
