// SBML level 2 version 4

model Beer_MolBioSystems2014()
  // TwoStepSynthesisWithGlu
  // PEtab implementation of the model from Beer et al. (2014), Mol Biosyst.;10(7):1709-18
  // isDescribedBy doi:10.1039/c3mb70594c

  // Compartments:
  compartment medium = 1;

  // Species:
  species Bac in medium = init_Bac;
  species Glu in medium = 10;
  species cGlu in medium = 0;
  species Ind in medium = 0;

  // Parameters:
  Bacmax = 1;
  beta = 1;
  kdegi = 1;
  kdim = 1;
  ksyn = 1;
  tau = 1;
  init_Bac = 0.01470079;

  // Assignment rules:
  lag := piecewise(0, time - tau < 0, 1);

  // Reactions:
  reaction1: => Bac; medium*(-(Bac*beta*lag*(Bac - Bacmax))/Bacmax());
  reaction2: => Glu; medium*(-Bac)*Glu*ksyn;  // modifiers: Bac
  reaction3: => cGlu; medium*(Bac*Glu*ksyn - cGlu^2*kdim);  // modifiers: Bac, Glu
  reaction4: => Ind; medium*(cGlu^2*kdim - Ind*kdegi);  // modifiers: cGlu

  // Unit definitions:
  unit time = 60 second;
end
