// SBML level 2 version 4
// dcterms:bibliographicCitation: urn:miriam:pubmed:32616574

function Rate_Law_for_Susceptible_to_Infected(Ro, I, S, gamma)
  gamma*Ro*I*S;
end

model Bertozzi2020___SIR_model_of_scenarios_of_COVID_19_spread_in_CA()
  // Bertozzi2020 - SIR model of scenarios of COVID-19 spread in CA
  // Bertozzi2020 - SIR model of scenarios of COVID-19 spread in CA and NY
  // This model was encoded and executed in COPASI 4.28 (Build 226). Fig 2 (upper left, upper middle, and upper right) and Fig 3 (left and right) were reproduced in the following way -
  // Title of manuscript - The challenges of modeling and forecasting the spread of COVID-19
  // Abstract -
  // The coronavirus disease 2019 (COVID-19) pandemic has placed epidemic modeling at the forefront of worldwide public policy making. Nonetheless, modeling and forecasting the spread of COVID-19 remains a challenge. Here, we detail three regionalscale models for forecasting and assessing the course of the pandemic. This work demonstrates the utility of parsimonious models for early-time data and provides an accessible framework for generating policy-relevant insights into its course. We show how these models can be connected to each other and to time series data for a particular region. Capable of measuring and forecasting the impacts of social distancing, these models highlight the dangers of relaxing nonpharmaceutical public health interventions in the absence of a vaccine or antiviral therapies.
  // hasProperty DOID:0080600
  // hasProperty ido:0000503
  // hasProperty mamo:MAMO_0000028
  // hasProperty mamo:MAMO_0000046
  // hasTaxon taxonomy:9606
  // hasTaxon taxonomy:2697049

  // Compartments:
  compartment USA___CA__NY = 1; USA___CA__NY is "USA - CA, NY";  // isVersionOf ncit:C43468; isVersionOf ncit:C43509

  // Species:
  species Infected in USA___CA__NY = Io/Pop;  // isVersionOf ncit:C171133; isVersionOf ido:0000511
  species Recovered in USA___CA__NY = 0;  // isVersionOf ncit:C171133; hasProperty ido:0000621
  species Susceptible in USA___CA__NY = (Pop - Infected)/Pop;  // isVersionOf ido:0000514; isVersionOf ncit:C171133

  // Parameters:
  Pop_CA = 39560000;
  Ro_CA = 2.7;
  gamma_CA = 0.12;
  Io_CA = 0.1;
  Trigger_NY = 0;
  Pop_NY = 19540000;
  Ro_NY = 4.1;
  gamma_NY = 0.1;
  Io_NY = 0.005;
  Trigger_Lockdown = 0;
  Lockdown_CA_start = 66;
  Lockdown_CA_end = 105;
  Lockdown_NY_start = 69;
  Lockdown_NY_end = 105;

  // Assignment rules:
  Pop := Trigger_NY*Pop_NY + (1 - Trigger_NY)*Pop_CA;
  gamma := Trigger_NY*gamma_NY + (1 - Trigger_NY)*gamma_CA;
  Io := Trigger_NY*Io_NY + (1 - Trigger_NY)*Io_CA;
  Parameterised_time := time*gamma_CA;
  Ro_CA_ld := 0.5*Ro_CA;
  Ro_NY_ld := 0.5*Ro_NY;
  Ro := piecewise(Trigger_NY*Ro_NY_ld + (1 - Trigger_NY)*Ro_CA_ld, ((time > Trigger_NY*Lockdown_NY_start + (1 - Trigger_NY)*Lockdown_CA_start) && (time <= Trigger_NY*Lockdown_NY_end + (1 - Trigger_NY)*Lockdown_CA_end)) && (Trigger_Lockdown >= 0.5), Trigger_NY*Ro_NY + (1 - Trigger_NY)*Ro_CA);

  // Reactions:
  Susceptible_to_Infected: Susceptible => Infected; USA___CA__NY*Rate_Law_for_Susceptible_to_Infected(Ro, Infected, Susceptible, gamma);  // isVersionOf ncit:C171133; isVersionOf ncit:C128320
  Infected_to_Recovered: Infected => Recovered; USA___CA__NY*gamma*Infected;  // isVersionOf ncit:C171133; isVersionOf ncit:C25746

  // Unit definitions:
  unit length = metre;
  unit area = metre^2;
  unit volume = litre;
  unit time = 86400 second;
  unit substance = item;
end
