// SBML level 2 version 4

model dimer_model_paper_make_clean_koff_no_ratios_der()

  // Compartments:
  compartment cell = 1;

  // Species:
  species HGF in cell = init_hgf;
  species EGF in cell = init_egf;
  species egfr in cell = init_egfr*qfacs_fac;
  species met in cell = init_met*qfacs_fac;
  species epcam in cell = init_epcam*qfacs_fac;
  species hgf_met in cell = 0;
  species egf_egfr in cell = 0;
  species act_egfr_dimer in cell = 0;
  species act_met_dimer in cell = 0;
  species pAkt in cell = 0;
  species mm131_AB in cell = 0;
  species mm151_AB in cell = 0;
  species met_egfr_AB in cell = 0;
  species no_ta_cmet_AB in cell = 0;
  species metmab in cell = 33.3333;
  species egfr_mm151_AB in cell = 0;
  species met_no_ta_cMet_AB in cell = 0;
  species mm151_egfr_dimer in cell = 0;
  species ligand in cell = 0;
  species met_AB in cell = 0;
  species egfr_AB in cell = 0;
  species met_egfr_dimer_AB in cell = 0;
  species met_mm131_AB in cell = 0;
  species epcam_mm131_AB in cell = 0;
  species mm131_dimer in cell = 0;
  species metmab_met in cell = 0;

  // Parameters:
  bool_epcam = 217.0633;
  cl_mm131 = 0.8544502;
  egfr_prod = 0.8440395;
  init_egf = 0.01439221;
  init_egfr = 0.1557835;
  init_epcam = 0.1;
  init_hgf = 0.6074966;
  init_met = 0.1;
  k2_mm151_bind = 999.9999;
  k4_egfr_cmet_bind = 1.850841;
  k_deg_egfr = 0.1603034;
  k_deg_met = 4.042916e-5;
  k_hgf_met_bind_cl = 0.001556889;
  k_pakt_act_egf = 288.3071;
  k_pakt_act_hgf = 999.9893;
  kdeg_met_egfr_dimer = 721.1262;
  kdeg_mm131 = 1000;
  kdeg_mm151 = 988.4085;
  met_prod = 1.522536e-5;
  mm151_bool = 1;
  no_ratio_binding_mm151 = 132.1202;
  no_ratio_epcam_131 = 0.02204768;
  no_ratio_met_131 = 0.02465488;
  no_ratio_met_egfr_151_egfr = 0.08430213;
  no_ratio_met_egfr_151_met = 293.1292;
  no_ratio_metmab = 0.0951061;
  no_ratio_mm151_egfr = 9.032516;
  no_ratio_mm151_hgf = 60.40014;
  no_ratio_no_ta_met_151 = 1.023088;
  offset_pakt = 0.1287549;
  qfacs_fac = 1.000001e-5;
  scale_pakt = 15.60141;
  sd_pakt_au = 0.2225847;

  // Assignment rules:
  pAkt_au := log10(offset_pakt + pAkt*scale_pakt);

  // Reactions:
  v1_v_0: HGF + met => hgf_met; cell*2*HGF*met*no_ratio_mm151_hgf;
  v2_v_1: hgf_met => HGF + met; cell*hgf_met*no_ratio_mm151_hgf;
  v3_v_2: met + hgf_met => act_met_dimer; cell*hgf_met*k_hgf_met_bind_cl*met;
  v4_v_3: act_met_dimer => 2 met; cell*act_met_dimer*k_deg_met;
  v5_v_4: act_met_dimer => HGF + 2 met; cell*act_met_dimer*no_ratio_mm151_hgf;
  v6_v_5: EGF + egfr => egf_egfr; cell*(EGF*egfr*no_ratio_mm151_egfr/10);
  v7_v_6: egf_egfr => EGF + egfr; cell*egf_egfr*no_ratio_mm151_egfr;
  v8_v_7: egfr + egf_egfr => act_egfr_dimer; cell*egfr*egf_egfr*k_hgf_met_bind_cl;
  v9_v_8: act_egfr_dimer => 2 egfr; cell*act_egfr_dimer*k_deg_egfr;
  v10_v_9: act_egfr_dimer => EGF + 2 egfr; cell*act_egfr_dimer*no_ratio_mm151_egfr;
  v11_v_10: => pAkt; cell*(act_met_dimer*k_pakt_act_hgf + act_egfr_dimer*k_pakt_act_egf);  // modifiers: act_met_dimer, act_egfr_dimer
  v12_v_11: egfr + mm151_AB => egfr_mm151_AB; cell*2.5*egfr*mm151_AB*no_ratio_binding_mm151;
  v13_v_12: egfr_mm151_AB => egfr + mm151_AB; cell*egfr_mm151_AB*no_ratio_binding_mm151;
  v14_v_13: egfr + egfr_mm151_AB => mm151_egfr_dimer; cell*egfr*egfr_mm151_AB*k2_mm151_bind*mm151_bool;
  v15_v_14: mm151_egfr_dimer => egfr + egfr_mm151_AB; cell*mm151_egfr_dimer*no_ratio_binding_mm151;
  v16_v_15: mm151_egfr_dimer => ; cell*kdeg_mm151*mm151_egfr_dimer;
  v17_v_16: met + met_egfr_AB => met_AB; cell*(met*met_egfr_AB*no_ratio_met_egfr_151_met/6);
  v18_v_17: egfr + met_egfr_AB => egfr_AB; cell*1.25*egfr*met_egfr_AB*no_ratio_met_egfr_151_egfr;
  v19_v_18: egfr_AB => egfr + met_egfr_AB; cell*egfr_AB*no_ratio_met_egfr_151_egfr;
  v20_v_19: met_AB => met + met_egfr_AB; cell*met_AB*no_ratio_met_egfr_151_met;
  v21_v_20: egfr + met_AB => met_egfr_dimer_AB; cell*egfr*k4_egfr_cmet_bind*met_AB;
  v22_v_21: met + egfr_AB => met_egfr_dimer_AB; cell*egfr_AB*k4_egfr_cmet_bind*met;
  v23_v_22: met_egfr_dimer_AB => ; cell*kdeg_met_egfr_dimer*met_egfr_dimer_AB;
  v24_v_23: met_egfr_dimer_AB => egfr + met_AB; cell*met_egfr_dimer_AB*no_ratio_met_egfr_151_egfr;
  v25_v_24: met_egfr_dimer_AB => met + egfr_AB; cell*met_egfr_dimer_AB*no_ratio_met_egfr_151_met;
  v26_v_25: met + no_ta_cmet_AB => met_no_ta_cMet_AB; cell*(met*no_ta_cmet_AB*no_ratio_no_ta_met_151/6);
  v27_v_26: met_no_ta_cMet_AB => met + no_ta_cmet_AB; cell*met_no_ta_cMet_AB*no_ratio_no_ta_met_151;
  v28_v_27: => met; cell*init_met*met_prod*qfacs_fac;
  v29_v_28: => egfr; cell*egfr_prod*init_egfr*qfacs_fac;
  v30_v_29: met => ; cell*met*met_prod;
  v31_v_30: egfr => ; cell*egfr*egfr_prod;
  v32_v_31: met + mm131_AB => met_mm131_AB; cell*5*met*mm131_AB*no_ratio_met_131;
  v33_v_32: epcam + mm131_AB => epcam_mm131_AB; cell*(bool_epcam*epcam*mm131_AB*no_ratio_epcam_131/10);
  v34_v_33: met_mm131_AB => met + mm131_AB; cell*met_mm131_AB*no_ratio_met_131;
  v35_v_34: epcam_mm131_AB => epcam + mm131_AB; cell*bool_epcam*epcam_mm131_AB*no_ratio_epcam_131;
  v36_v_35: epcam + met_mm131_AB => mm131_dimer; cell*bool_epcam*cl_mm131*epcam*met_mm131_AB;
  v37_v_36: met + epcam_mm131_AB => mm131_dimer; cell*cl_mm131*epcam_mm131_AB*met;
  v38_v_37: mm131_dimer => ; cell*kdeg_mm131*mm131_dimer;
  v39_v_38: mm131_dimer => met + epcam_mm131_AB; cell*bool_epcam*mm131_dimer*no_ratio_met_131;
  v40_v_39: mm131_dimer => epcam + met_mm131_AB; cell*bool_epcam*mm131_dimer*no_ratio_epcam_131;
  v41_v_40: met + metmab => metmab_met; cell*0.8333333*met*metmab*no_ratio_metmab;
  v42_v_41: metmab_met => met + metmab; cell*metmab_met*no_ratio_metmab;

  // Unit definitions:
  unit time = 60 second;
end
