// SBML level 2 version 4

model dimer_model_paper_make_clean_koff_no_ratios_der()

  // Compartments:
  compartment cell = 1;

  // Species:
  species HGF in cell = init_hgf;
  species EGF in cell = init_egf;
  species egfr in cell = init_egfr*qfacs_fac;
  species met in cell = init_met*qfacs_fac;
  species epcam in cell = init_epcam*qfacs_fac;
  species hgf_met in cell = 0;
  species egf_egfr in cell = 0;
  species act_egfr_dimer in cell = 0;
  species act_met_dimer in cell = 0;
  species pAkt in cell = 0;
  species mm131_AB in cell = init_mm131_AB;
  species mm151_AB in cell = init_mm151_AB;
  species met_egfr_AB in cell = init_met_egfr_AB;
  species no_ta_cmet_AB in cell = init_no_ta_cmet_AB;
  species metmab in cell = init_metmab;
  species egfr_mm151_AB in cell = 0;
  species met_no_ta_cMet_AB in cell = 0;
  species mm151_egfr_dimer in cell = 0;
  species ligand in cell = init_ligand;
  species met_AB in cell = 0;
  species egfr_AB in cell = 0;
  species met_egfr_dimer_AB in cell = 0;
  species met_mm131_AB in cell = 0;
  species epcam_mm131_AB in cell = 0;
  species mm131_dimer in cell = 0;
  species metmab_met in cell = 0;

  // Parameters:
  bool_epcam = 0.1;
  cl_mm131 = 0.1;
  egfr_prod = 0.1;
  init_egfr = 0.1;
  init_epcam = 0.1;
  init_met = 0.1;
  k2_mm151_bind = 0.1;
  k4_egfr_cmet_bind = 0.1;
  k_deg_egfr = 0.1;
  k_deg_met = 0.1;
  k_hgf_met_bind_cl = 0.1;
  k_pakt_act_egf = 0.1;
  k_pakt_act_hgf = 0.1;
  kdeg_met_egfr_dimer = 0.1;
  kdeg_mm131 = 0.1;
  kdeg_mm151 = 0.1;
  met_prod = 0.1;
  mm151_bool = 1;
  abc_fac_h1993 = 1;
  abc_fac_h292 = 1;
  abc_fac_snu5 = 1;
  init_egf = 1;
  init_egf_combo = 1;
  init_egf_combo_fig8 = 1;
  init_egf_combo_fig9 = 1;
  init_hgf = 1;
  init_hgf_combo = 1;
  init_hgf_combo_fig8 = 1;
  init_hgf_combo_fig9 = 1;
  init_mm131_fig9 = 1;
  init_mm151_fig9 = 1;
  no_ratio_binding_mm151 = 1;
  no_ratio_epcam_131 = 1;
  no_ratio_met_131 = 1;
  no_ratio_met_egfr_151_egfr = 1;
  no_ratio_met_egfr_151_met = 1;
  no_ratio_metmab = 1;
  no_ratio_mm151_egfr = 1;
  no_ratio_mm151_hgf = 1;
  no_ratio_no_ta_met_151 = 1;
  qfacs_fac = 1;
  init_ligand = 0;
  init_met_egfr_AB = 0;
  init_metmab = 0;
  init_mm131_AB = 0;
  init_mm151_AB = 0;
  init_no_ta_cmet_AB = 0;

  // Assignment rules:
  koff_egfr := no_ratio_mm151_egfr;
  koff_egfr_AB := no_ratio_met_egfr_151_egfr;
  koff_met := no_ratio_mm151_hgf;
  koff_met_AB := no_ratio_met_egfr_151_met;
  koff_metmab := no_ratio_metmab;
  koff_mm131_epcam := no_ratio_epcam_131;
  koff_mm131_met := no_ratio_met_131;
  koff_mm151_bind := no_ratio_binding_mm151;
  koff_no_ta := no_ratio_no_ta_met_151;
  kon_egfr := no_ratio_mm151_egfr/10;
  kon_egfr_AB := 1.25*no_ratio_met_egfr_151_egfr;
  kon_met := 2*no_ratio_mm151_hgf;
  kon_met_AB := no_ratio_met_egfr_151_met/6;
  kon_metmab := 0.8333333*no_ratio_metmab;
  kon_mm131_epcam := no_ratio_epcam_131/10;
  kon_mm131_met := 5*no_ratio_met_131;
  kon_mm151_bind := 2.5*no_ratio_binding_mm151;
  kon_no_ta := no_ratio_no_ta_met_151/6;

  // Reactions:
  v1_v_0: HGF + met => hgf_met; cell*HGF*kon_met*met;
  v2_v_1: hgf_met => HGF + met; cell*hgf_met*koff_met;
  v3_v_2: met + hgf_met => act_met_dimer; cell*hgf_met*k_hgf_met_bind_cl*met;
  v4_v_3: act_met_dimer => 2 met; cell*act_met_dimer*k_deg_met;
  v5_v_4: act_met_dimer => HGF + 2 met; cell*act_met_dimer*koff_met;
  v6_v_5: EGF + egfr => egf_egfr; cell*EGF*egfr*kon_egfr;
  v7_v_6: egf_egfr => EGF + egfr; cell*egf_egfr*koff_egfr;
  v8_v_7: egfr + egf_egfr => act_egfr_dimer; cell*egfr*egf_egfr*k_hgf_met_bind_cl;
  v9_v_8: act_egfr_dimer => 2 egfr; cell*act_egfr_dimer*k_deg_egfr;
  v10_v_9: act_egfr_dimer => EGF + 2 egfr; cell*act_egfr_dimer*koff_egfr;
  v11_v_10: => pAkt; cell*(act_met_dimer*k_pakt_act_hgf + act_egfr_dimer*k_pakt_act_egf);  // modifiers: act_met_dimer, act_egfr_dimer
  v12_v_11: egfr + mm151_AB => egfr_mm151_AB; cell*egfr*kon_mm151_bind*mm151_AB;
  v13_v_12: egfr_mm151_AB => egfr + mm151_AB; cell*egfr_mm151_AB*koff_mm151_bind;
  v14_v_13: egfr + egfr_mm151_AB => mm151_egfr_dimer; cell*egfr*egfr_mm151_AB*k2_mm151_bind*mm151_bool;
  v15_v_14: mm151_egfr_dimer => egfr + egfr_mm151_AB; cell*koff_mm151_bind*mm151_egfr_dimer;
  v16_v_15: mm151_egfr_dimer => ; cell*kdeg_mm151*mm151_egfr_dimer;
  v17_v_16: met + met_egfr_AB => met_AB; cell*kon_met_AB*met*met_egfr_AB;
  v18_v_17: egfr + met_egfr_AB => egfr_AB; cell*egfr*kon_egfr_AB*met_egfr_AB;
  v19_v_18: egfr_AB => egfr + met_egfr_AB; cell*egfr_AB*koff_egfr_AB;
  v20_v_19: met_AB => met + met_egfr_AB; cell*koff_met_AB*met_AB;
  v21_v_20: egfr + met_AB => met_egfr_dimer_AB; cell*egfr*k4_egfr_cmet_bind*met_AB;
  v22_v_21: met + egfr_AB => met_egfr_dimer_AB; cell*egfr_AB*k4_egfr_cmet_bind*met;
  v23_v_22: met_egfr_dimer_AB => ; cell*kdeg_met_egfr_dimer*met_egfr_dimer_AB;
  v24_v_23: met_egfr_dimer_AB => egfr + met_AB; cell*koff_egfr_AB*met_egfr_dimer_AB;
  v25_v_24: met_egfr_dimer_AB => met + egfr_AB; cell*koff_met_AB*met_egfr_dimer_AB;
  v26_v_25: met + no_ta_cmet_AB => met_no_ta_cMet_AB; cell*kon_no_ta*met*no_ta_cmet_AB;
  v27_v_26: met_no_ta_cMet_AB => met + no_ta_cmet_AB; cell*koff_no_ta*met_no_ta_cMet_AB;
  v28_v_27: => met; cell*init_met*met_prod;
  v29_v_28: => egfr; cell*egfr_prod*init_egfr;
  v30_v_29: met => ; cell*met*met_prod;
  v31_v_30: egfr => ; cell*egfr*egfr_prod;
  v32_v_31: met + mm131_AB => met_mm131_AB; cell*kon_mm131_met*met*mm131_AB;
  v33_v_32: epcam + mm131_AB => epcam_mm131_AB; cell*bool_epcam*epcam*kon_mm131_epcam*mm131_AB;
  v34_v_33: met_mm131_AB => met + mm131_AB; cell*koff_mm131_met*met_mm131_AB;
  v35_v_34: epcam_mm131_AB => epcam + mm131_AB; cell*bool_epcam*epcam_mm131_AB*koff_mm131_epcam;
  v36_v_35: epcam + met_mm131_AB => mm131_dimer; cell*bool_epcam*cl_mm131*epcam*met_mm131_AB;
  v37_v_36: met + epcam_mm131_AB => mm131_dimer; cell*cl_mm131*epcam_mm131_AB*met;
  v38_v_37: mm131_dimer => ; cell*kdeg_mm131*mm131_dimer;
  v39_v_38: mm131_dimer => met + epcam_mm131_AB; cell*bool_epcam*koff_mm131_met*mm131_dimer;
  v40_v_39: mm131_dimer => epcam + met_mm131_AB; cell*bool_epcam*koff_mm131_epcam*mm131_dimer;
  v41_v_40: met + metmab => metmab_met; cell*kon_metmab*met*metmab;
  v42_v_41: metmab_met => met + metmab; cell*koff_metmab*metmab_met;

  // Unit definitions:
  unit time = 60 second;
end
