// SBML level 3 version 1

model main()
  // model units - substance: mole, time: second, extent: mole

  // Compartments:
  compartment c1 = 1 litre;

  // Species:
  species T in c1 = 0.16/c1;  // substance in muM
  species s in c1 = 0.01/c1;  // substance in muM
  species S in c1 = 0.01/c1;  // substance in muM
  species R34 in c1 = 0.38/c1;  // substance in muM
  species z in c1 = 0.03/c1;  // substance in muM
  species Z in c1 = 0.01/c1;  // substance in muM
  species R200 in c1 = 0.35/c1;  // substance in muM
  species E in c1 = 3.2/c1;  // substance in muM
  species N in c1 = 0;  // substance in muM
  species d in c1 = 0.01303/c1;  // substance in muM
  species D in c1 = 0.01303/c1;  // substance in muM

  // Parameters:
  k0_T = 0.06 muMph;
  k_T = 1.2 muMph;
  J_T = 0.06 muM;
  kd_T = 0.6 per_hour;
  k0_s = 0.0006 muMph;
  k_s1 = 0.00451383 muMph;
  k_s2 = 0.03122251 muMph;
  J1_s = 1.6 muM;
  J2_s = 1.6 muM;
  kd_s = 0.09 per_hour;
  k_S = 17 muMph;
  J_S = 0.08 muM;
  kd_S = 1.66 per_hour;
  k0_34 = 0.0012 muMph;
  k_34 = 0.012 muMph;
  J1_34 = 0.15 muM;
  J2_34 = 0.36 muM;
  kd_34 = 0.035 per_hour;
  k0_z = 0.003 muMph;
  k_z = 0.06 muMph;
  J_z = 3.5 muM;
  kd_z = 0.09 per_hour;
  k_Z = 17 muMph;
  J_Z = 0.06 muM;
  kd_Z = 1.66 per_hour;
  k0_200 = 0.0002 muMph;
  k_200 = 0.012 muMph;
  J1_200 = 5 muM;
  J2_200 = 0.2 muM;
  kd_200 = 0.035 per_hour;
  k_e1 = 1 muMph;
  J1_e = 0.2 muM;
  k_e2 = 0.6 muMph;
  J2_e = 0.5 muM;
  kd_e = 0.5 per_hour;
  k_n1 = 1 muMph;
  J1_n = 0.2 muM;
  k_n2 = 0.6 muMph;
  J2_n = 0.5 muM;
  kd_n = 0.5 per_hour;
  k0_d = 0.0006 muMph;
  k_d1 = 0.0306809 muMph;
  k_d2 = 1e-7 muMph;
  J1_d = 2.082154 muM;
  J2_d = 1.6 muM;
  kd_d = 0.09 per_hour;
  k_D = 16.5682 muMph;
  kd_D = 1.66 per_hour;
  n = 2 dimensionless;
  k_knockdown = 0.5495647 dimensionless;
  sigma = 1 dimensionless;
  S_on = 0 dimensionless;
  TGF0 = 10 ngpml;

  // Reactions:
  rT: => T; k0_T*sigma + k_T/(1 + (R200/J_T/sigma)^2)*sigma - kd_T*T;  // modifiers: R200
  rs: => s; k0_s*sigma + k_s1/((J1_s*sigma/(TGF0 + T))^2 + 1)*sigma + k_s2/(1 + (J2_s*sigma/D)^2)*sigma - kd_s*s;  // modifiers: D, T
  rS: => S; k_S*s/(1 + (R34/J_S/sigma)^2) - kd_S*S;  // modifiers: R34, s
  rR34: => R34; k0_34*sigma + k_34/(1 + (S/J1_34/sigma)^2 + (Z/J2_34/sigma)^2)*sigma - kd_34*R34;  // modifiers: S, Z
  rz: => z; k0_z*sigma + k_z/(1 + (J_z*sigma/S)^2)*sigma - kd_z*z;  // modifiers: S
  rZ: => Z; k_Z*z/(1 + (R200/J_Z/sigma)^2) - kd_Z*Z;  // modifiers: z, R200
  rR200: => R200; k0_200*sigma + k_200/(1 + (S/J1_200/sigma)^2 + (Z/J2_200/sigma)^2)*sigma - kd_200*R200;  // modifiers: S, Z
  rE: => E; k_e1/((S/J1_e/sigma)^2 + 1)*sigma + k_e2/((Z/J2_e/sigma)^2 + 1)*sigma - kd_e*E;  // modifiers: S, Z
  rN: => N; k_n1/((J1_n*sigma/S)^2 + 1)*sigma + k_n2/((J2_n*sigma/Z)^2 + 1)*sigma - kd_n*N;  // modifiers: S, Z
  rd: => d; k0_d*sigma + k_d1/((J1_d*sigma/(TGF0 + T))^2 + 1)*sigma + k_d2/(1 + (J2_d*sigma/Z)^2)*sigma - kd_d*d - S_on*k_knockdown*d;  // modifiers: T, Z
  rD: => D; k_D*d - kd_D*D;  // modifiers: d

  // Unit definitions:
  unit per_hour = 1 / (3600 second);
  unit per_liter = 1 / litre;
  unit muMph = 1e-6 mole / (litre * 3600 second);
  unit muM = 1e-6 mole / (3600 second);
  unit ngpml = 1e-9 gram / (1e-3 litre);
end
