// SBML level 3 version 2

model Liu_IFACPapersOnLine2025_individual()
  // isDescribedBy doi:10.1016/j.ifacol.2025.07.160

  // Parameters:
  U = kappa/(1 + (kappa/(400*xi_i_k) - 1)*exp(-rho));
  rho = 0.01;
  I_1 = 0;
  I_2 = 0;
  I_3 = 0;
  I_4 = 0;
  I_5 = 0;
  kappa = 0.01;
  psi = 0.01;
  V = u_2;
  phi = 0.01;
  alpha = 0.01;
  beta = 0.01;
  delta = 0.01;
  xi_i_k = 1;
  u_2 = 1*1000000000;

  // Rate rules:
  U' = rho*U*(1 - (U + I_1 + I_2 + I_3 + I_4 + I_5)/kappa) - psi*V*U;
  I_1' = rho*I_1*(1 - (U + I_1 + I_2 + I_3 + I_4 + I_5)/kappa) + psi*V*U - phi*I_1;
  I_2' = rho*I_2*(1 - (U + I_1 + I_2 + I_3 + I_4 + I_5)/kappa) + phi*I_1 - phi*I_2;
  I_3' = rho*I_3*(1 - (U + I_1 + I_2 + I_3 + I_4 + I_5)/kappa) + phi*I_2 - phi*I_3;
  I_4' = rho*I_4*(1 - (U + I_1 + I_2 + I_3 + I_4 + I_5)/kappa) + phi*I_3 - phi*I_4;
  I_5' = rho*I_5*(1 - (U + I_1 + I_2 + I_3 + I_4 + I_5)/kappa) + phi*I_4 - alpha*I_5;
  V' = beta*alpha*I_5 - psi*V*U - delta*V;

  // Events:
  _E0: at (U < 1e-8): U = 0;
end
