// SBML level 2 version 4

function Rate_Law_for_exposed_to_asymptopmatic(k1, k2, substrate)
  k1*k2*substrate;
end

function Rate_Law_for_exposed_to_symptomatic(k1, k2, substrate)
  k1*(1 - k2)*substrate;
end

model Okuonghae_ChaosSolitonsFractals2020()
  // isDescribedBy doi:10.1016/j.chaos.2020.110032

  // Compartments:
  compartment Lagos = 1;

  // Species:
  species susceptible in Lagos = 14367982;
  species exposed in Lagos = exposed_start;
  species asymptomatic in Lagos = asymptomatic_start;
  species symptomatic in Lagos = symptomatic_start;
  species detected in Lagos = 1;
  species recovered in Lagos = 0;
  species deceased in Lagos = 0;
  species $total_pop in Lagos;
  species detected_cumulative in Lagos = 1;

  // Parameters:
  transmission_rate_effective = 0.4236;
  gamma_a = 0.13978 unit_0;
  gamma_0 = 0.13978 unit_0;
  gamma_i = 1/15; gamma_i has unit_0;
  psi = 0.0135 unit_0;
  theta = 1.8999*10^(-12); theta has unit_0;
  d_0 = 0.015 unit_0;
  d_D = 0.015 unit_0;
  sigma = 1/5.2; sigma has unit_0;
  nu = 0.5 unit_0;
  alpha = 0.5 unit_0;
  eps = 0.8;
  delta = 0;
  exposed_start = 441;
  asymptomatic_start = 188;
  symptomatic_start = 212;

  // Assignment rules:
  total_pop := asymptomatic + detected + exposed + recovered + susceptible + symptomatic;
  lam := transmission_rate_effective*(1 - eps)*(1 - delta)*(alpha*asymptomatic + symptomatic)/(total_pop - detected);

  // Reactions:
  susceptible_to_exposed: susceptible => exposed; Lagos*lam*susceptible;
  exposed_to_symptomatic: exposed => symptomatic; Lagos*Rate_Law_for_exposed_to_symptomatic(sigma, nu, exposed);
  exposed_to_asymptopmatic: exposed => asymptomatic; Lagos*Rate_Law_for_exposed_to_asymptopmatic(sigma, nu, exposed);
  symptomatic_to_detected: symptomatic => detected + detected_cumulative; Lagos*psi*symptomatic;
  asymptomatic_to_detected: asymptomatic => detected + detected_cumulative; Lagos*theta*asymptomatic;
  symptomatic_to_recovered: symptomatic => recovered; Lagos*gamma_0*symptomatic;
  asymptomatic_to_recovered: asymptomatic => recovered; Lagos*gamma_a*asymptomatic;
  detected_to_recovered: detected => recovered; Lagos*gamma_i*detected;
  symptomatic_to_deceased: symptomatic => deceased; Lagos*d_0*symptomatic;
  detected_to_deceased: detected => deceased; Lagos*d_D*detected;

  // Unit definitions:
  unit length = metre;
  unit area = metre^2;
  unit volume = 1e-3 litre;
  unit time = 86400 second;
  unit substance = item;
  unit unit_0 = 1 / (86400 second); unit_0 is "1/d";
end
