// SBML level 2 version 4

function Rate_Law_for_Susceptible_to_Exposed_2_1_1_1(Asymptomatic, Susceptible, Symptomatic, beta, delta_, population)
  beta*Susceptible*(Symptomatic + delta_*Asymptomatic)/population;
end

function Rate_Law_for_ICU_to_Hospitalized_1_1_1(ICU, gamma_u, mu_u, omega_u)
  gamma_u*ICU*(1 - mu_u + omega_u*mu_u);
end

model Oliveira_Nat2021__Mathematical_modeling_of_Covid_19_in_14_8_million_individuals_in_Bahia_Brazil()
  // Oliveira_Nat2021 - Mathematical modeling of Covid-19 in 14.8 million individuals in Bahia, Brazil
  // Oliveira, Nature 2021.
  // https://www.nature.com/articles/s41467-020-19798-3.
  // COVID-19 is affecting healthcare resources worldwide, with lower and middle-income countries being particularly disadvantaged to mitigate the challenges imposed by the disease, including the availability of a sufficient number of infirmary/ICU hospital beds, ventilators, and medical supplies. Here, we use mathematical modelling to study the dynamics of COVID-19 in Bahia, a state in northeastern Brazil, considering the influences of asymptomatic/non-detected cases, hospitalizations, and mortality. The impacts of policies on the transmission rate were also examined. Our results underscore the difficulties in maintaining a fully operational health infrastructure amidst the pandemic. Lowering the transmission rate is paramount to this objective, but current local efforts, leading to a 36% decrease, remain insufficient to prevent systemic collapse at peak demand, which could be accomplished using periodic interventions. Non-detected cases contribute to a ∽55% increase inR0. Finally, we discuss our results in light of epidemiological data that became available after the initial analyses.
  // To model with a two-step transmission rate, set 'beta_2_multiplier' = 0. To model with a three-step transmission rate, set 'beta_2_multiplier' = 1.

  // Compartments:
  compartment Interior = 1;

  // Species:
  species Exposed in Interior = exposed_init_concentration*population;
  species Susceptible in Interior = population*(1 - asymptomatic_init_concentration - exposed_init_concentration - symptomatic_init_concentration);
  species Asymptomatic in Interior = asymptomatic_init_concentration*population;
  species Symptomatic in Interior = symptomatic_init_concentration*population;
  species Recovered in Interior = 0;
  species Hospital in Interior = 0;
  species ICU in Interior = 0;
  species Deaths in Interior = 0;
  species $Cumulative_cases in Interior = symptomatic_init_concentration*population;

  // Parameters:
  population = 12098867;
  delta_ = 0.6951361;
  p_symp_rate = 0.2;
  kappa = 0.25;
  gamma_a = 0.285714;
  gamma_s = 0.25;
  h_hosp_rate = 0;
  xi = 0.53;
  gamma_h = 0.1313516;
  gamma_u = 0.1870202;
  mu_h = 0.15;
  mu_u = 0.4;
  omega_h = 0.14;
  omega_u = 0.29;
  beta_0 = 0.8071941;
  beta_1 = 0.5606415;
  beta_2 = 0.66;
  t_1 = 23.45305;
  t_2 = 97;
  exposed_init_concentration = 2.246732e-6;
  asymptomatic_init_concentration = 6.482882e-7;
  symptomatic_init_concentration = 1.992591e-6;
  beta_2_multiplier = 1;

  // Assignment rules:
  beta := piecewise(beta_0, time < t_1, piecewise(beta_1, time < t_2, beta_2*beta_2_multiplier + beta_1*(1 - beta_2_multiplier)));
  exposed_to_asymptomatic := kappa*(1 - p_symp_rate);
  exposed_to_symptomatic := kappa*p_symp_rate;
  symptomatic_to_recovered := (1 - h_hosp_rate)*gamma_s;
  symptomatic_to_hospitalized := h_hosp_rate*xi*gamma_s;
  symptomatic_to_icu := h_hosp_rate*(1 - xi)*gamma_s;
  hospitalized_to_recovered := (1 - omega_h)*(1 - mu_h)*gamma_h;
  hospitalized_to_icu := omega_h*gamma_h;
  hospitalized_to_deaths := (1 - omega_h)*mu_h*gamma_h;
  icu_to_deaths := (1 - omega_u)*mu_u*gamma_u;

  // Rate rules:
  Cumulative_cases' = exposed_to_symptomatic*Exposed*Interior;

  // Reactions:
  Susceptible_to_Exposed: Susceptible => Exposed; Interior*Rate_Law_for_Susceptible_to_Exposed_2_1_1_1(Asymptomatic, Susceptible, Symptomatic, beta, delta_, population);  // modifiers: Symptomatic, Asymptomatic
  Exposed_to_Asymptomatic: Exposed => Asymptomatic; Interior*exposed_to_asymptomatic*Exposed;
  Exposed_to_Symptomatic: Exposed => Symptomatic; Interior*exposed_to_symptomatic*Exposed;
  Asymptomatic_to_Recovered: Asymptomatic => Recovered; Interior*gamma_a*Asymptomatic;
  Symptomatic_to_Recovered: Symptomatic => Recovered; Interior*symptomatic_to_recovered*Symptomatic;
  Symptomatic_to_Hospitalized: Symptomatic => Hospital; Interior*symptomatic_to_hospitalized*Symptomatic;
  Hospitalized_to_Recovered: Hospital => Recovered; Interior*hospitalized_to_recovered*Hospital;
  Symptomatic_to_ICU: Symptomatic => ICU; Interior*symptomatic_to_icu*Symptomatic;
  Hospitalized_to_ICU: Hospital => ICU; Interior*hospitalized_to_icu*Hospital;
  ICU_to_Hospitalized: ICU => Hospital; Interior*Rate_Law_for_ICU_to_Hospitalized_1_1_1(ICU, gamma_u, mu_u, omega_u);
  Hospitalized_to_Deaths: Hospital => Deaths; Interior*hospitalized_to_deaths*Hospital;
  ICU_to_Deaths: ICU => Deaths; Interior*icu_to_deaths*ICU;

  // Unit definitions:
  unit substance = item;
  unit length = dimensionless^0;
  unit area = dimensionless^0;
  unit volume = dimensionless^0;
  unit time = 86400 second;
end
