// SBML level 3 version 1

model Rahman_MBS2016()
  // isDescribedBy doi:10.1016/j.mbs.2016.07.009
  // model units - substance: item, time: year, extent: item

  // Compartments:
  compartment c1 = 1 dimensionless;

  // Species:
  substanceOnly species susceptible in c1 = 17940000;
  substanceOnly species infected_normal in c1 = 16300;
  substanceOnly species infected_moderate in c1 = 9000;
  substanceOnly species infected_weak in c1 = 11000;
  substanceOnly species treated_normal in c1 = 0;
  substanceOnly species treated_moderate in c1 = 0;
  substanceOnly species treated_weak in c1 = 0;

  // Parameters:
  recruitment_rate = 1032672 per_year;
  force_of_infection has per_year;
  infected_normal_transmission_rate has per_year;
  infected_normal_transmission_rate_relative = 12.57 per_year;
  infected_moderate_transmission_rate = 0.082 per_year;
  infected_weak_transmission_rate has per_year;
  infected_weak_transmission_rate_relative = 4.54 per_year;
  treated_transmission_rate has per_year;
  infected_normal_treatment_rate = 0 per_year;
  infected_moderate_treatment_rate = 0 per_year;
  infected_weak_treatment_rate = 0.11 per_year;
  infected_normal_worsen_rate = 0.33 per_year;
  infected_moderate_worsen_rate = 0.34 per_year;
  treated_moderate_improve_rate = 0.57 per_year;
  treated_weak_improve_rate = 0.82 per_year;
  susceptible_death_rate = 0.0288 per_year;
  infected_normal_death_rate = 0.0888 per_year;
  infected_moderate_death_rate = 0.1368 per_year;
  infected_weak_death_rate = 0.3108 per_year;
  treated_normal_death_rate = 0.0408 per_year;
  treated_moderate_death_rate = 0.0528 per_year;
  treated_weak_death_rate = 0.1752 per_year;
  behavioural_change_rate = 0.00000024744 per_year;
  prevalence has item;

  // Assignment rules:
  infected_normal_transmission_rate := infected_normal_transmission_rate_relative*infected_moderate_transmission_rate;
  infected_weak_transmission_rate := infected_weak_transmission_rate_relative*infected_moderate_transmission_rate;
  treated_transmission_rate := 0.04*infected_moderate_transmission_rate;
  force_of_infection := (infected_normal_transmission_rate*infected_normal + infected_moderate_transmission_rate*infected_moderate + infected_weak_transmission_rate*infected_weak + treated_transmission_rate*(treated_normal + treated_moderate + treated_weak))/(susceptible + infected_normal + infected_moderate + infected_weak + treated_normal + treated_moderate + treated_weak)*exp(-1*behavioural_change_rate*(infected_normal + infected_moderate + infected_weak + treated_normal + treated_moderate + treated_weak));
  prevalence := (1 - susceptible/(susceptible + infected_normal + infected_moderate + infected_weak + treated_normal + treated_moderate + treated_weak))*100;

  // Reactions:
  v1: => susceptible; recruitment_rate;
  v2: susceptible => infected_normal; force_of_infection*susceptible;
  v3: infected_normal => infected_moderate; infected_normal_worsen_rate*infected_normal;
  v4: infected_moderate => infected_weak; infected_moderate_worsen_rate*infected_moderate;
  v5: treated_weak => treated_moderate; treated_weak_improve_rate*treated_weak;
  v6: treated_moderate => treated_normal; treated_moderate_improve_rate*treated_moderate;
  v7: infected_normal => treated_normal; infected_normal_treatment_rate*infected_normal;
  v8: infected_moderate => treated_moderate; infected_moderate_treatment_rate*infected_moderate;
  v9: infected_weak => treated_weak; infected_weak_treatment_rate*infected_weak;
  v10: susceptible => ; susceptible_death_rate*susceptible;
  v11: infected_normal => ; infected_normal_death_rate*infected_normal;
  v12: infected_moderate => ; infected_moderate_death_rate*infected_moderate;
  v13: infected_weak => ; infected_weak_death_rate*infected_weak;
  v14: treated_normal => ; treated_normal_death_rate*treated_normal;
  v15: treated_moderate => ; treated_moderate_death_rate*treated_moderate;
  v16: treated_weak => ; treated_weak_death_rate*treated_weak;

  // Unit definitions:
  unit year = 3.15576e7 second;
  unit per_year = 1 / (3.15576e7 second);
end
