// SBML level 2 version 4

model Raia_CancerResearch2011()
  // il13_jak2_stat5
  // PEtab implementation of the model from Raia et al. (2011), Cancer Res February 1 2011 (71) (3) 693-704
  // isDescribedBy doi:10.1158/0008-5472.CAN-10-2987

  // Compartments:
  compartment cyt = 100;
  compartment nuc = 10;

  // Species:
  species Rec in cyt = 1.3;
  species Rec_i in cyt = init_Rec_i;
  species IL13_Rec in cyt = 0;
  species p_IL13_Rec in cyt = 0;
  species p_IL13_Rec_i in cyt = 0;
  species JAK2 in cyt = 2.8;
  species pJAK2 in cyt = 0;
  species STAT5 in cyt = 165;
  species pSTAT5 in cyt = 0;
  species SOCS3mRNA in nuc = 0;
  species DecoyR in cyt = 0.34;
  species IL13_DecoyR in cyt = 0;
  species SOCS3 in cyt = 0;
  species CD274mRNA in nuc = 0;

  // Parameters:
  CD274mRNA_production = 0.02121477;
  DecoyR_binding = 0.003851316;
  JAK2_p_inhibition = 0.07815251;
  JAK2_phosphorylation = 1.017465;
  Kon_IL13Rec = 0.002277861;
  Rec_intern = 0.3440644;
  Rec_phosphorylation = 999.9994;
  Rec_recycle = 0.002098163;
  SOCS3_accumulation = 451.5968;
  SOCS3_degradation = 0.04338875;
  SOCS3_translation = 15.72443;
  SOCS3mRNA_production = 0.1432781;
  STAT5_phosphorylation = 0.01947683;
  init_Rec_i = 234.9595;
  pJAK2_dephosphorylation = 0.0001758212;
  pRec_degradation = 0.2095321;
  pRec_intern = 0.5850963;
  pSTAT5_dephosphorylation = 0.0002747903;
  il13_level = 0;

  // Reactions:
  v1_v_0: Rec => IL13_Rec; cyt*2.265*il13_level*Kon_IL13Rec*Rec;
  v2_v_1: Rec => Rec_i; cyt*Rec*Rec_intern;
  v3_v_2: Rec_i => Rec; cyt*Rec_i*Rec_recycle;
  v4_v_3: IL13_Rec => p_IL13_Rec; cyt*IL13_Rec*Rec_phosphorylation*pJAK2;  // modifiers: pJAK2
  v5_v_4: JAK2 => pJAK2; cyt*(IL13_Rec*JAK2*JAK2_phosphorylation/(JAK2_p_inhibition*SOCS3 + 1));  // modifiers: IL13_Rec, SOCS3
  v6_v_5: JAK2 => pJAK2; cyt*(JAK2*JAK2_phosphorylation*p_IL13_Rec/(JAK2_p_inhibition*SOCS3 + 1));  // modifiers: SOCS3, p_IL13_Rec
  v7_v_6: p_IL13_Rec => p_IL13_Rec_i; cyt*pRec_intern*p_IL13_Rec;
  v8_v_7: p_IL13_Rec_i => ; cyt*pRec_degradation*p_IL13_Rec_i;
  v9_v_8: pJAK2 => JAK2; cyt*91*pJAK2*pJAK2_dephosphorylation;
  v10_v_9: STAT5 => pSTAT5; cyt*STAT5*STAT5_phosphorylation*pJAK2;  // modifiers: pJAK2
  v11_v_10: pSTAT5 => STAT5; cyt*91*pSTAT5*pSTAT5_dephosphorylation;
  v12_v_11: DecoyR => IL13_DecoyR; cyt*2.265*il13_level*DecoyR*DecoyR_binding;
  v13_v_12: => SOCS3mRNA; nuc*SOCS3mRNA_production*pSTAT5;  // modifiers: pSTAT5
  v14_v_13: => SOCS3; cyt*(SOCS3mRNA*SOCS3_translation/(SOCS3mRNA + SOCS3_accumulation));  // modifiers: SOCS3mRNA
  v15_v_14: SOCS3 => ; cyt*SOCS3*SOCS3_degradation;
  v16_v_15: => CD274mRNA; nuc*CD274mRNA_production*pSTAT5;  // modifiers: pSTAT5

  // Unit definitions:
  unit time = 60 second;
end
