// SBML level 3 version 1

model main()

  // Compartments:
  compartment Compartment = 1;

  // Species:
  species Ras in Compartment = 0.1/Compartment;  // substance in dimensionless
  species Ras_star in Compartment = 0;  // substance in dimensionless
  species Raf in Compartment = 0.7/Compartment;  // substance in dimensionless
  species Raf_star in Compartment = 0;  // substance in dimensionless
  species Mek in Compartment = 0.68/Compartment;  // substance in dimensionless
  species Mek_star in Compartment = 0;  // substance in dimensionless
  species Erk in Compartment = 0.26/Compartment;  // substance in dimensionless
  species Erk_star in Compartment = 0;  // substance in dimensionless
  species FgfR in Compartment = FgfR_init;  // substance in dimensionless
  species H in Compartment = H_init;  // substance in dimensionless
  species H_F in Compartment = 0;  // substance in dimensionless
  species H_F_R in Compartment = 0;  // substance in dimensionless

  // Parameters:
  k_1_2 = 1 dimensionless;
  K_1_2 = 1 dimensionless;
  k_2_1 = 1 dimensionless;
  K_2_1 = 1 dimensionless;
  k_3_4 = 1 dimensionless;
  K_3_4 = 1 dimensionless;
  k_4_3 = 1 dimensionless;
  K_4_3 = 1 dimensionless;
  k_5_6 = 1 dimensionless;
  K_5_6 = 1 dimensionless;
  k_6_5 = 1 dimensionless;
  K_6_5 = 1 dimensionless;
  k_7_8 = 1 dimensionless;
  K_7_8 = 1 dimensionless;
  k_8_7 = 1 dimensionless;
  K_8_7 = 1 dimensionless;
  r_5_6 = 1 dimensionless;
  r_6_5 = 1 dimensionless;
  r_5_7 = 1 dimensionless;
  r_7_5 = 1 dimensionless;
  fgf_input = 1 dimensionless;
  h_init_mean = 0.1 dimensionless;
  h_init_log_std = 0.5 dimensionless;
  h_init = 1 dimensionless;
  fgfr_init_mean = 0.1 dimensionless;
  fgfr_init_log_std = 0.1 dimensionless;
  fgfr_init = 1 dimensionless;
  H_init has dimensionless;
  FgfR_init has dimensionless;

  // Assignment rules:
  H_init := exp(log10(h_init_mean) + h_init_log_std*h_init);
  FgfR_init := exp(log10(fgfr_init_mean) + fgfr_init_log_std*fgfr_init);

  // Rate rules:
  Ras' = -(k_1_2*H_F_R)*(Ras/(K_1_2 + Ras)) + k_2_1*(Ras_star/(K_2_1 + Ras_star));
  Ras_star' = k_1_2*H_F_R*(Ras/(K_1_2 + Ras)) - k_2_1*(Ras_star/(K_2_1 + Ras_star));
  Raf' = -k_3_4*Ras_star*(Raf/(K_3_4 + Raf)) + k_4_3*(Raf_star/(K_4_3 + Raf_star));
  Raf_star' = k_3_4*Ras_star*(Raf/(K_3_4 + Raf)) - k_4_3*(Raf_star/(K_4_3 + Raf_star));
  Mek' = -k_5_6*Raf_star*(Mek/(K_5_6 + Mek)) + k_6_5*(Mek_star/(K_6_5 + Mek_star));
  Mek_star' = k_5_6*Raf_star*(Mek/(K_5_6 + Mek)) - k_6_5*(Mek_star/(K_6_5 + Mek_star));
  Erk' = -k_7_8*Mek_star*(Erk/(K_7_8 + Erk)) + k_8_7*(Erk_star/(K_8_7 + Erk_star));
  Erk_star' = k_7_8*Mek_star*(Erk/(K_7_8 + Erk)) - k_8_7*(Erk_star/(K_8_7 + Erk_star));
  FgfR' = -r_5_7*H_F*FgfR + r_7_5*H_F_R;
  H' = -r_5_6*H*fgf_input + r_6_5*H_F;
  H_F' = r_5_6*H*fgf_input + r_7_5*H_F_R - (r_6_5*H_F + r_5_7*H_F*FgfR);
  H_F_R' = r_5_7*H_F*FgfR - r_7_5*H_F_R;
end
