// SBML level 2 version 4

model Perelson_Science1996()
  // PEtab implementation of the model from Perelson et al. (1996), Science 15 Mar 1996: Vol. 271, Issue 5255, pp. 1582-1586
  // isDescribedBy doi:10.1126/science.271.5255.1582

  // Compartments:
  compartment default = 1;

  // Species:
  species Tstar in default = 15061.32;
  species V in default = 1860000;
  species Vin in default = 1860000;
  species Vni in default = 0;

  // Parameters:
  NN = 480;
  T0 = 11000;
  c = 2.06;
  delta = 0.53;
  K0 = 3.9e-7;

  // Reactions:
  v1: -> Tstar; K0*T0*Vin;  // modifiers: Vin
  v2: Tstar -> ; delta*Tstar;
  v3: V + Vin -> ; c*Vin;
  v4: V + Vni -> ; c*Vni;
  v5: -> V + Vni; delta*NN*Tstar;  // modifiers: Tstar
end
