// SBML level 2 version 4

model Raimundez_PCB2020()
  // isDescribedBy doi:10.1371/journal.pcbi.1007147

  // Compartments:
  compartment cyt = 1 pl;

  // Species:
  species EGFR in cyt = 0;
  species EGFR_CET in cyt = 0; EGFR_CET is "EGFR:CET";
  species EGFR_EGF in cyt = 0; EGFR_EGF is "EGFR:EGF";
  species EGFR_EGF_2 in cyt = 0; EGFR_EGF_2 is "(EGFR:EGF)_2";
  species pEGFR_EGF_2 in cyt = 0; pEGFR_EGF_2 is "(pEGFR:EGF)_2";
  species pEGFR_EGF_2_i in cyt = 0; pEGFR_EGF_2_i is "(pEGFR:EGF)_{2,i}";
  species MMET in cyt = 0;
  species MMET_2 in cyt = 0;
  species pMMET_2 in cyt = 0;
  species pMMET_2_i in cyt = 0;
  species MMET_EGFR in cyt = 0; MMET_EGFR is "MMET:EGFR";
  species pMMET_pEGFR in cyt = 0; pMMET_pEGFR is "pMMET:pEGFR";
  species pMMET_pEGFR_i in cyt = 0; pMMET_pEGFR_i is "pMMET:pEGFR_i";
  species MMET_METinh in cyt = 0; MMET_METinh is "MMET:Inhibitor";
  species MMET_MMET_METinh in cyt = 0; MMET_MMET_METinh is "MMET_2:Inhibitor";
  species MMET_METinh_2 in cyt = 0; MMET_METinh_2 is "MMET_2:Inhibitor_2";
  species EGFR_MMET_METinh in cyt = 0; EGFR_MMET_METinh is "EGFR:MMET:Inhibitor";
  species RAS_GTP in cyt = 0; RAS_GTP is "RAS:GTP";
  species pMAPK in cyt = 0;
  species pPI3K in cyt = 0;
  species pMPI3K in cyt = 0;
  species pAKT in cyt = 0;

  // Parameters:
  AKTtotal__MKN1_fm = 1;
  CET_level = 1;
  EGF_level = 1;
  HS746T = 1;
  KD_EGFR_CET = 0.2180121;
  KD_EGFR_EGF = 0.3207599;
  KD_METinh = 0.0419369;
  MAPKtotal__MKN1_fm = 1;
  METinh_level = 1;
  MKN1 = 1;
  MPI3Ktotal__MKN1_fm = 1;
  PI3Ktotal__HS746T_fm = 1;
  RAStotal__MKN1_fm = 1;
  d_AKTtotal__MKN1_2_HS746T = 0;
  d_AKTtotal__fm_2_hm = 0.8229227;
  d_MAPKtotal__MKN1_2_HS746T = 0;
  d_MAPKtotal__fm_2_hm = 0.427451;
  d_MPI3Ktotal__fm_2_hm = -1.544681;
  d_PI3Ktotal__fm_2_hm = -0.5318357;
  d_RAStotal__MKN1_2_HS746T = -1.058791e-22;
  d_RAStotal__fm_2_hm = -0.5381901;
  d_ka_AKT__MKN1_2_HS746T = 0;
  d_ka_MAPK__MKN1_2_HS746T = 0;
  d_ka_RAS__basal__MKN1_2_HS746T = 0;
  d_ka_RAS__pEGFR_EGF_2__MKN1_2_HS746T = 0;
  d_kdeg_membran__MKN1_2_HS746T = -0.5999755;
  d_kdeg_pEGFR_EGF_2_i__MKN1_2_HS746T = 3;
  d_kexp_pEGFR_EGF_2_i__MKN1_2_HS746T = -0.2382369;
  d_ki_AKT__MKN1_2_HS746T = 0;
  d_ki_PI3K__MKN1_2_HS746T = 0;
  d_ki_RAS__MKN1_2_HS746T = 0;
  d_kimp_pEGFR_EGF_2__MKN1_2_HS746T = -1.745793;
  d_ksyn_EGFR__MKN1_2_HS746T = -3;
  d_ksyn_EGFR__fm_2_hm = -0.08759518;
  d_ksyn_MMET__fm_2_hm = -0.518889;
  full_medium = 1;
  hunger_medium = 1;
  ka_AKT__MKN1 = 443.1012;
  ka_MAPK__MKN1 = 1000;
  ka_PI3K__basal = 0.0003649151;
  ka_PI3K__pEGFR_EGF_2 = 0.001700943;
  ka_RAS__basal__MKN1 = 0.0002144633;
  ka_RAS__pEGFR_EGF_2__MKN1 = 1.465489e-5;
  kbin_EGFR_CET = 0.5853027;
  kbin_EGFR_EGF = 8.881749;
  kdeg_membran__MKN1 = 0.002259064;
  kdeg_pEGFR_EGF_2_i__MKN1 = 0.06679561;
  kdim_EGFR_EGF = 0.03239487;
  kdim_MMET = 2.612468e-5;
  kdim_MMET_EGFR = 0.001882197;
  kdim_MMETinh = 0.03127141;
  kexp_pEGFR_EGF_2_i__MKN1 = 0.7516831;
  ki_AKT__MKN1 = 18.4693;
  ki_MAPK = 2.177159;
  ki_PI3K__MKN1 = 1.31588;
  ki_RAS__MKN1 = 0.3269566;
  kimp_pEGFR_EGF_2__MKN1 = 0.7468702;
  kpho_EGFR_EGF = 1.344128;
  kpho_MMET = 2.542674;
  kpho_MMET_EGFR = 4.563009;
  ksyn_EGFR__MKN1_fm = 1;
  ksyn_MMET__HS746T_fm = 0.02635081;
  relative_ksyn_EGFR = 1;
  xi_ka_PI3K_pMMET_2 = 301.3409;
  xi_ka_PI3K_pMMET_pEGFR = 0.7654722;
  xi_ka_RAS_pMMET_2 = 0.4493515;
  xi_ka_RAS_pMMET_pEGFR = 0.2535612;
  xi_kdeg_pMMET_2_i = 0.7837103;
  xi_kdeg_pMMET_pEGFR_i = 3.53345;
  xi_kdim_MMET = 0.9747714;
  xi_kdim_MMET_EGFR = 1.000425;
  xi_kexp_pMMET_2_i = 1.243209;
  xi_kexp_pMMET_pEGFR_i = 0.2863994;
  xi_ki_MPI3K = 0.003220284;
  xi_kimp_pMMET_2 = 0.07715388;
  xi_kimp_pMMET_pEGFR = 0.007960053;
  xi_kpho_MMET = 0.008327769;
  xi_kpho_MMET_EGFR = 0.06967314;

  // Assignment rules:
  EGF := 0.161*EGF_level*piecewise(0, time < 0, 1);
  CET := 6.86*CET_level*piecewise(0, time < 0, 1);
  METinh := METinh_level*piecewise(0, time < 0, 1);
  FM := full_medium;
  HM := hunger_medium;
  ksyn_MMET := HS746T*ksyn_MMET__HS746T_fm*exp(d_ksyn_MMET__fm_2_hm*hunger_medium);
  ksyn_EGFR := ksyn_EGFR__MKN1_fm*relative_ksyn_EGFR*exp(HS746T*d_ksyn_EGFR__MKN1_2_HS746T + d_ksyn_EGFR__fm_2_hm*hunger_medium);
  RAS_total := RAStotal__MKN1_fm*exp(HS746T*d_RAStotal__MKN1_2_HS746T + d_RAStotal__fm_2_hm*hunger_medium);
  MAPK_total := MAPKtotal__MKN1_fm*exp(HS746T*d_MAPKtotal__MKN1_2_HS746T + d_MAPKtotal__fm_2_hm*hunger_medium);
  PI3K_total := HS746T*PI3Ktotal__HS746T_fm*exp(d_PI3Ktotal__fm_2_hm*hunger_medium);
  MPI3K_total := MKN1*MPI3Ktotal__MKN1_fm*exp(d_MPI3Ktotal__fm_2_hm*hunger_medium);
  AKT_total := AKTtotal__MKN1_fm*exp(HS746T*d_AKTtotal__MKN1_2_HS746T + d_AKTtotal__fm_2_hm*hunger_medium);
  kimp_pEGFR_EGF_2 := kimp_pEGFR_EGF_2__MKN1*exp(HS746T*d_kimp_pEGFR_EGF_2__MKN1_2_HS746T);
  kdeg_pEGFR_EGF_2_i := kdeg_pEGFR_EGF_2_i__MKN1*exp(HS746T*d_kdeg_pEGFR_EGF_2_i__MKN1_2_HS746T);
  kdeg_membran := kdeg_membran__MKN1*exp(HS746T*d_kdeg_membran__MKN1_2_HS746T);
  kexp_pEGFR_EGF_2_i := kexp_pEGFR_EGF_2_i__MKN1*exp(HS746T*d_kexp_pEGFR_EGF_2_i__MKN1_2_HS746T);
  ka_RAS__basal := ka_RAS__basal__MKN1*exp(HS746T*d_ka_RAS__basal__MKN1_2_HS746T);
  ka_RAS__pEGFR_EGF_2 := ka_RAS__pEGFR_EGF_2__MKN1*exp(HS746T*d_ka_RAS__pEGFR_EGF_2__MKN1_2_HS746T);
  ki_RAS := ki_RAS__MKN1*exp(HS746T*d_ki_RAS__MKN1_2_HS746T);
  ka_MAPK := ka_MAPK__MKN1*exp(HS746T*d_ka_MAPK__MKN1_2_HS746T);
  ka_AKT := ka_AKT__MKN1*exp(HS746T*d_ka_AKT__MKN1_2_HS746T);
  ki_AKT := ki_AKT__MKN1*exp(HS746T*d_ki_AKT__MKN1_2_HS746T);
  ki_PI3K := ki_PI3K__MKN1*exp(HS746T*d_ki_PI3K__MKN1_2_HS746T);

  // Reactions:
  v1_v_0: => EGFR; cyt*ksyn_EGFR;
  v2_v_1: EGFR => ; cyt*EGFR*kdeg_membran;
  v3_v_2: EGFR => EGFR_CET; cyt*CET*EGFR*kbin_EGFR_CET;
  v4_v_3: EGFR_CET => EGFR; cyt*EGFR_CET*KD_EGFR_CET*kbin_EGFR_CET;
  v5_v_4: EGFR_CET => ; cyt*EGFR_CET*kdeg_membran;
  v6_v_5: EGFR => EGFR_EGF; cyt*EGF*EGFR*kbin_EGFR_EGF;
  v7_v_6: EGFR_EGF => EGFR; cyt*EGFR_EGF*KD_EGFR_EGF*kbin_EGFR_EGF;
  v8_v_7: 2 EGFR_EGF => EGFR_EGF_2; cyt*EGFR_EGF^2*kdim_EGFR_EGF;
  v9_v_8: EGFR_EGF_2 => pEGFR_EGF_2; cyt*EGFR_EGF_2*kpho_EGFR_EGF;
  v10_v_9: pEGFR_EGF_2 => pEGFR_EGF_2_i; cyt*kimp_pEGFR_EGF_2*pEGFR_EGF_2;
  v11_v_10: pEGFR_EGF_2_i => 2 EGFR; cyt*kexp_pEGFR_EGF_2_i*pEGFR_EGF_2_i;
  v12_v_11: EGFR_EGF => ; cyt*EGFR_EGF*kdeg_membran;
  v13_v_12: EGFR_EGF_2 => ; cyt*EGFR_EGF_2*kdeg_membran;
  v14_v_13: pEGFR_EGF_2_i => ; cyt*kdeg_pEGFR_EGF_2_i*pEGFR_EGF_2_i;
  v15_v_14: => MMET; cyt*ksyn_MMET;
  v16_v_15: MMET => ; cyt*MMET*kdeg_membran;
  v17_v_16: MMET => MMET_METinh; cyt*METinh*MMET*kdim_MMETinh;
  v18_v_17: MMET_METinh => MMET; cyt*KD_METinh*MMET_METinh*kdim_MMETinh;
  v19_v_18: MMET_METinh => ; cyt*MMET_METinh*kdeg_membran;
  v20_v_19: 2 MMET => MMET_2; cyt*MMET^2*kdim_MMET*xi_kdim_MMET;
  v21_v_20: MMET_2 => pMMET_2; cyt*MMET_2*kpho_MMET*xi_kpho_MMET;
  v22_v_21: pMMET_2 => pMMET_2_i; cyt*kimp_pEGFR_EGF_2*pMMET_2*xi_kimp_pMMET_2;
  v23_v_22: pMMET_2_i => 2 MMET; cyt*kexp_pEGFR_EGF_2_i*pMMET_2_i*xi_kexp_pMMET_2_i;
  v24_v_23: MMET_2 => ; cyt*MMET_2*kdeg_membran;
  v25_v_24: pMMET_2_i => ; cyt*kdeg_pEGFR_EGF_2_i*pMMET_2_i*xi_kdeg_pMMET_2_i;
  v26_v_25: MMET + MMET_METinh => MMET_MMET_METinh; cyt*MMET*MMET_METinh*kdim_MMET*xi_kdim_MMET;
  v27_v_26: 2 MMET_METinh => MMET_METinh_2; cyt*MMET_METinh^2*kdim_MMET*xi_kdim_MMET;
  v28_v_27: MMET_2 => MMET_MMET_METinh; cyt*METinh*MMET_2*kdim_MMETinh;
  v29_v_28: MMET_MMET_METinh => MMET_METinh_2; cyt*METinh*MMET_MMET_METinh*kdim_MMETinh;
  v30_v_29: MMET_MMET_METinh => ; cyt*MMET_MMET_METinh*kdeg_membran;
  v31_v_30: MMET_METinh_2 => ; cyt*MMET_METinh_2*kdeg_membran;
  v32_v_31: EGFR + MMET => MMET_EGFR; cyt*EGFR*MMET*kdim_MMET_EGFR*xi_kdim_MMET_EGFR;
  v33_v_32: MMET_EGFR => pMMET_pEGFR; cyt*MMET_EGFR*kpho_MMET_EGFR*xi_kpho_MMET_EGFR;
  v34_v_33: pMMET_pEGFR => pMMET_pEGFR_i; cyt*kimp_pEGFR_EGF_2*pMMET_pEGFR*xi_kimp_pMMET_pEGFR;
  v35_v_34: pMMET_pEGFR_i => EGFR + MMET; cyt*kexp_pEGFR_EGF_2_i*pMMET_pEGFR_i*xi_kexp_pMMET_pEGFR_i;
  v36_v_35: pMMET_pEGFR_i => ; cyt*kdeg_pEGFR_EGF_2_i*pMMET_pEGFR_i*xi_kdeg_pMMET_pEGFR_i;
  v37_v_36: MMET_EGFR => ; cyt*MMET_EGFR*kdeg_membran;
  v38_v_37: EGFR + MMET_METinh => EGFR_MMET_METinh; cyt*EGFR*MMET_METinh*kdim_MMET_EGFR*xi_kdim_MMET_EGFR;
  v39_v_38: => RAS_GTP; cyt*(-ka_RAS__basal)*(RAS_GTP - RAS_total);
  v40_v_39: => RAS_GTP; cyt*(-ka_RAS__pEGFR_EGF_2)*pEGFR_EGF_2*(RAS_GTP - RAS_total);  // modifiers: pEGFR_EGF_2
  v41_v_40: => RAS_GTP; cyt*(-ka_RAS__pEGFR_EGF_2)*pEGFR_EGF_2_i*(RAS_GTP - RAS_total);  // modifiers: pEGFR_EGF_2_i
  v42_v_41: => RAS_GTP; cyt*(-ka_RAS__pEGFR_EGF_2)*pMMET_pEGFR*xi_ka_RAS_pMMET_pEGFR*(RAS_GTP - RAS_total);  // modifiers: pMMET_pEGFR
  v43_v_42: => RAS_GTP; cyt*(-ka_RAS__pEGFR_EGF_2)*pMMET_pEGFR_i*xi_ka_RAS_pMMET_pEGFR*(RAS_GTP - RAS_total);  // modifiers: pMMET_pEGFR_i
  v44_v_43: => RAS_GTP; cyt*(-ka_RAS__pEGFR_EGF_2)*pMMET_2*xi_ka_RAS_pMMET_2*(RAS_GTP - RAS_total);  // modifiers: pMMET_2
  v45_v_44: => RAS_GTP; cyt*(-ka_RAS__pEGFR_EGF_2)*pMMET_2_i*xi_ka_RAS_pMMET_2*(RAS_GTP - RAS_total);  // modifiers: pMMET_2_i
  v46_v_45: RAS_GTP => ; cyt*RAS_GTP*ki_RAS;
  v47_v_46: => pMAPK; cyt*RAS_GTP*ka_MAPK*(MAPK_total - pMAPK);  // modifiers: RAS_GTP
  v48_v_47: pMAPK => ; cyt*ki_MAPK*pMAPK;
  v49_v_48: => pPI3K; cyt*ka_PI3K__basal*(PI3K_total - pPI3K);
  v50_v_49: => pPI3K; cyt*ka_PI3K__pEGFR_EGF_2*pEGFR_EGF_2*(PI3K_total - pPI3K);  // modifiers: pEGFR_EGF_2
  v51_v_50: => pPI3K; cyt*ka_PI3K__pEGFR_EGF_2*pEGFR_EGF_2_i*(PI3K_total - pPI3K);  // modifiers: pEGFR_EGF_2_i
  v52_v_51: => pPI3K; cyt*ka_PI3K__pEGFR_EGF_2*pMMET_pEGFR*xi_ka_PI3K_pMMET_pEGFR*(PI3K_total - pPI3K);  // modifiers: pMMET_pEGFR
  v53_v_52: => pPI3K; cyt*ka_PI3K__pEGFR_EGF_2*pMMET_pEGFR_i*xi_ka_PI3K_pMMET_pEGFR*(PI3K_total - pPI3K);  // modifiers: pMMET_pEGFR_i
  v54_v_53: => pPI3K; cyt*ka_PI3K__pEGFR_EGF_2*pMMET_2*xi_ka_PI3K_pMMET_2*(PI3K_total - pPI3K);  // modifiers: pMMET_2
  v55_v_54: => pPI3K; cyt*ka_PI3K__pEGFR_EGF_2*pMMET_2_i*xi_ka_PI3K_pMMET_2*(PI3K_total - pPI3K);  // modifiers: pMMET_2_i
  v56_v_55: pPI3K => ; cyt*ki_PI3K*pPI3K;
  v57_v_56: => pMPI3K; cyt*ka_PI3K__basal*(MPI3K_total - pMPI3K);
  v58_v_57: => pMPI3K; cyt*ka_PI3K__pEGFR_EGF_2*pEGFR_EGF_2*(MPI3K_total - pMPI3K);  // modifiers: pEGFR_EGF_2
  v59_v_58: => pMPI3K; cyt*ka_PI3K__pEGFR_EGF_2*pEGFR_EGF_2_i*(MPI3K_total - pMPI3K);  // modifiers: pEGFR_EGF_2_i
  v60_v_59: => pMPI3K; cyt*ka_PI3K__pEGFR_EGF_2*pMMET_pEGFR*xi_ka_PI3K_pMMET_pEGFR*(MPI3K_total - pMPI3K);  // modifiers: pMMET_pEGFR
  v61_v_60: => pMPI3K; cyt*ka_PI3K__pEGFR_EGF_2*pMMET_pEGFR_i*xi_ka_PI3K_pMMET_pEGFR*(MPI3K_total - pMPI3K);  // modifiers: pMMET_pEGFR_i
  v62_v_61: => pMPI3K; cyt*ka_PI3K__pEGFR_EGF_2*pMMET_2*xi_ka_PI3K_pMMET_2*(MPI3K_total - pMPI3K);  // modifiers: pMMET_2
  v63_v_62: => pMPI3K; cyt*ka_PI3K__pEGFR_EGF_2*pMMET_2_i*xi_ka_PI3K_pMMET_2*(MPI3K_total - pMPI3K);  // modifiers: pMMET_2_i
  v64_v_63: pMPI3K => ; cyt*ki_PI3K*pMPI3K*xi_ki_MPI3K;
  v65_v_64: => pAKT; cyt*ka_AKT*pPI3K*(AKT_total - pAKT);  // modifiers: pPI3K
  v66_v_65: => pAKT; cyt*ka_AKT*pMPI3K*(AKT_total - pAKT);  // modifiers: pMPI3K
  v67_v_66: pAKT => ; cyt*ki_AKT*pAKT;

  // Unit definitions:
  unit time = 60 second;
  unit pl = 1e-12 litre;
end
