// SBML level 2 version 4

model Smith_BMCSystBiol2013()
  // isDescribedBy doi:10.1186/1752-0509-7-41

  // Compartments:
  compartment extracellular = 8.3e-12;
  compartment cellsurface in extracellular = 6.4e-14;
  compartment cytoplasm in cellsurface = 1.65e-11;
  compartment nucleus in cytoplasm = 5e-13;
  compartment dnabound in nucleus = 1e-13;

  // Species:
  substanceOnly species $NULL in cytoplasm = 0;
  substanceOnly species $Ins in extracellular = 0;
  substanceOnly species InR in cellsurface = 90000;
  substanceOnly species Ins_InR in cellsurface = 0;
  substanceOnly species Ins_InR_P in cellsurface = 0;
  substanceOnly species Ins_2_InR_P in cellsurface = 0;
  substanceOnly species cytoplasm_InR in cytoplasm = 10000;
  substanceOnly species cytoplasm_Ins_2_InR_P in cytoplasm = 0;
  substanceOnly species cytoplasm_Ins_InR_P in cytoplasm = 0;
  substanceOnly species InR_tot in cytoplasm;
  substanceOnly species InR_bound in cytoplasm;
  substanceOnly species InR_active in cytoplasm;
  substanceOnly species PTP1B in cytoplasm = 100000;
  substanceOnly species IRS1_TyrP_PI3K in cytoplasm = 0;
  substanceOnly species PI345P3 in cytoplasm = 1000;
  substanceOnly species PIP2 in cytoplasm = 200000;
  substanceOnly species PI345P3_mol in cytoplasm;
  substanceOnly species PIP2_mol in cytoplasm;
  substanceOnly species Akt in cytoplasm = 100000;
  substanceOnly species Akt_P2 in cytoplasm = 0;
  substanceOnly species PKC in cytoplasm = 100000;
  substanceOnly species PKC_P in cytoplasm = 0;
  substanceOnly species AS160 in cytoplasm = 20000;
  substanceOnly species AS160_P in cytoplasm = 0;
  substanceOnly species cytoplasm_GLUT4 in cytoplasm = 96000;
  substanceOnly species cellsurface_GLUT4 in cellsurface = 4000;
  substanceOnly species PTEN in cytoplasm = 100000;
  substanceOnly species PP2A in cytoplasm = 500000;
  substanceOnly species $extracellular_ROS in extracellular = 0;
  substanceOnly species PTP1B_ox in cytoplasm = 0;
  substanceOnly species PTP1B_plus_PTP1B_ox in cytoplasm;
  substanceOnly species PTEN_ox in cytoplasm = 0;
  substanceOnly species PTEN_plus_PTEN_ox in cytoplasm;
  substanceOnly species ROS in cytoplasm = 0;
  substanceOnly species GSH in cytoplasm = 100;
  substanceOnly species GSSG in cytoplasm = 0;
  substanceOnly species cytoplasm_SOD2 in cytoplasm = 41700;
  substanceOnly species NOX_inact in cytoplasm = 100;
  substanceOnly species NOX in cytoplasm = 0;
  substanceOnly species NOX_deact in cytoplasm = 0;
  substanceOnly species NOX_total in cytoplasm;
  substanceOnly species $Mt in cytoplasm = 50;
  substanceOnly species IRS1 in cytoplasm = 100000;
  substanceOnly species IRS1_TyrP in cytoplasm = 0;
  substanceOnly species IRS1_PolySerP in cytoplasm = 0;
  substanceOnly species IRS1_TyrP_PolySerP in cytoplasm = 0;
  substanceOnly species IRS_total in cytoplasm;
  substanceOnly species PI3K in cytoplasm = 10000;
  substanceOnly species JNK_P in cytoplasm = 0;
  substanceOnly species IKK_P in cytoplasm = 0;
  substanceOnly species JNK in cytoplasm = 16000;
  substanceOnly species JNK_plus_JNK_P in cytoplasm;
  substanceOnly species IKK in cytoplasm = 2000;
  substanceOnly species IKK_plus_IKK_P in cytoplasm;
  substanceOnly species DUSP in cytoplasm = 100000;
  substanceOnly species DUSP_ox in cytoplasm = 0;
  substanceOnly species DUSP_plus_DUSP_ox in cytoplasm;
  substanceOnly species $null in cytoplasm = 0;
  substanceOnly species degr_Foxo1 in cytoplasm = 0;
  substanceOnly species cytoplasm_Foxo1_Pa0_Pd0_Pe0_pUb0 in cytoplasm = 1000;
  substanceOnly species nucleus_Foxo1_Pa0_Pd0_Pe0_pUb0 in nucleus = 0;
  substanceOnly species dnabound_Foxo1_Pa0_Pd0_Pe0_pUb0 in dnabound = 0;
  substanceOnly species cytoplasm_Foxo1_Pa0_Pd0_Pe0_pUb1 in cytoplasm = 0;
  substanceOnly species nucleus_Foxo1_Pa0_Pd0_Pe0_pUb1 in nucleus = 0;
  substanceOnly species dnabound_Foxo1_Pa0_Pd0_Pe0_pUb1 in dnabound = 0;
  substanceOnly species cytoplasm_Foxo1_Pa0_Pd0_Pe1_pUb0 in cytoplasm = 0;
  substanceOnly species nucleus_Foxo1_Pa0_Pd0_Pe1_pUb0 in nucleus = 0;
  substanceOnly species dnabound_Foxo1_Pa0_Pd0_Pe1_pUb0 in dnabound = 0;
  substanceOnly species cytoplasm_Foxo1_Pa0_Pd0_Pe1_pUb1 in cytoplasm = 0;
  substanceOnly species nucleus_Foxo1_Pa0_Pd0_Pe1_pUb1 in nucleus = 0;
  substanceOnly species dnabound_Foxo1_Pa0_Pd0_Pe1_pUb1 in dnabound = 0;
  substanceOnly species cytoplasm_Foxo1_Pa0_Pd1_Pe0_pUb0 in cytoplasm = 0;
  substanceOnly species nucleus_Foxo1_Pa0_Pd1_Pe0_pUb0 in nucleus = 0;
  substanceOnly species dnabound_Foxo1_Pa0_Pd1_Pe0_pUb0 in dnabound = 0;
  substanceOnly species cytoplasm_Foxo1_Pa0_Pd1_Pe0_pUb1 in cytoplasm = 0;
  substanceOnly species nucleus_Foxo1_Pa0_Pd1_Pe0_pUb1 in nucleus = 0;
  substanceOnly species dnabound_Foxo1_Pa0_Pd1_Pe0_pUb1 in dnabound = 0;
  substanceOnly species cytoplasm_Foxo1_Pa0_Pd1_Pe1_pUb0 in cytoplasm = 0;
  substanceOnly species nucleus_Foxo1_Pa0_Pd1_Pe1_pUb0 in nucleus = 0;
  substanceOnly species dnabound_Foxo1_Pa0_Pd1_Pe1_pUb0 in dnabound = 0;
  substanceOnly species cytoplasm_Foxo1_Pa0_Pd1_Pe1_pUb1 in cytoplasm = 0;
  substanceOnly species nucleus_Foxo1_Pa0_Pd1_Pe1_pUb1 in nucleus = 0;
  substanceOnly species dnabound_Foxo1_Pa0_Pd1_Pe1_pUb1 in dnabound = 0;
  substanceOnly species cytoplasm_Foxo1_Pa1_Pd0_Pe0_pUb0 in cytoplasm = 0;
  substanceOnly species nucleus_Foxo1_Pa1_Pd0_Pe0_pUb0 in nucleus = 0;
  substanceOnly species dnabound_Foxo1_Pa1_Pd0_Pe0_pUb0 in dnabound = 0;
  substanceOnly species cytoplasm_Foxo1_Pa1_Pd0_Pe0_pUb1 in cytoplasm = 0;
  substanceOnly species nucleus_Foxo1_Pa1_Pd0_Pe0_pUb1 in nucleus = 0;
  substanceOnly species dnabound_Foxo1_Pa1_Pd0_Pe0_pUb1 in dnabound = 0;
  substanceOnly species cytoplasm_Foxo1_Pa1_Pd0_Pe1_pUb0 in cytoplasm = 0;
  substanceOnly species nucleus_Foxo1_Pa1_Pd0_Pe1_pUb0 in nucleus = 0;
  substanceOnly species dnabound_Foxo1_Pa1_Pd0_Pe1_pUb0 in dnabound = 0;
  substanceOnly species cytoplasm_Foxo1_Pa1_Pd0_Pe1_pUb1 in cytoplasm = 0;
  substanceOnly species nucleus_Foxo1_Pa1_Pd0_Pe1_pUb1 in nucleus = 0;
  substanceOnly species dnabound_Foxo1_Pa1_Pd0_Pe1_pUb1 in dnabound = 0;
  substanceOnly species cytoplasm_Foxo1_Pa1_Pd1_Pe0_pUb0 in cytoplasm = 0;
  substanceOnly species nucleus_Foxo1_Pa1_Pd1_Pe0_pUb0 in nucleus = 0;
  substanceOnly species dnabound_Foxo1_Pa1_Pd1_Pe0_pUb0 in dnabound = 0;
  substanceOnly species cytoplasm_Foxo1_Pa1_Pd1_Pe0_pUb1 in cytoplasm = 0;
  substanceOnly species nucleus_Foxo1_Pa1_Pd1_Pe0_pUb1 in nucleus = 0;
  substanceOnly species dnabound_Foxo1_Pa1_Pd1_Pe0_pUb1 in dnabound = 0;
  substanceOnly species cytoplasm_Foxo1_Pa1_Pd1_Pe1_pUb0 in cytoplasm = 0;
  substanceOnly species nucleus_Foxo1_Pa1_Pd1_Pe1_pUb0 in nucleus = 0;
  substanceOnly species dnabound_Foxo1_Pa1_Pd1_Pe1_pUb0 in dnabound = 0;
  substanceOnly species cytoplasm_Foxo1_Pa1_Pd1_Pe1_pUb1 in cytoplasm = 0;
  substanceOnly species nucleus_Foxo1_Pa1_Pd1_Pe1_pUb1 in nucleus = 0;
  substanceOnly species dnabound_Foxo1_Pa1_Pd1_Pe1_pUb1 in dnabound = 0;
  substanceOnly species Foxo1_Pa0_tot in extracellular;
  substanceOnly species Foxo1_Pa1_tot in extracellular;
  substanceOnly species Foxo1_Pd0_tot in extracellular;
  substanceOnly species Foxo1_Pd1_tot in extracellular;
  substanceOnly species Foxo1_Pe0_tot in extracellular;
  substanceOnly species Foxo1_Pe1_tot in extracellular;
  substanceOnly species Foxo1_pUb0_tot in extracellular;
  substanceOnly species Foxo1_pUb1_tot in extracellular;
  substanceOnly species cytoplasm_Foxo1_tot in extracellular;
  substanceOnly species nucleus_Foxo1_tot in extracellular;
  substanceOnly species dnabound_Foxo1_tot in extracellular;
  substanceOnly species Foxo1_all in extracellular;
  substanceOnly species nucleus_RNA_InR in nucleus = 0;
  substanceOnly species cytoplasm_RNA_InR in cytoplasm = 0;
  substanceOnly species nucleus_RNA_SOD2 in nucleus = 0;
  substanceOnly species cytoplasm_RNA_SOD2 in cytoplasm = 0;
  substanceOnly species E2F1 in cytoplasm = 300;
  substanceOnly species SGK in cytoplasm = 0;
  substanceOnly species CDK2 in cytoplasm = 0;
  substanceOnly species AMPK in cytoplasm = 0;
  substanceOnly species CBPP300 in cytoplasm = 10;
  substanceOnly species SIRT1 in cytoplasm = 1000;
  substanceOnly species E3 in cytoplasm = 0;
  substanceOnly species USP7 in cytoplasm = 1000;
  substanceOnly species SCF in cytoplasm = 1000;
  substanceOnly species Proteasome in cytoplasm = 1000;

  // Parameters:
  k1 = 2e-5;
  kminus1 = 12072;
  k2 = 1.2e-5;
  kminus2 = 90000;
  k3 = 2500;
  kminus3 = 2e-6;
  k4 = 0.033333334;
  kminus4 = 0.3;
  k4prime = 0.0021;
  kminus4prime = 0.00021;
  k6 = 4.61e-6;
  cellsurf_vol = 1;
  cyto_vol = 1;
  vextracellular = 8.3e-12;
  vcellsurface = 6.4e-14;
  vcytoplasm = 1.65e-11;
  navo = 6.02e23;
  k9_basal = 0.13145;
  k9 = 0.0055;
  kminus9_basal = 2.7;
  kminus9 = 0.0014;
  k11 = 2.5e-5;
  kminus11 = 1.1878e-6;
  k12 = 3.5e-5;
  kminus12 = 1.25e-6;
  kr16a = 0.000333;
  kminusr16a = 1e-6;
  k13_basal = 0.015;
  k13 = 7.5e-6;
  kminus13 = 0.167;
  k14 = 110.88;
  kminus14 = 0.001155;
  sc_pip = 1000;
  pip3_basal = 200;
  k30f = 0.08;
  k30r = 0.005;
  k31f = 0.00027;
  k31r = 0.002;
  k34f = 2e-5;
  k34r1 = 0.001;
  k34r2 = 0.25;
  k34r3 = 0.001;
  k35f = 450;
  k35r = 0.12;
  k36f = 180;
  ros_perm = 740000000;
  membrane_area = 6.5e-9;
  k38r = 2;
  k38f = 0.05;
  sc_ros = 1000;
  k7 = 5.8;
  kminus7a = 8.75e-5;
  kminus7b = 2.8e-6;
  k8 = 2.6e-6;
  kminus8 = 1.55;
  IRp = 90000;
  molec_per_fm = 602000000;
  k2psp = 0.00022;
  kcat82 = 3;
  Km82 = 100;
  k_irs1_basal_syn = 260;
  k_irs1_basal_degr = 0.001;
  k_irs1_polyserp_degr = 0.01;
  kcat51 = 0.87;
  kcat52 = 6.95;
  Km51 = 100;
  Km52 = 100;
  k42f = 5e-5;
  k42r = 5e-7;
  k43f = 5e-5;
  k43r = 5e-7;
  alpha_ox = 5;
  k32f = 0.0006;
  k32r = 0.0004;
  by_jnk_phos_factor = 2;
  by_ikk_phos_factor = 3;
  t_ins = 15;
  indicator_jnk = 0;
  indicator_foxo = 0;
  R100_ksynth = 0.0055;
  R101_ktr = 0.1818182;
  R102_ktr = 0.055;
  R103_ktr = 0.25;
  R104_ktr = 0.125;
  R105_ktr = 0.1818182;
  R106_ktr = 0.055;
  R107_ktr = 0.25;
  R108_ktr = 0.125;
  R109_ktr = 1.818182;
  R110_ktr = 0.0055;
  R111_ktr = 0.25;
  R112_ktr = 0.125;
  R113_ktr = 1.818182;
  R114_ktr = 0.0055;
  R115_ktr = 0.25;
  R116_ktr = 0.125;
  R117_ktr = 0.09090909;
  R118_ktr = 0.55;
  R119_ktr = 0.25;
  R120_ktr = 0.125;
  R121_ktr = 0.09090909;
  R122_ktr = 0.55;
  R123_ktr = 0.25;
  R124_ktr = 0.125;
  R125_ktr = 0.9090909;
  R126_ktr = 0.055;
  R127_ktr = 0.25;
  R128_ktr = 0.125;
  R129_ktr = 0.9090909;
  R130_ktr = 0.055;
  R131_ktr = 0.25;
  R132_ktr = 0.125;
  R133_ktr = 0.01818182;
  R134_ktr = 0.55;
  R135_ktr = 0.125;
  R136_ktr = 0.125;
  R137_ktr = 0.01818182;
  R138_ktr = 0.55;
  R139_ktr = 0.125;
  R140_ktr = 0.125;
  R141_ktr = 0.1818182;
  R142_ktr = 0.055;
  R143_ktr = 0.125;
  R144_ktr = 0.125;
  R145_ktr = 0.1818182;
  R146_ktr = 0.055;
  R147_ktr = 0.125;
  R148_ktr = 0.125;
  R149_ktr = 0.009090909;
  R150_ktr = 5.5;
  R151_ktr = 0.125;
  R152_ktr = 0.125;
  R153_ktr = 0.009090909;
  R154_ktr = 5.5;
  R155_ktr = 0.125;
  R156_ktr = 0.125;
  R157_ktr = 0.09090909;
  R158_ktr = 0.55;
  R159_ktr = 0.125;
  R160_ktr = 0.125;
  R161_ktr = 0.09090909;
  R162_ktr = 0.55;
  R163_ktr = 0.125;
  R164_ktr = 0.125;
  R165_kkin = 0.0003;
  R166_kkin = 0.0003;
  R167_kkin = 0.0003;
  R168_kkin = 0.0003;
  R169_kkin = 0.0003;
  R170_kkin = 0.0003;
  R171_kkin = 0.0003;
  R172_kkin = 0.0003;
  R173_kkin = 0.0003;
  R174_kkin = 0.0003;
  R175_kkin = 0.0003;
  R176_kkin = 0.0003;
  R177_kkin = 0.0003;
  R178_kkin = 0.0003;
  R179_kkin = 0.0003;
  R180_kkin = 0.0003;
  R181_kkin = 0.0003;
  R182_kkin = 0.0003;
  R183_kkin = 0.0003;
  R184_kkin = 0.0003;
  R185_kkin = 0.0003;
  R186_kkin = 0.0003;
  R187_kkin = 0.0003;
  R188_kkin = 0.0003;
  R189_kkin = 0.0003;
  R190_kkin = 0.0003;
  R191_kkin = 0.0003;
  R192_kkin = 0.0003;
  R193_kkin = 0.0003;
  R194_kkin = 0.0003;
  R195_kkin = 0.0003;
  R196_kkin = 0.0003;
  R197_kkin = 0.0003;
  R198_kkin = 0.0003;
  R199_kkin = 0.0003;
  R200_kkin = 0.0003;
  R201_kkin = 0.0003;
  R202_kkin = 0.0003;
  R203_kkin = 0.0003;
  R204_kkin = 0.0003;
  R205_kkin = 0.0003;
  R206_kkin = 0.0003;
  R207_kkin = 0.0003;
  R208_kkin = 0.0003;
  R209_kkin = 0.0003;
  R210_kkin = 0.0003;
  R211_kkin = 0.0003;
  R212_kkin = 0.0003;
  R213_kdephos = 1e-6;
  R214_kdephos = 1e-6;
  R215_kdephos = 1e-6;
  R216_kdephos = 1e-6;
  R217_kdephos = 1e-6;
  R218_kdephos = 1e-6;
  R219_kdephos = 1e-6;
  R220_kdephos = 1e-6;
  R221_kdephos = 1e-6;
  R222_kdephos = 1e-6;
  R223_kdephos = 1e-6;
  R224_kdephos = 1e-6;
  R225_kdephos = 1e-6;
  R226_kdephos = 1e-6;
  R227_kdephos = 1e-6;
  R228_kdephos = 1e-6;
  R229_kdephos = 1e-6;
  R230_kdephos = 1e-6;
  R231_kdephos = 1e-6;
  R232_kdephos = 1e-6;
  R233_kdephos = 1e-6;
  R234_kdephos = 1e-6;
  R235_kdephos = 1e-6;
  R236_kdephos = 1e-6;
  R237_kkin = 5e-5;
  R238_kkin = 5e-5;
  R239_kkin = 5e-5;
  R240_kkin = 5e-5;
  R241_kkin = 5e-5;
  R242_kkin = 5e-5;
  R243_kkin = 5e-5;
  R244_kkin = 5e-5;
  R245_kkin = 5e-5;
  R246_kkin = 5e-5;
  R247_kkin = 5e-5;
  R248_kkin = 5e-5;
  R249_kdephos = 1e-6;
  R250_kdephos = 1e-6;
  R251_kdephos = 1e-6;
  R252_kdephos = 1e-6;
  R253_kdephos = 1e-6;
  R254_kdephos = 1e-6;
  R255_kdephos = 1e-6;
  R256_kdephos = 1e-6;
  R257_kdephos = 1e-6;
  R258_kdephos = 1e-6;
  R259_kdephos = 1e-6;
  R260_kdephos = 1e-6;
  R261_kkin = 5e-5;
  R262_kkin = 5e-5;
  R263_kkin = 5e-5;
  R264_kkin = 5e-5;
  R265_kkin = 5e-5;
  R266_kkin = 5e-5;
  R267_kkin = 5e-5;
  R268_kkin = 5e-5;
  R269_kkin = 5e-5;
  R270_kkin = 5e-5;
  R271_kkin = 5e-5;
  R272_kkin = 5e-5;
  R273_kdephos = 1e-6;
  R274_kdephos = 1e-6;
  R275_kdephos = 1e-6;
  R276_kdephos = 1e-6;
  R277_kdephos = 1e-6;
  R278_kdephos = 1e-6;
  R279_kdephos = 1e-6;
  R280_kdephos = 1e-6;
  R281_kdephos = 1e-6;
  R282_kdephos = 1e-6;
  R283_kdephos = 1e-6;
  R284_kdephos = 1e-6;
  R285_kkin = 5e-5;
  R286_kkin = 5e-5;
  R287_kkin = 5e-5;
  R288_kkin = 5e-5;
  R289_kkin = 5e-5;
  R290_kkin = 5e-5;
  R291_kdephos = 1e-6;
  R292_kdephos = 1e-6;
  R293_kdephos = 1e-6;
  R294_kdephos = 1e-6;
  R295_kdephos = 1e-6;
  R296_kdephos = 1e-6;
  R297_kkin = 5e-5;
  R298_kkin = 5e-5;
  R299_kkin = 5e-5;
  R300_kkin = 5e-5;
  R301_kkin = 5e-5;
  R302_kkin = 5e-5;
  R303_kdephos = 1e-6;
  R304_kdephos = 1e-6;
  R305_kdephos = 1e-6;
  R306_kdephos = 1e-6;
  R307_kdephos = 1e-6;
  R308_kdephos = 1e-6;
  R309_kkin = 5e-5;
  R310_kkin = 5e-5;
  R311_kkin = 5e-5;
  R312_kkin = 5e-5;
  R313_kkin = 5e-5;
  R314_kkin = 5e-5;
  R315_kdephos = 1e-6;
  R316_kdephos = 1e-6;
  R317_kdephos = 1e-6;
  R318_kdephos = 1e-6;
  R319_kdephos = 1e-6;
  R320_kdephos = 1e-6;
  R321_kkin = 5e-5;
  R322_kkin = 5e-5;
  R323_kkin = 5e-5;
  R324_kkin = 5e-5;
  R325_kkin = 5e-5;
  R326_kkin = 5e-5;
  R327_kdephos = 1e-6;
  R328_kdephos = 1e-6;
  R329_kdephos = 1e-6;
  R330_kdephos = 1e-6;
  R331_kdephos = 1e-6;
  R332_kdephos = 1e-6;
  R333_kub = 1e-6;
  R334_kub = 1e-6;
  R335_kub = 1e-6;
  R336_kub = 1e-6;
  R337_kub = 1e-6;
  R338_kub = 1e-6;
  R339_kub = 2.2e-5;
  R340_kub = 2.2e-5;
  R341_kub = 2.2e-5;
  R342_kub = 2.2e-5;
  R343_kub = 2.2e-5;
  R344_kub = 2.2e-5;
  R345_kub = 3e-6;
  R346_kub = 3e-6;
  R347_kub = 3e-6;
  R348_kub = 3e-6;
  R349_kub = 3e-6;
  R350_kub = 3e-6;
  R351_kub = 6.6e-5;
  R352_kub = 6.6e-5;
  R353_kub = 6.6e-5;
  R354_kub = 6.6e-5;
  R355_kub = 6.6e-5;
  R356_kub = 6.6e-5;
  R357_kdeg = 0.0001;
  R358_kdeg = 0.0001;
  R359_kdeg = 0.0001;
  R360_kdeg = 0.0001;
  R361_kdeg = 0.0001;
  R362_kdeg = 0.0001;
  R363_kdeg = 0.0001;
  R364_kdeg = 0.0001;
  R365_ktranscr = 0.24;
  R366_ktranscr = 0.95;
  R367_ktranscr = 0.24;
  R368_ktranscr = 0.95;
  R369_ktranscr = 0.24;
  R370_ktranscr = 0.95;
  R371_ktranscr = 0.24;
  R372_ktranscr = 0.95;
  R373_ktranscr = 0.24;
  R374_ktranscr = 0.95;
  R375_ktranscr = 0.24;
  R376_ktranscr = 0.95;
  R377_ktranscr = 0.24;
  R378_ktranscr = 0.95;
  R379_ktranscr = 0.24;
  R380_ktranscr = 0.95;
  R381_ktranscr = 0.24;
  R382_ktranscr = 0.95;
  R383_ktranscr = 0.24;
  R384_ktranscr = 0.95;
  R385_ktranscr = 0.24;
  R386_ktranscr = 0.95;
  R387_ktranscr = 0.24;
  R388_ktranscr = 0.95;
  R389_ktranscr = 0.24;
  R390_ktranscr = 0.95;
  R391_ktranscr = 0.24;
  R392_ktranscr = 0.95;
  R393_ktranscr = 0.24;
  R394_ktranscr = 0.95;
  R395_ktranscr = 0.24;
  R396_ktranscr = 0.95;
  R397_k_basal_transcr = 5;
  R398_kexp = 0.22;
  R399_kmdeg = 5.622;
  R400_ktransl = 2.46;
  R401_kpdeg = 0.0044;
  R402_k_basal_transcr = 15;
  R403_kexp = 0.22;
  R404_kmdeg = 5.622;
  R405_ktransl = 1.23;
  R406_kpdeg = 0.0019;

  // Assignment rules:
  InR_bound := Ins_2_InR_P + Ins_InR_P + Ins_InR;
  InR_active := Ins_2_InR_P + Ins_InR_P;
  InR_tot := InR + Ins_InR + Ins_InR_P + Ins_2_InR_P + cytoplasm_InR + cytoplasm_Ins_2_InR_P + cytoplasm_Ins_InR_P;
  insconc := Ins/(navo*vextracellular);
  PI345P3_mol := sc_pip*PI345P3;
  PIP2_mol := sc_pip*PIP2;
  PTP1B_plus_PTP1B_ox := PTP1B + PTP1B_ox;
  NOX_total := NOX_inact + NOX + NOX_deact;
  PTEN_plus_PTEN_ox := PTEN + PTEN_ox;
  k_ros_perm := ros_perm*membrane_area;
  ros_ext_conc := sc_ros*extracellular_ROS/(navo*extracellular);
  ros_cyto_conc := sc_ros*ROS/(navo*cytoplasm);
  IRS_total := IRS1 + IRS1_TyrP + IRS1_PolySerP + IRS1_TyrP_PolySerP;
  JNK_plus_JNK_P := JNK + JNK_P;
  IKK_plus_IKK_P := IKK + IKK_P;
  DUSP_plus_DUSP_ox := DUSP + DUSP_ox;
  rosconc := ROS/(navo*vcytoplasm);
  Foxo1_Pa0_tot := cytoplasm_Foxo1_Pa0_Pd0_Pe0_pUb0 + nucleus_Foxo1_Pa0_Pd0_Pe0_pUb0 + dnabound_Foxo1_Pa0_Pd0_Pe0_pUb0 + cytoplasm_Foxo1_Pa0_Pd0_Pe0_pUb1 + nucleus_Foxo1_Pa0_Pd0_Pe0_pUb1 + dnabound_Foxo1_Pa0_Pd0_Pe0_pUb1 + cytoplasm_Foxo1_Pa0_Pd0_Pe1_pUb0 + nucleus_Foxo1_Pa0_Pd0_Pe1_pUb0 + dnabound_Foxo1_Pa0_Pd0_Pe1_pUb0 + cytoplasm_Foxo1_Pa0_Pd0_Pe1_pUb1 + nucleus_Foxo1_Pa0_Pd0_Pe1_pUb1 + dnabound_Foxo1_Pa0_Pd0_Pe1_pUb1 + cytoplasm_Foxo1_Pa0_Pd1_Pe0_pUb0 + nucleus_Foxo1_Pa0_Pd1_Pe0_pUb0 + dnabound_Foxo1_Pa0_Pd1_Pe0_pUb0 + cytoplasm_Foxo1_Pa0_Pd1_Pe0_pUb1 + nucleus_Foxo1_Pa0_Pd1_Pe0_pUb1 + dnabound_Foxo1_Pa0_Pd1_Pe0_pUb1 + cytoplasm_Foxo1_Pa0_Pd1_Pe1_pUb0 + nucleus_Foxo1_Pa0_Pd1_Pe1_pUb0 + dnabound_Foxo1_Pa0_Pd1_Pe1_pUb0 + cytoplasm_Foxo1_Pa0_Pd1_Pe1_pUb1 + nucleus_Foxo1_Pa0_Pd1_Pe1_pUb1 + dnabound_Foxo1_Pa0_Pd1_Pe1_pUb1;
  Foxo1_Pa1_tot := cytoplasm_Foxo1_Pa1_Pd0_Pe0_pUb0 + nucleus_Foxo1_Pa1_Pd0_Pe0_pUb0 + dnabound_Foxo1_Pa1_Pd0_Pe0_pUb0 + cytoplasm_Foxo1_Pa1_Pd0_Pe0_pUb1 + nucleus_Foxo1_Pa1_Pd0_Pe0_pUb1 + dnabound_Foxo1_Pa1_Pd0_Pe0_pUb1 + cytoplasm_Foxo1_Pa1_Pd0_Pe1_pUb0 + nucleus_Foxo1_Pa1_Pd0_Pe1_pUb0 + dnabound_Foxo1_Pa1_Pd0_Pe1_pUb0 + cytoplasm_Foxo1_Pa1_Pd0_Pe1_pUb1 + nucleus_Foxo1_Pa1_Pd0_Pe1_pUb1 + dnabound_Foxo1_Pa1_Pd0_Pe1_pUb1 + cytoplasm_Foxo1_Pa1_Pd1_Pe0_pUb0 + nucleus_Foxo1_Pa1_Pd1_Pe0_pUb0 + dnabound_Foxo1_Pa1_Pd1_Pe0_pUb0 + cytoplasm_Foxo1_Pa1_Pd1_Pe0_pUb1 + nucleus_Foxo1_Pa1_Pd1_Pe0_pUb1 + dnabound_Foxo1_Pa1_Pd1_Pe0_pUb1 + cytoplasm_Foxo1_Pa1_Pd1_Pe1_pUb0 + nucleus_Foxo1_Pa1_Pd1_Pe1_pUb0 + dnabound_Foxo1_Pa1_Pd1_Pe1_pUb0 + cytoplasm_Foxo1_Pa1_Pd1_Pe1_pUb1 + nucleus_Foxo1_Pa1_Pd1_Pe1_pUb1 + dnabound_Foxo1_Pa1_Pd1_Pe1_pUb1;
  Foxo1_Pd0_tot := cytoplasm_Foxo1_Pa0_Pd0_Pe0_pUb0 + nucleus_Foxo1_Pa0_Pd0_Pe0_pUb0 + dnabound_Foxo1_Pa0_Pd0_Pe0_pUb0 + cytoplasm_Foxo1_Pa0_Pd0_Pe0_pUb1 + nucleus_Foxo1_Pa0_Pd0_Pe0_pUb1 + dnabound_Foxo1_Pa0_Pd0_Pe0_pUb1 + cytoplasm_Foxo1_Pa0_Pd0_Pe1_pUb0 + nucleus_Foxo1_Pa0_Pd0_Pe1_pUb0 + dnabound_Foxo1_Pa0_Pd0_Pe1_pUb0 + cytoplasm_Foxo1_Pa0_Pd0_Pe1_pUb1 + nucleus_Foxo1_Pa0_Pd0_Pe1_pUb1 + dnabound_Foxo1_Pa0_Pd0_Pe1_pUb1 + cytoplasm_Foxo1_Pa1_Pd0_Pe0_pUb0 + nucleus_Foxo1_Pa1_Pd0_Pe0_pUb0 + dnabound_Foxo1_Pa1_Pd0_Pe0_pUb0 + cytoplasm_Foxo1_Pa1_Pd0_Pe0_pUb1 + nucleus_Foxo1_Pa1_Pd0_Pe0_pUb1 + dnabound_Foxo1_Pa1_Pd0_Pe0_pUb1 + cytoplasm_Foxo1_Pa1_Pd0_Pe1_pUb0 + nucleus_Foxo1_Pa1_Pd0_Pe1_pUb0 + dnabound_Foxo1_Pa1_Pd0_Pe1_pUb0 + cytoplasm_Foxo1_Pa1_Pd0_Pe1_pUb1 + nucleus_Foxo1_Pa1_Pd0_Pe1_pUb1 + dnabound_Foxo1_Pa1_Pd0_Pe1_pUb1;
  Foxo1_Pd1_tot := cytoplasm_Foxo1_Pa0_Pd1_Pe0_pUb0 + nucleus_Foxo1_Pa0_Pd1_Pe0_pUb0 + dnabound_Foxo1_Pa0_Pd1_Pe0_pUb0 + cytoplasm_Foxo1_Pa0_Pd1_Pe0_pUb1 + nucleus_Foxo1_Pa0_Pd1_Pe0_pUb1 + dnabound_Foxo1_Pa0_Pd1_Pe0_pUb1 + cytoplasm_Foxo1_Pa0_Pd1_Pe1_pUb0 + nucleus_Foxo1_Pa0_Pd1_Pe1_pUb0 + dnabound_Foxo1_Pa0_Pd1_Pe1_pUb0 + cytoplasm_Foxo1_Pa0_Pd1_Pe1_pUb1 + nucleus_Foxo1_Pa0_Pd1_Pe1_pUb1 + dnabound_Foxo1_Pa0_Pd1_Pe1_pUb1 + cytoplasm_Foxo1_Pa1_Pd1_Pe0_pUb0 + nucleus_Foxo1_Pa1_Pd1_Pe0_pUb0 + dnabound_Foxo1_Pa1_Pd1_Pe0_pUb0 + cytoplasm_Foxo1_Pa1_Pd1_Pe0_pUb1 + nucleus_Foxo1_Pa1_Pd1_Pe0_pUb1 + dnabound_Foxo1_Pa1_Pd1_Pe0_pUb1 + cytoplasm_Foxo1_Pa1_Pd1_Pe1_pUb0 + nucleus_Foxo1_Pa1_Pd1_Pe1_pUb0 + dnabound_Foxo1_Pa1_Pd1_Pe1_pUb0 + cytoplasm_Foxo1_Pa1_Pd1_Pe1_pUb1 + nucleus_Foxo1_Pa1_Pd1_Pe1_pUb1 + dnabound_Foxo1_Pa1_Pd1_Pe1_pUb1;
  Foxo1_Pe0_tot := cytoplasm_Foxo1_Pa0_Pd0_Pe0_pUb0 + nucleus_Foxo1_Pa0_Pd0_Pe0_pUb0 + dnabound_Foxo1_Pa0_Pd0_Pe0_pUb0 + cytoplasm_Foxo1_Pa0_Pd0_Pe0_pUb1 + nucleus_Foxo1_Pa0_Pd0_Pe0_pUb1 + dnabound_Foxo1_Pa0_Pd0_Pe0_pUb1 + cytoplasm_Foxo1_Pa0_Pd1_Pe0_pUb0 + nucleus_Foxo1_Pa0_Pd1_Pe0_pUb0 + dnabound_Foxo1_Pa0_Pd1_Pe0_pUb0 + cytoplasm_Foxo1_Pa0_Pd1_Pe0_pUb1 + nucleus_Foxo1_Pa0_Pd1_Pe0_pUb1 + dnabound_Foxo1_Pa0_Pd1_Pe0_pUb1 + cytoplasm_Foxo1_Pa1_Pd0_Pe0_pUb0 + nucleus_Foxo1_Pa1_Pd0_Pe0_pUb0 + dnabound_Foxo1_Pa1_Pd0_Pe0_pUb0 + cytoplasm_Foxo1_Pa1_Pd0_Pe0_pUb1 + nucleus_Foxo1_Pa1_Pd0_Pe0_pUb1 + dnabound_Foxo1_Pa1_Pd0_Pe0_pUb1 + cytoplasm_Foxo1_Pa1_Pd1_Pe0_pUb0 + nucleus_Foxo1_Pa1_Pd1_Pe0_pUb0 + dnabound_Foxo1_Pa1_Pd1_Pe0_pUb0 + cytoplasm_Foxo1_Pa1_Pd1_Pe0_pUb1 + nucleus_Foxo1_Pa1_Pd1_Pe0_pUb1 + dnabound_Foxo1_Pa1_Pd1_Pe0_pUb1;
  Foxo1_Pe1_tot := cytoplasm_Foxo1_Pa0_Pd0_Pe1_pUb0 + nucleus_Foxo1_Pa0_Pd0_Pe1_pUb0 + dnabound_Foxo1_Pa0_Pd0_Pe1_pUb0 + cytoplasm_Foxo1_Pa0_Pd0_Pe1_pUb1 + nucleus_Foxo1_Pa0_Pd0_Pe1_pUb1 + dnabound_Foxo1_Pa0_Pd0_Pe1_pUb1 + cytoplasm_Foxo1_Pa0_Pd1_Pe1_pUb0 + nucleus_Foxo1_Pa0_Pd1_Pe1_pUb0 + dnabound_Foxo1_Pa0_Pd1_Pe1_pUb0 + cytoplasm_Foxo1_Pa0_Pd1_Pe1_pUb1 + nucleus_Foxo1_Pa0_Pd1_Pe1_pUb1 + dnabound_Foxo1_Pa0_Pd1_Pe1_pUb1 + cytoplasm_Foxo1_Pa1_Pd0_Pe1_pUb0 + nucleus_Foxo1_Pa1_Pd0_Pe1_pUb0 + dnabound_Foxo1_Pa1_Pd0_Pe1_pUb0 + cytoplasm_Foxo1_Pa1_Pd0_Pe1_pUb1 + nucleus_Foxo1_Pa1_Pd0_Pe1_pUb1 + dnabound_Foxo1_Pa1_Pd0_Pe1_pUb1 + cytoplasm_Foxo1_Pa1_Pd1_Pe1_pUb0 + nucleus_Foxo1_Pa1_Pd1_Pe1_pUb0 + dnabound_Foxo1_Pa1_Pd1_Pe1_pUb0 + cytoplasm_Foxo1_Pa1_Pd1_Pe1_pUb1 + nucleus_Foxo1_Pa1_Pd1_Pe1_pUb1 + dnabound_Foxo1_Pa1_Pd1_Pe1_pUb1;
  Foxo1_pUb0_tot := cytoplasm_Foxo1_Pa0_Pd0_Pe0_pUb0 + nucleus_Foxo1_Pa0_Pd0_Pe0_pUb0 + dnabound_Foxo1_Pa0_Pd0_Pe0_pUb0 + cytoplasm_Foxo1_Pa0_Pd0_Pe1_pUb0 + nucleus_Foxo1_Pa0_Pd0_Pe1_pUb0 + dnabound_Foxo1_Pa0_Pd0_Pe1_pUb0 + cytoplasm_Foxo1_Pa0_Pd1_Pe0_pUb0 + nucleus_Foxo1_Pa0_Pd1_Pe0_pUb0 + dnabound_Foxo1_Pa0_Pd1_Pe0_pUb0 + cytoplasm_Foxo1_Pa0_Pd1_Pe1_pUb0 + nucleus_Foxo1_Pa0_Pd1_Pe1_pUb0 + dnabound_Foxo1_Pa0_Pd1_Pe1_pUb0 + cytoplasm_Foxo1_Pa1_Pd0_Pe0_pUb0 + nucleus_Foxo1_Pa1_Pd0_Pe0_pUb0 + dnabound_Foxo1_Pa1_Pd0_Pe0_pUb0 + cytoplasm_Foxo1_Pa1_Pd0_Pe1_pUb0 + nucleus_Foxo1_Pa1_Pd0_Pe1_pUb0 + dnabound_Foxo1_Pa1_Pd0_Pe1_pUb0 + cytoplasm_Foxo1_Pa1_Pd1_Pe0_pUb0 + nucleus_Foxo1_Pa1_Pd1_Pe0_pUb0 + dnabound_Foxo1_Pa1_Pd1_Pe0_pUb0 + cytoplasm_Foxo1_Pa1_Pd1_Pe1_pUb0 + nucleus_Foxo1_Pa1_Pd1_Pe1_pUb0 + dnabound_Foxo1_Pa1_Pd1_Pe1_pUb0;
  Foxo1_pUb1_tot := cytoplasm_Foxo1_Pa0_Pd0_Pe0_pUb1 + nucleus_Foxo1_Pa0_Pd0_Pe0_pUb1 + dnabound_Foxo1_Pa0_Pd0_Pe0_pUb1 + cytoplasm_Foxo1_Pa0_Pd0_Pe1_pUb1 + nucleus_Foxo1_Pa0_Pd0_Pe1_pUb1 + dnabound_Foxo1_Pa0_Pd0_Pe1_pUb1 + cytoplasm_Foxo1_Pa0_Pd1_Pe0_pUb1 + nucleus_Foxo1_Pa0_Pd1_Pe0_pUb1 + dnabound_Foxo1_Pa0_Pd1_Pe0_pUb1 + cytoplasm_Foxo1_Pa0_Pd1_Pe1_pUb1 + nucleus_Foxo1_Pa0_Pd1_Pe1_pUb1 + dnabound_Foxo1_Pa0_Pd1_Pe1_pUb1 + cytoplasm_Foxo1_Pa1_Pd0_Pe0_pUb1 + nucleus_Foxo1_Pa1_Pd0_Pe0_pUb1 + dnabound_Foxo1_Pa1_Pd0_Pe0_pUb1 + cytoplasm_Foxo1_Pa1_Pd0_Pe1_pUb1 + nucleus_Foxo1_Pa1_Pd0_Pe1_pUb1 + dnabound_Foxo1_Pa1_Pd0_Pe1_pUb1 + cytoplasm_Foxo1_Pa1_Pd1_Pe0_pUb1 + nucleus_Foxo1_Pa1_Pd1_Pe0_pUb1 + dnabound_Foxo1_Pa1_Pd1_Pe0_pUb1 + cytoplasm_Foxo1_Pa1_Pd1_Pe1_pUb1 + nucleus_Foxo1_Pa1_Pd1_Pe1_pUb1 + dnabound_Foxo1_Pa1_Pd1_Pe1_pUb1;
  cytoplasm_Foxo1_tot := cytoplasm_Foxo1_Pa0_Pd0_Pe0_pUb0 + cytoplasm_Foxo1_Pa0_Pd0_Pe0_pUb1 + cytoplasm_Foxo1_Pa0_Pd0_Pe1_pUb0 + cytoplasm_Foxo1_Pa0_Pd0_Pe1_pUb1 + cytoplasm_Foxo1_Pa0_Pd1_Pe0_pUb0 + cytoplasm_Foxo1_Pa0_Pd1_Pe0_pUb1 + cytoplasm_Foxo1_Pa0_Pd1_Pe1_pUb0 + cytoplasm_Foxo1_Pa0_Pd1_Pe1_pUb1 + cytoplasm_Foxo1_Pa1_Pd0_Pe0_pUb0 + cytoplasm_Foxo1_Pa1_Pd0_Pe0_pUb1 + cytoplasm_Foxo1_Pa1_Pd0_Pe1_pUb0 + cytoplasm_Foxo1_Pa1_Pd0_Pe1_pUb1 + cytoplasm_Foxo1_Pa1_Pd1_Pe0_pUb0 + cytoplasm_Foxo1_Pa1_Pd1_Pe0_pUb1 + cytoplasm_Foxo1_Pa1_Pd1_Pe1_pUb0 + cytoplasm_Foxo1_Pa1_Pd1_Pe1_pUb1;
  nucleus_Foxo1_tot := nucleus_Foxo1_Pa0_Pd0_Pe0_pUb0 + nucleus_Foxo1_Pa0_Pd0_Pe0_pUb1 + nucleus_Foxo1_Pa0_Pd0_Pe1_pUb0 + nucleus_Foxo1_Pa0_Pd0_Pe1_pUb1 + nucleus_Foxo1_Pa0_Pd1_Pe0_pUb0 + nucleus_Foxo1_Pa0_Pd1_Pe0_pUb1 + nucleus_Foxo1_Pa0_Pd1_Pe1_pUb0 + nucleus_Foxo1_Pa0_Pd1_Pe1_pUb1 + nucleus_Foxo1_Pa1_Pd0_Pe0_pUb0 + nucleus_Foxo1_Pa1_Pd0_Pe0_pUb1 + nucleus_Foxo1_Pa1_Pd0_Pe1_pUb0 + nucleus_Foxo1_Pa1_Pd0_Pe1_pUb1 + nucleus_Foxo1_Pa1_Pd1_Pe0_pUb0 + nucleus_Foxo1_Pa1_Pd1_Pe0_pUb1 + nucleus_Foxo1_Pa1_Pd1_Pe1_pUb0 + nucleus_Foxo1_Pa1_Pd1_Pe1_pUb1;
  dnabound_Foxo1_tot := dnabound_Foxo1_Pa0_Pd0_Pe0_pUb0 + dnabound_Foxo1_Pa0_Pd0_Pe0_pUb1 + dnabound_Foxo1_Pa0_Pd0_Pe1_pUb0 + dnabound_Foxo1_Pa0_Pd0_Pe1_pUb1 + dnabound_Foxo1_Pa0_Pd1_Pe0_pUb0 + dnabound_Foxo1_Pa0_Pd1_Pe0_pUb1 + dnabound_Foxo1_Pa0_Pd1_Pe1_pUb0 + dnabound_Foxo1_Pa0_Pd1_Pe1_pUb1 + dnabound_Foxo1_Pa1_Pd0_Pe0_pUb0 + dnabound_Foxo1_Pa1_Pd0_Pe0_pUb1 + dnabound_Foxo1_Pa1_Pd0_Pe1_pUb0 + dnabound_Foxo1_Pa1_Pd0_Pe1_pUb1 + dnabound_Foxo1_Pa1_Pd1_Pe0_pUb0 + dnabound_Foxo1_Pa1_Pd1_Pe0_pUb1 + dnabound_Foxo1_Pa1_Pd1_Pe1_pUb0 + dnabound_Foxo1_Pa1_Pd1_Pe1_pUb1;
  Foxo1_all := cytoplasm_Foxo1_tot + nucleus_Foxo1_tot + dnabound_Foxo1_tot;

  // Reactions:
  R1f: $Ins + InR => Ins_InR; k1*Ins*InR;
  R1r: Ins_InR => InR + $Ins; kminus1*Ins_InR;
  R2: Ins_InR => Ins_InR_P; k3*Ins_InR;
  R3f: $Ins + Ins_InR_P => Ins_2_InR_P; k2*Ins*Ins_InR_P;
  R3r: Ins_2_InR_P => Ins_InR_P + $Ins; kminus2*Ins_2_InR_P;
  R4: Ins_InR_P => InR; kminus3*PTP1B*Ins_InR_P;  // modifiers: PTP1B
  R5f: InR => cytoplasm_InR; k4*InR;
  R5r: cytoplasm_InR => InR; kminus4*cytoplasm_InR;
  R6f: Ins_2_InR_P => cytoplasm_Ins_2_InR_P; k4prime*Ins_2_InR_P;
  R6r: cytoplasm_Ins_2_InR_P => Ins_2_InR_P; kminus4prime*cytoplasm_Ins_2_InR_P;
  R7f: Ins_InR_P => cytoplasm_Ins_InR_P; k4prime*Ins_InR_P;
  R7r: cytoplasm_Ins_InR_P => Ins_InR_P; kminus4prime*cytoplasm_Ins_InR_P;
  R10: cytoplasm_Ins_2_InR_P => cytoplasm_InR; k6*PTP1B*cytoplasm_Ins_2_InR_P;  // modifiers: PTP1B
  R11: cytoplasm_Ins_InR_P => cytoplasm_InR; k6*PTP1B*cytoplasm_Ins_InR_P;  // modifiers: PTP1B
  R14f: PIP2 => PI345P3; (k9_basal + k9*IRS1_TyrP_PI3K)*PIP2;  // modifiers: IRS1_TyrP_PI3K
  R14r: PI345P3 => PIP2; (kminus9_basal + kminus9*PTEN)*PI345P3;  // modifiers: PTEN
  R16f: Akt => Akt_P2; k11*Akt*piecewise(PI345P3 - pip3_basal, PI345P3 > pip3_basal, 0);  // modifiers: PI345P3
  R16r: Akt_P2 => Akt; kminus11*PP2A*Akt_P2;  // modifiers: PP2A
  R16a_f: AS160 => AS160_P; kr16a*Akt_P2*AS160;  // modifiers: Akt_P2
  R16a_r: AS160_P => AS160; kminusr16a*PP2A*AS160_P;  // modifiers: PP2A
  R17f: PKC => PKC_P; k12*PKC*piecewise(PI345P3 - pip3_basal, PI345P3 > pip3_basal, 0);  // modifiers: PI345P3
  R17r: PKC_P => PKC; kminus12*PP2A*PKC_P;  // modifiers: PP2A
  R20f: cytoplasm_GLUT4 => cellsurface_GLUT4; (k13_basal + k13*AS160_P)*cytoplasm_GLUT4;  // modifiers: AS160_P
  R20r: cellsurface_GLUT4 => cytoplasm_GLUT4; kminus13*cellsurface_GLUT4;
  R30f: PTP1B + ROS => PTP1B_ox + ROS; k30f*PTP1B*ROS;
  R30r: PTP1B_ox + GSH => PTP1B + GSH; k30r*PTP1B_ox*GSH;
  R31f: PTEN + ROS => PTEN_ox + ROS; k31f*PTEN*ROS;
  R31r: PTEN_ox + GSH => PTEN + GSH; k31r*PTEN_ox*GSH;
  R34f: NOX_inact + $Ins => NOX + $Ins; k34f*NOX_inact*Ins;
  R34r1: NOX => NOX_deact; k34r1*NOX*NOX;
  R34r2: NOX => NOX_inact; k34r2*NOX;
  R34r3: NOX_deact => NOX_inact; k34r3*NOX_deact*NOX_deact;
  R35f: NOX => ROS + NOX; k35f*NOX;
  R35r: ROS + cytoplasm_SOD2 => cytoplasm_SOD2; k35r*ROS*cytoplasm_SOD2;
  R36f: $Mt => $Mt + ROS; k36f*Mt;
  R37f: $extracellular_ROS => ROS; k_ros_perm*extracellular_ROS;
  R37r: ROS => $extracellular_ROS; k_ros_perm*(extracellular/cytoplasm)*ROS;
  R38f: GSH => GSSG; k38f*GSH*ROS;  // modifiers: ROS
  R38r: GSSG => GSH; k38r*GSSG;
  R12f: IRS1 => IRS1_TyrP; cyto_vol*(k7*IRS1*(Ins_2_InR_P + Ins_InR_P)/IRp);  // modifiers: Ins_2_InR_P, Ins_InR_P
  R12r: IRS1_TyrP => IRS1; cyto_vol*kminus7a*PTP1B*IRS1_TyrP;  // modifiers: PTP1B
  R12_a_f: IRS1 => IRS1_PolySerP; cyto_vol*k2psp*IRS1*PKC_P;  // modifiers: PKC_P
  R12_a_r: IRS1_PolySerP => IRS1; cyto_vol*kminus7b*PP2A*IRS1_PolySerP;  // modifiers: PP2A
  R12_b_f: IRS1_TyrP => IRS1_TyrP_PolySerP; cyto_vol*k2psp*IRS1_TyrP*PKC_P;  // modifiers: PKC_P
  R12_b_r: IRS1_TyrP_PolySerP => IRS1_TyrP; cyto_vol*kminus7b*PP2A*IRS1_TyrP_PolySerP;  // modifiers: PP2A
  R13f: PI3K + IRS1_TyrP => IRS1_TyrP_PI3K; cyto_vol*k8*IRS1_TyrP*PI3K;
  R13r: IRS1_TyrP_PI3K => PI3K + IRS1_TyrP; cyto_vol*kminus8*IRS1_TyrP_PI3K;
  R50f: $NULL => IRS1; k_irs1_basal_syn;
  R50r1: IRS1 => $NULL; IRS1*k_irs1_basal_degr;
  R50r2: IRS1_TyrP => $NULL; IRS1_TyrP*k_irs1_basal_degr;
  R50r3: IRS1_PolySerP => $NULL; IRS1_PolySerP*k_irs1_polyserp_degr;
  R50r4: IRS1_TyrP_PolySerP => $NULL; IRS1_TyrP_PolySerP*k_irs1_polyserp_degr;
  R51f: IRS1 => IRS1_PolySerP; kcat51*IRS1*IKK_P/(Km51 + IRS1);  // modifiers: IKK_P
  R52f: IRS1 => IRS1_PolySerP; kcat52*IRS1*JNK_P/(Km52 + IRS1);  // modifiers: JNK_P
  R42f: JNK => JNK_P; k42f*alpha_ox*JNK*ROS*indicator_jnk;  // modifiers: ROS
  R42r: JNK_P => JNK; k42r*JNK_P*DUSP*indicator_jnk;  // modifiers: DUSP
  R43f: IKK => IKK_P; k43f*IKK*ROS*indicator_jnk;  // modifiers: ROS
  R43r: IKK_P => IKK; k43r*IKK_P*DUSP*indicator_jnk;  // modifiers: DUSP
  R32f: DUSP + ROS => DUSP_ox + ROS; k32f*DUSP*ROS*indicator_jnk;
  R32r: DUSP_ox + GSH => DUSP + GSH; k32r*DUSP_ox*GSH*indicator_jnk;
  Synthesis: $null => cytoplasm_Foxo1_Pa0_Pd0_Pe0_pUb0; E2F1*R100_ksynth*indicator_foxo;  // modifiers: E2F1
  R101: cytoplasm_Foxo1_Pa0_Pd0_Pe0_pUb0 => nucleus_Foxo1_Pa0_Pd0_Pe0_pUb0; cytoplasm_Foxo1_Pa0_Pd0_Pe0_pUb0*R101_ktr*indicator_foxo; R101 is "transport cytoplasm_Foxo1_Pa0_Pd0_Pe0_pUb0 to nucleus_Foxo1_Pa0_Pd0_Pe0_pUb0";
  R102: nucleus_Foxo1_Pa0_Pd0_Pe0_pUb0 => cytoplasm_Foxo1_Pa0_Pd0_Pe0_pUb0; nucleus_Foxo1_Pa0_Pd0_Pe0_pUb0*R102_ktr*indicator_foxo; R102 is "transport nucleus_Foxo1_Pa0_Pd0_Pe0_pUb0 to cytoplasm_Foxo1_Pa0_Pd0_Pe0_pUb0";
  R103: nucleus_Foxo1_Pa0_Pd0_Pe0_pUb0 => dnabound_Foxo1_Pa0_Pd0_Pe0_pUb0; nucleus_Foxo1_Pa0_Pd0_Pe0_pUb0*R103_ktr*indicator_foxo; R103 is "transport nucleus_Foxo1_Pa0_Pd0_Pe0_pUb0 to dnabound_Foxo1_Pa0_Pd0_Pe0_pUb0";
  R104: dnabound_Foxo1_Pa0_Pd0_Pe0_pUb0 => nucleus_Foxo1_Pa0_Pd0_Pe0_pUb0; dnabound_Foxo1_Pa0_Pd0_Pe0_pUb0*R104_ktr*indicator_foxo; R104 is "transport dnabound_Foxo1_Pa0_Pd0_Pe0_pUb0 to nucleus_Foxo1_Pa0_Pd0_Pe0_pUb0";
  R105: cytoplasm_Foxo1_Pa0_Pd0_Pe0_pUb1 => nucleus_Foxo1_Pa0_Pd0_Pe0_pUb1; cytoplasm_Foxo1_Pa0_Pd0_Pe0_pUb1*R105_ktr*indicator_foxo; R105 is "transport cytoplasm_Foxo1_Pa0_Pd0_Pe0_pUb1 to nucleus_Foxo1_Pa0_Pd0_Pe0_pUb1";
  R106: nucleus_Foxo1_Pa0_Pd0_Pe0_pUb1 => cytoplasm_Foxo1_Pa0_Pd0_Pe0_pUb1; nucleus_Foxo1_Pa0_Pd0_Pe0_pUb1*R106_ktr*indicator_foxo; R106 is "transport nucleus_Foxo1_Pa0_Pd0_Pe0_pUb1 to cytoplasm_Foxo1_Pa0_Pd0_Pe0_pUb1";
  R107: nucleus_Foxo1_Pa0_Pd0_Pe0_pUb1 => dnabound_Foxo1_Pa0_Pd0_Pe0_pUb1; nucleus_Foxo1_Pa0_Pd0_Pe0_pUb1*R107_ktr*indicator_foxo; R107 is "transport nucleus_Foxo1_Pa0_Pd0_Pe0_pUb1 to dnabound_Foxo1_Pa0_Pd0_Pe0_pUb1";
  R108: dnabound_Foxo1_Pa0_Pd0_Pe0_pUb1 => nucleus_Foxo1_Pa0_Pd0_Pe0_pUb1; dnabound_Foxo1_Pa0_Pd0_Pe0_pUb1*R108_ktr*indicator_foxo; R108 is "transport dnabound_Foxo1_Pa0_Pd0_Pe0_pUb1 to nucleus_Foxo1_Pa0_Pd0_Pe0_pUb1";
  R109: cytoplasm_Foxo1_Pa0_Pd0_Pe1_pUb0 => nucleus_Foxo1_Pa0_Pd0_Pe1_pUb0; cytoplasm_Foxo1_Pa0_Pd0_Pe1_pUb0*R109_ktr*indicator_foxo; R109 is "transport cytoplasm_Foxo1_Pa0_Pd0_Pe1_pUb0 to nucleus_Foxo1_Pa0_Pd0_Pe1_pUb0";
  R110: nucleus_Foxo1_Pa0_Pd0_Pe1_pUb0 => cytoplasm_Foxo1_Pa0_Pd0_Pe1_pUb0; nucleus_Foxo1_Pa0_Pd0_Pe1_pUb0*R110_ktr*indicator_foxo; R110 is "transport nucleus_Foxo1_Pa0_Pd0_Pe1_pUb0 to cytoplasm_Foxo1_Pa0_Pd0_Pe1_pUb0";
  R111: nucleus_Foxo1_Pa0_Pd0_Pe1_pUb0 => dnabound_Foxo1_Pa0_Pd0_Pe1_pUb0; nucleus_Foxo1_Pa0_Pd0_Pe1_pUb0*R111_ktr*indicator_foxo; R111 is "transport nucleus_Foxo1_Pa0_Pd0_Pe1_pUb0 to dnabound_Foxo1_Pa0_Pd0_Pe1_pUb0";
  R112: dnabound_Foxo1_Pa0_Pd0_Pe1_pUb0 => nucleus_Foxo1_Pa0_Pd0_Pe1_pUb0; dnabound_Foxo1_Pa0_Pd0_Pe1_pUb0*R112_ktr*indicator_foxo; R112 is "transport dnabound_Foxo1_Pa0_Pd0_Pe1_pUb0 to nucleus_Foxo1_Pa0_Pd0_Pe1_pUb0";
  R113: cytoplasm_Foxo1_Pa0_Pd0_Pe1_pUb1 => nucleus_Foxo1_Pa0_Pd0_Pe1_pUb1; cytoplasm_Foxo1_Pa0_Pd0_Pe1_pUb1*R113_ktr*indicator_foxo; R113 is "transport cytoplasm_Foxo1_Pa0_Pd0_Pe1_pUb1 to nucleus_Foxo1_Pa0_Pd0_Pe1_pUb1";
  R114: nucleus_Foxo1_Pa0_Pd0_Pe1_pUb1 => cytoplasm_Foxo1_Pa0_Pd0_Pe1_pUb1; nucleus_Foxo1_Pa0_Pd0_Pe1_pUb1*R114_ktr*indicator_foxo; R114 is "transport nucleus_Foxo1_Pa0_Pd0_Pe1_pUb1 to cytoplasm_Foxo1_Pa0_Pd0_Pe1_pUb1";
  R115: nucleus_Foxo1_Pa0_Pd0_Pe1_pUb1 => dnabound_Foxo1_Pa0_Pd0_Pe1_pUb1; nucleus_Foxo1_Pa0_Pd0_Pe1_pUb1*R115_ktr*indicator_foxo; R115 is "transport nucleus_Foxo1_Pa0_Pd0_Pe1_pUb1 to dnabound_Foxo1_Pa0_Pd0_Pe1_pUb1";
  R116: dnabound_Foxo1_Pa0_Pd0_Pe1_pUb1 => nucleus_Foxo1_Pa0_Pd0_Pe1_pUb1; dnabound_Foxo1_Pa0_Pd0_Pe1_pUb1*R116_ktr*indicator_foxo; R116 is "transport dnabound_Foxo1_Pa0_Pd0_Pe1_pUb1 to nucleus_Foxo1_Pa0_Pd0_Pe1_pUb1";
  R117: cytoplasm_Foxo1_Pa0_Pd1_Pe0_pUb0 => nucleus_Foxo1_Pa0_Pd1_Pe0_pUb0; cytoplasm_Foxo1_Pa0_Pd1_Pe0_pUb0*R117_ktr*indicator_foxo; R117 is "transport cytoplasm_Foxo1_Pa0_Pd1_Pe0_pUb0 to nucleus_Foxo1_Pa0_Pd1_Pe0_pUb0";
  R118: nucleus_Foxo1_Pa0_Pd1_Pe0_pUb0 => cytoplasm_Foxo1_Pa0_Pd1_Pe0_pUb0; nucleus_Foxo1_Pa0_Pd1_Pe0_pUb0*R118_ktr*indicator_foxo; R118 is "transport nucleus_Foxo1_Pa0_Pd1_Pe0_pUb0 to cytoplasm_Foxo1_Pa0_Pd1_Pe0_pUb0";
  R119: nucleus_Foxo1_Pa0_Pd1_Pe0_pUb0 => dnabound_Foxo1_Pa0_Pd1_Pe0_pUb0; nucleus_Foxo1_Pa0_Pd1_Pe0_pUb0*R119_ktr*indicator_foxo; R119 is "transport nucleus_Foxo1_Pa0_Pd1_Pe0_pUb0 to dnabound_Foxo1_Pa0_Pd1_Pe0_pUb0";
  R120: dnabound_Foxo1_Pa0_Pd1_Pe0_pUb0 => nucleus_Foxo1_Pa0_Pd1_Pe0_pUb0; dnabound_Foxo1_Pa0_Pd1_Pe0_pUb0*R120_ktr*indicator_foxo; R120 is "transport dnabound_Foxo1_Pa0_Pd1_Pe0_pUb0 to nucleus_Foxo1_Pa0_Pd1_Pe0_pUb0";
  R121: cytoplasm_Foxo1_Pa0_Pd1_Pe0_pUb1 => nucleus_Foxo1_Pa0_Pd1_Pe0_pUb1; cytoplasm_Foxo1_Pa0_Pd1_Pe0_pUb1*R121_ktr*indicator_foxo; R121 is "transport cytoplasm_Foxo1_Pa0_Pd1_Pe0_pUb1 to nucleus_Foxo1_Pa0_Pd1_Pe0_pUb1";
  R122: nucleus_Foxo1_Pa0_Pd1_Pe0_pUb1 => cytoplasm_Foxo1_Pa0_Pd1_Pe0_pUb1; nucleus_Foxo1_Pa0_Pd1_Pe0_pUb1*R122_ktr*indicator_foxo; R122 is "transport nucleus_Foxo1_Pa0_Pd1_Pe0_pUb1 to cytoplasm_Foxo1_Pa0_Pd1_Pe0_pUb1";
  R123: nucleus_Foxo1_Pa0_Pd1_Pe0_pUb1 => dnabound_Foxo1_Pa0_Pd1_Pe0_pUb1; nucleus_Foxo1_Pa0_Pd1_Pe0_pUb1*R123_ktr*indicator_foxo; R123 is "transport nucleus_Foxo1_Pa0_Pd1_Pe0_pUb1 to dnabound_Foxo1_Pa0_Pd1_Pe0_pUb1";
  R124: dnabound_Foxo1_Pa0_Pd1_Pe0_pUb1 => nucleus_Foxo1_Pa0_Pd1_Pe0_pUb1; dnabound_Foxo1_Pa0_Pd1_Pe0_pUb1*R124_ktr*indicator_foxo; R124 is "transport dnabound_Foxo1_Pa0_Pd1_Pe0_pUb1 to nucleus_Foxo1_Pa0_Pd1_Pe0_pUb1";
  R125: cytoplasm_Foxo1_Pa0_Pd1_Pe1_pUb0 => nucleus_Foxo1_Pa0_Pd1_Pe1_pUb0; cytoplasm_Foxo1_Pa0_Pd1_Pe1_pUb0*R125_ktr*indicator_foxo; R125 is "transport cytoplasm_Foxo1_Pa0_Pd1_Pe1_pUb0 to nucleus_Foxo1_Pa0_Pd1_Pe1_pUb0";
  R126: nucleus_Foxo1_Pa0_Pd1_Pe1_pUb0 => cytoplasm_Foxo1_Pa0_Pd1_Pe1_pUb0; nucleus_Foxo1_Pa0_Pd1_Pe1_pUb0*R126_ktr*indicator_foxo; R126 is "transport nucleus_Foxo1_Pa0_Pd1_Pe1_pUb0 to cytoplasm_Foxo1_Pa0_Pd1_Pe1_pUb0";
  R127: nucleus_Foxo1_Pa0_Pd1_Pe1_pUb0 => dnabound_Foxo1_Pa0_Pd1_Pe1_pUb0; nucleus_Foxo1_Pa0_Pd1_Pe1_pUb0*R127_ktr*indicator_foxo; R127 is "transport nucleus_Foxo1_Pa0_Pd1_Pe1_pUb0 to dnabound_Foxo1_Pa0_Pd1_Pe1_pUb0";
  R128: dnabound_Foxo1_Pa0_Pd1_Pe1_pUb0 => nucleus_Foxo1_Pa0_Pd1_Pe1_pUb0; dnabound_Foxo1_Pa0_Pd1_Pe1_pUb0*R128_ktr*indicator_foxo; R128 is "transport dnabound_Foxo1_Pa0_Pd1_Pe1_pUb0 to nucleus_Foxo1_Pa0_Pd1_Pe1_pUb0";
  R129: cytoplasm_Foxo1_Pa0_Pd1_Pe1_pUb1 => nucleus_Foxo1_Pa0_Pd1_Pe1_pUb1; cytoplasm_Foxo1_Pa0_Pd1_Pe1_pUb1*R129_ktr*indicator_foxo; R129 is "transport cytoplasm_Foxo1_Pa0_Pd1_Pe1_pUb1 to nucleus_Foxo1_Pa0_Pd1_Pe1_pUb1";
  R130: nucleus_Foxo1_Pa0_Pd1_Pe1_pUb1 => cytoplasm_Foxo1_Pa0_Pd1_Pe1_pUb1; nucleus_Foxo1_Pa0_Pd1_Pe1_pUb1*R130_ktr*indicator_foxo; R130 is "transport nucleus_Foxo1_Pa0_Pd1_Pe1_pUb1 to cytoplasm_Foxo1_Pa0_Pd1_Pe1_pUb1";
  R131: nucleus_Foxo1_Pa0_Pd1_Pe1_pUb1 => dnabound_Foxo1_Pa0_Pd1_Pe1_pUb1; nucleus_Foxo1_Pa0_Pd1_Pe1_pUb1*R131_ktr*indicator_foxo; R131 is "transport nucleus_Foxo1_Pa0_Pd1_Pe1_pUb1 to dnabound_Foxo1_Pa0_Pd1_Pe1_pUb1";
  R132: dnabound_Foxo1_Pa0_Pd1_Pe1_pUb1 => nucleus_Foxo1_Pa0_Pd1_Pe1_pUb1; dnabound_Foxo1_Pa0_Pd1_Pe1_pUb1*R132_ktr*indicator_foxo; R132 is "transport dnabound_Foxo1_Pa0_Pd1_Pe1_pUb1 to nucleus_Foxo1_Pa0_Pd1_Pe1_pUb1";
  R133: cytoplasm_Foxo1_Pa1_Pd0_Pe0_pUb0 => nucleus_Foxo1_Pa1_Pd0_Pe0_pUb0; cytoplasm_Foxo1_Pa1_Pd0_Pe0_pUb0*R133_ktr*indicator_foxo; R133 is "transport cytoplasm_Foxo1_Pa1_Pd0_Pe0_pUb0 to nucleus_Foxo1_Pa1_Pd0_Pe0_pUb0";
  R134: nucleus_Foxo1_Pa1_Pd0_Pe0_pUb0 => cytoplasm_Foxo1_Pa1_Pd0_Pe0_pUb0; nucleus_Foxo1_Pa1_Pd0_Pe0_pUb0*R134_ktr*indicator_foxo; R134 is "transport nucleus_Foxo1_Pa1_Pd0_Pe0_pUb0 to cytoplasm_Foxo1_Pa1_Pd0_Pe0_pUb0";
  R135: nucleus_Foxo1_Pa1_Pd0_Pe0_pUb0 => dnabound_Foxo1_Pa1_Pd0_Pe0_pUb0; nucleus_Foxo1_Pa1_Pd0_Pe0_pUb0*R135_ktr*indicator_foxo; R135 is "transport nucleus_Foxo1_Pa1_Pd0_Pe0_pUb0 to dnabound_Foxo1_Pa1_Pd0_Pe0_pUb0";
  R136: dnabound_Foxo1_Pa1_Pd0_Pe0_pUb0 => nucleus_Foxo1_Pa1_Pd0_Pe0_pUb0; dnabound_Foxo1_Pa1_Pd0_Pe0_pUb0*R136_ktr*indicator_foxo; R136 is "transport dnabound_Foxo1_Pa1_Pd0_Pe0_pUb0 to nucleus_Foxo1_Pa1_Pd0_Pe0_pUb0";
  R137: cytoplasm_Foxo1_Pa1_Pd0_Pe0_pUb1 => nucleus_Foxo1_Pa1_Pd0_Pe0_pUb1; cytoplasm_Foxo1_Pa1_Pd0_Pe0_pUb1*R137_ktr*indicator_foxo; R137 is "transport cytoplasm_Foxo1_Pa1_Pd0_Pe0_pUb1 to nucleus_Foxo1_Pa1_Pd0_Pe0_pUb1";
  R138: nucleus_Foxo1_Pa1_Pd0_Pe0_pUb1 => cytoplasm_Foxo1_Pa1_Pd0_Pe0_pUb1; nucleus_Foxo1_Pa1_Pd0_Pe0_pUb1*R138_ktr*indicator_foxo; R138 is "transport nucleus_Foxo1_Pa1_Pd0_Pe0_pUb1 to cytoplasm_Foxo1_Pa1_Pd0_Pe0_pUb1";
  R139: nucleus_Foxo1_Pa1_Pd0_Pe0_pUb1 => dnabound_Foxo1_Pa1_Pd0_Pe0_pUb1; nucleus_Foxo1_Pa1_Pd0_Pe0_pUb1*R139_ktr*indicator_foxo; R139 is "transport nucleus_Foxo1_Pa1_Pd0_Pe0_pUb1 to dnabound_Foxo1_Pa1_Pd0_Pe0_pUb1";
  R140: dnabound_Foxo1_Pa1_Pd0_Pe0_pUb1 => nucleus_Foxo1_Pa1_Pd0_Pe0_pUb1; dnabound_Foxo1_Pa1_Pd0_Pe0_pUb1*R140_ktr*indicator_foxo; R140 is "transport dnabound_Foxo1_Pa1_Pd0_Pe0_pUb1 to nucleus_Foxo1_Pa1_Pd0_Pe0_pUb1";
  R141: cytoplasm_Foxo1_Pa1_Pd0_Pe1_pUb0 => nucleus_Foxo1_Pa1_Pd0_Pe1_pUb0; cytoplasm_Foxo1_Pa1_Pd0_Pe1_pUb0*R141_ktr*indicator_foxo; R141 is "transport cytoplasm_Foxo1_Pa1_Pd0_Pe1_pUb0 to nucleus_Foxo1_Pa1_Pd0_Pe1_pUb0";
  R142: nucleus_Foxo1_Pa1_Pd0_Pe1_pUb0 => cytoplasm_Foxo1_Pa1_Pd0_Pe1_pUb0; nucleus_Foxo1_Pa1_Pd0_Pe1_pUb0*R142_ktr*indicator_foxo; R142 is "transport nucleus_Foxo1_Pa1_Pd0_Pe1_pUb0 to cytoplasm_Foxo1_Pa1_Pd0_Pe1_pUb0";
  R143: nucleus_Foxo1_Pa1_Pd0_Pe1_pUb0 => dnabound_Foxo1_Pa1_Pd0_Pe1_pUb0; nucleus_Foxo1_Pa1_Pd0_Pe1_pUb0*R143_ktr*indicator_foxo; R143 is "transport nucleus_Foxo1_Pa1_Pd0_Pe1_pUb0 to dnabound_Foxo1_Pa1_Pd0_Pe1_pUb0";
  R144: dnabound_Foxo1_Pa1_Pd0_Pe1_pUb0 => nucleus_Foxo1_Pa1_Pd0_Pe1_pUb0; dnabound_Foxo1_Pa1_Pd0_Pe1_pUb0*R144_ktr*indicator_foxo; R144 is "transport dnabound_Foxo1_Pa1_Pd0_Pe1_pUb0 to nucleus_Foxo1_Pa1_Pd0_Pe1_pUb0";
  R145: cytoplasm_Foxo1_Pa1_Pd0_Pe1_pUb1 => nucleus_Foxo1_Pa1_Pd0_Pe1_pUb1; cytoplasm_Foxo1_Pa1_Pd0_Pe1_pUb1*R145_ktr*indicator_foxo; R145 is "transport cytoplasm_Foxo1_Pa1_Pd0_Pe1_pUb1 to nucleus_Foxo1_Pa1_Pd0_Pe1_pUb1";
  R146: nucleus_Foxo1_Pa1_Pd0_Pe1_pUb1 => cytoplasm_Foxo1_Pa1_Pd0_Pe1_pUb1; nucleus_Foxo1_Pa1_Pd0_Pe1_pUb1*R146_ktr*indicator_foxo; R146 is "transport nucleus_Foxo1_Pa1_Pd0_Pe1_pUb1 to cytoplasm_Foxo1_Pa1_Pd0_Pe1_pUb1";
  R147: nucleus_Foxo1_Pa1_Pd0_Pe1_pUb1 => dnabound_Foxo1_Pa1_Pd0_Pe1_pUb1; nucleus_Foxo1_Pa1_Pd0_Pe1_pUb1*R147_ktr*indicator_foxo; R147 is "transport nucleus_Foxo1_Pa1_Pd0_Pe1_pUb1 to dnabound_Foxo1_Pa1_Pd0_Pe1_pUb1";
  R148: dnabound_Foxo1_Pa1_Pd0_Pe1_pUb1 => nucleus_Foxo1_Pa1_Pd0_Pe1_pUb1; dnabound_Foxo1_Pa1_Pd0_Pe1_pUb1*R148_ktr*indicator_foxo; R148 is "transport dnabound_Foxo1_Pa1_Pd0_Pe1_pUb1 to nucleus_Foxo1_Pa1_Pd0_Pe1_pUb1";
  R149: cytoplasm_Foxo1_Pa1_Pd1_Pe0_pUb0 => nucleus_Foxo1_Pa1_Pd1_Pe0_pUb0; cytoplasm_Foxo1_Pa1_Pd1_Pe0_pUb0*R149_ktr*indicator_foxo; R149 is "transport cytoplasm_Foxo1_Pa1_Pd1_Pe0_pUb0 to nucleus_Foxo1_Pa1_Pd1_Pe0_pUb0";
  R150: nucleus_Foxo1_Pa1_Pd1_Pe0_pUb0 => cytoplasm_Foxo1_Pa1_Pd1_Pe0_pUb0; nucleus_Foxo1_Pa1_Pd1_Pe0_pUb0*R150_ktr*indicator_foxo; R150 is "transport nucleus_Foxo1_Pa1_Pd1_Pe0_pUb0 to cytoplasm_Foxo1_Pa1_Pd1_Pe0_pUb0";
  R151: nucleus_Foxo1_Pa1_Pd1_Pe0_pUb0 => dnabound_Foxo1_Pa1_Pd1_Pe0_pUb0; nucleus_Foxo1_Pa1_Pd1_Pe0_pUb0*R151_ktr*indicator_foxo; R151 is "transport nucleus_Foxo1_Pa1_Pd1_Pe0_pUb0 to dnabound_Foxo1_Pa1_Pd1_Pe0_pUb0";
  R152: dnabound_Foxo1_Pa1_Pd1_Pe0_pUb0 => nucleus_Foxo1_Pa1_Pd1_Pe0_pUb0; dnabound_Foxo1_Pa1_Pd1_Pe0_pUb0*R152_ktr*indicator_foxo; R152 is "transport dnabound_Foxo1_Pa1_Pd1_Pe0_pUb0 to nucleus_Foxo1_Pa1_Pd1_Pe0_pUb0";
  R153: cytoplasm_Foxo1_Pa1_Pd1_Pe0_pUb1 => nucleus_Foxo1_Pa1_Pd1_Pe0_pUb1; cytoplasm_Foxo1_Pa1_Pd1_Pe0_pUb1*R153_ktr*indicator_foxo; R153 is "transport cytoplasm_Foxo1_Pa1_Pd1_Pe0_pUb1 to nucleus_Foxo1_Pa1_Pd1_Pe0_pUb1";
  R154: nucleus_Foxo1_Pa1_Pd1_Pe0_pUb1 => cytoplasm_Foxo1_Pa1_Pd1_Pe0_pUb1; nucleus_Foxo1_Pa1_Pd1_Pe0_pUb1*R154_ktr*indicator_foxo; R154 is "transport nucleus_Foxo1_Pa1_Pd1_Pe0_pUb1 to cytoplasm_Foxo1_Pa1_Pd1_Pe0_pUb1";
  R155: nucleus_Foxo1_Pa1_Pd1_Pe0_pUb1 => dnabound_Foxo1_Pa1_Pd1_Pe0_pUb1; nucleus_Foxo1_Pa1_Pd1_Pe0_pUb1*R155_ktr*indicator_foxo; R155 is "transport nucleus_Foxo1_Pa1_Pd1_Pe0_pUb1 to dnabound_Foxo1_Pa1_Pd1_Pe0_pUb1";
  R156: dnabound_Foxo1_Pa1_Pd1_Pe0_pUb1 => nucleus_Foxo1_Pa1_Pd1_Pe0_pUb1; dnabound_Foxo1_Pa1_Pd1_Pe0_pUb1*R156_ktr*indicator_foxo; R156 is "transport dnabound_Foxo1_Pa1_Pd1_Pe0_pUb1 to nucleus_Foxo1_Pa1_Pd1_Pe0_pUb1";
  R157: cytoplasm_Foxo1_Pa1_Pd1_Pe1_pUb0 => nucleus_Foxo1_Pa1_Pd1_Pe1_pUb0; cytoplasm_Foxo1_Pa1_Pd1_Pe1_pUb0*R157_ktr*indicator_foxo; R157 is "transport cytoplasm_Foxo1_Pa1_Pd1_Pe1_pUb0 to nucleus_Foxo1_Pa1_Pd1_Pe1_pUb0";
  R158: nucleus_Foxo1_Pa1_Pd1_Pe1_pUb0 => cytoplasm_Foxo1_Pa1_Pd1_Pe1_pUb0; nucleus_Foxo1_Pa1_Pd1_Pe1_pUb0*R158_ktr*indicator_foxo; R158 is "transport nucleus_Foxo1_Pa1_Pd1_Pe1_pUb0 to cytoplasm_Foxo1_Pa1_Pd1_Pe1_pUb0";
  R159: nucleus_Foxo1_Pa1_Pd1_Pe1_pUb0 => dnabound_Foxo1_Pa1_Pd1_Pe1_pUb0; nucleus_Foxo1_Pa1_Pd1_Pe1_pUb0*R159_ktr*indicator_foxo; R159 is "transport nucleus_Foxo1_Pa1_Pd1_Pe1_pUb0 to dnabound_Foxo1_Pa1_Pd1_Pe1_pUb0";
  R160: dnabound_Foxo1_Pa1_Pd1_Pe1_pUb0 => nucleus_Foxo1_Pa1_Pd1_Pe1_pUb0; dnabound_Foxo1_Pa1_Pd1_Pe1_pUb0*R160_ktr*indicator_foxo; R160 is "transport dnabound_Foxo1_Pa1_Pd1_Pe1_pUb0 to nucleus_Foxo1_Pa1_Pd1_Pe1_pUb0";
  R161: cytoplasm_Foxo1_Pa1_Pd1_Pe1_pUb1 => nucleus_Foxo1_Pa1_Pd1_Pe1_pUb1; cytoplasm_Foxo1_Pa1_Pd1_Pe1_pUb1*R161_ktr*indicator_foxo; R161 is "transport cytoplasm_Foxo1_Pa1_Pd1_Pe1_pUb1 to nucleus_Foxo1_Pa1_Pd1_Pe1_pUb1";
  R162: nucleus_Foxo1_Pa1_Pd1_Pe1_pUb1 => cytoplasm_Foxo1_Pa1_Pd1_Pe1_pUb1; nucleus_Foxo1_Pa1_Pd1_Pe1_pUb1*R162_ktr*indicator_foxo; R162 is "transport nucleus_Foxo1_Pa1_Pd1_Pe1_pUb1 to cytoplasm_Foxo1_Pa1_Pd1_Pe1_pUb1";
  R163: nucleus_Foxo1_Pa1_Pd1_Pe1_pUb1 => dnabound_Foxo1_Pa1_Pd1_Pe1_pUb1; nucleus_Foxo1_Pa1_Pd1_Pe1_pUb1*R163_ktr*indicator_foxo; R163 is "transport nucleus_Foxo1_Pa1_Pd1_Pe1_pUb1 to dnabound_Foxo1_Pa1_Pd1_Pe1_pUb1";
  R164: dnabound_Foxo1_Pa1_Pd1_Pe1_pUb1 => nucleus_Foxo1_Pa1_Pd1_Pe1_pUb1; dnabound_Foxo1_Pa1_Pd1_Pe1_pUb1*R164_ktr*indicator_foxo; R164 is "transport dnabound_Foxo1_Pa1_Pd1_Pe1_pUb1 to nucleus_Foxo1_Pa1_Pd1_Pe1_pUb1";
  R165: cytoplasm_Foxo1_Pa0_Pd0_Pe0_pUb0 => cytoplasm_Foxo1_Pa1_Pd0_Pe0_pUb0; cytoplasm_Foxo1_Pa0_Pd0_Pe0_pUb0*Akt_P2*R165_kkin*indicator_foxo; R165 is "conversion of cytoplasm_Foxo1_Pa0_Pd0_Pe0_pUb0 to cytoplasm_Foxo1_Pa1_Pd0_Pe0_pUb0 by Akt_P2";  // modifiers: Akt_P2
  R166: nucleus_Foxo1_Pa0_Pd0_Pe0_pUb0 => nucleus_Foxo1_Pa1_Pd0_Pe0_pUb0; nucleus_Foxo1_Pa0_Pd0_Pe0_pUb0*Akt_P2*R166_kkin*indicator_foxo; R166 is "conversion of nucleus_Foxo1_Pa0_Pd0_Pe0_pUb0 to nucleus_Foxo1_Pa1_Pd0_Pe0_pUb0 by Akt_P2";  // modifiers: Akt_P2
  R167: dnabound_Foxo1_Pa0_Pd0_Pe0_pUb0 => dnabound_Foxo1_Pa1_Pd0_Pe0_pUb0; dnabound_Foxo1_Pa0_Pd0_Pe0_pUb0*Akt_P2*R167_kkin*indicator_foxo; R167 is "conversion of dnabound_Foxo1_Pa0_Pd0_Pe0_pUb0 to dnabound_Foxo1_Pa1_Pd0_Pe0_pUb0 by Akt_P2";  // modifiers: Akt_P2
  R168: cytoplasm_Foxo1_Pa0_Pd0_Pe0_pUb1 => cytoplasm_Foxo1_Pa1_Pd0_Pe0_pUb1; cytoplasm_Foxo1_Pa0_Pd0_Pe0_pUb1*Akt_P2*R168_kkin*indicator_foxo; R168 is "conversion of cytoplasm_Foxo1_Pa0_Pd0_Pe0_pUb1 to cytoplasm_Foxo1_Pa1_Pd0_Pe0_pUb1 by Akt_P2";  // modifiers: Akt_P2
  R169: nucleus_Foxo1_Pa0_Pd0_Pe0_pUb1 => nucleus_Foxo1_Pa1_Pd0_Pe0_pUb1; nucleus_Foxo1_Pa0_Pd0_Pe0_pUb1*Akt_P2*R169_kkin*indicator_foxo; R169 is "conversion of nucleus_Foxo1_Pa0_Pd0_Pe0_pUb1 to nucleus_Foxo1_Pa1_Pd0_Pe0_pUb1 by Akt_P2";  // modifiers: Akt_P2
  R170: dnabound_Foxo1_Pa0_Pd0_Pe0_pUb1 => dnabound_Foxo1_Pa1_Pd0_Pe0_pUb1; dnabound_Foxo1_Pa0_Pd0_Pe0_pUb1*Akt_P2*R170_kkin*indicator_foxo; R170 is "conversion of dnabound_Foxo1_Pa0_Pd0_Pe0_pUb1 to dnabound_Foxo1_Pa1_Pd0_Pe0_pUb1 by Akt_P2";  // modifiers: Akt_P2
  R171: cytoplasm_Foxo1_Pa0_Pd0_Pe1_pUb0 => cytoplasm_Foxo1_Pa1_Pd0_Pe1_pUb0; cytoplasm_Foxo1_Pa0_Pd0_Pe1_pUb0*Akt_P2*R171_kkin*indicator_foxo; R171 is "conversion of cytoplasm_Foxo1_Pa0_Pd0_Pe1_pUb0 to cytoplasm_Foxo1_Pa1_Pd0_Pe1_pUb0 by Akt_P2";  // modifiers: Akt_P2
  R172: nucleus_Foxo1_Pa0_Pd0_Pe1_pUb0 => nucleus_Foxo1_Pa1_Pd0_Pe1_pUb0; nucleus_Foxo1_Pa0_Pd0_Pe1_pUb0*Akt_P2*R172_kkin*indicator_foxo; R172 is "conversion of nucleus_Foxo1_Pa0_Pd0_Pe1_pUb0 to nucleus_Foxo1_Pa1_Pd0_Pe1_pUb0 by Akt_P2";  // modifiers: Akt_P2
  R173: dnabound_Foxo1_Pa0_Pd0_Pe1_pUb0 => dnabound_Foxo1_Pa1_Pd0_Pe1_pUb0; dnabound_Foxo1_Pa0_Pd0_Pe1_pUb0*Akt_P2*R173_kkin*indicator_foxo; R173 is "conversion of dnabound_Foxo1_Pa0_Pd0_Pe1_pUb0 to dnabound_Foxo1_Pa1_Pd0_Pe1_pUb0 by Akt_P2";  // modifiers: Akt_P2
  R174: cytoplasm_Foxo1_Pa0_Pd0_Pe1_pUb1 => cytoplasm_Foxo1_Pa1_Pd0_Pe1_pUb1; cytoplasm_Foxo1_Pa0_Pd0_Pe1_pUb1*Akt_P2*R174_kkin*indicator_foxo; R174 is "conversion of cytoplasm_Foxo1_Pa0_Pd0_Pe1_pUb1 to cytoplasm_Foxo1_Pa1_Pd0_Pe1_pUb1 by Akt_P2";  // modifiers: Akt_P2
  R175: nucleus_Foxo1_Pa0_Pd0_Pe1_pUb1 => nucleus_Foxo1_Pa1_Pd0_Pe1_pUb1; nucleus_Foxo1_Pa0_Pd0_Pe1_pUb1*Akt_P2*R175_kkin*indicator_foxo; R175 is "conversion of nucleus_Foxo1_Pa0_Pd0_Pe1_pUb1 to nucleus_Foxo1_Pa1_Pd0_Pe1_pUb1 by Akt_P2";  // modifiers: Akt_P2
  R176: dnabound_Foxo1_Pa0_Pd0_Pe1_pUb1 => dnabound_Foxo1_Pa1_Pd0_Pe1_pUb1; dnabound_Foxo1_Pa0_Pd0_Pe1_pUb1*Akt_P2*R176_kkin*indicator_foxo; R176 is "conversion of dnabound_Foxo1_Pa0_Pd0_Pe1_pUb1 to dnabound_Foxo1_Pa1_Pd0_Pe1_pUb1 by Akt_P2";  // modifiers: Akt_P2
  R177: cytoplasm_Foxo1_Pa0_Pd1_Pe0_pUb0 => cytoplasm_Foxo1_Pa1_Pd1_Pe0_pUb0; cytoplasm_Foxo1_Pa0_Pd1_Pe0_pUb0*Akt_P2*R177_kkin*indicator_foxo; R177 is "conversion of cytoplasm_Foxo1_Pa0_Pd1_Pe0_pUb0 to cytoplasm_Foxo1_Pa1_Pd1_Pe0_pUb0 by Akt_P2";  // modifiers: Akt_P2
  R178: nucleus_Foxo1_Pa0_Pd1_Pe0_pUb0 => nucleus_Foxo1_Pa1_Pd1_Pe0_pUb0; nucleus_Foxo1_Pa0_Pd1_Pe0_pUb0*Akt_P2*R178_kkin*indicator_foxo; R178 is "conversion of nucleus_Foxo1_Pa0_Pd1_Pe0_pUb0 to nucleus_Foxo1_Pa1_Pd1_Pe0_pUb0 by Akt_P2";  // modifiers: Akt_P2
  R179: dnabound_Foxo1_Pa0_Pd1_Pe0_pUb0 => dnabound_Foxo1_Pa1_Pd1_Pe0_pUb0; dnabound_Foxo1_Pa0_Pd1_Pe0_pUb0*Akt_P2*R179_kkin*indicator_foxo; R179 is "conversion of dnabound_Foxo1_Pa0_Pd1_Pe0_pUb0 to dnabound_Foxo1_Pa1_Pd1_Pe0_pUb0 by Akt_P2";  // modifiers: Akt_P2
  R180: cytoplasm_Foxo1_Pa0_Pd1_Pe0_pUb1 => cytoplasm_Foxo1_Pa1_Pd1_Pe0_pUb1; cytoplasm_Foxo1_Pa0_Pd1_Pe0_pUb1*Akt_P2*R180_kkin*indicator_foxo; R180 is "conversion of cytoplasm_Foxo1_Pa0_Pd1_Pe0_pUb1 to cytoplasm_Foxo1_Pa1_Pd1_Pe0_pUb1 by Akt_P2";  // modifiers: Akt_P2
  R181: nucleus_Foxo1_Pa0_Pd1_Pe0_pUb1 => nucleus_Foxo1_Pa1_Pd1_Pe0_pUb1; nucleus_Foxo1_Pa0_Pd1_Pe0_pUb1*Akt_P2*R181_kkin*indicator_foxo; R181 is "conversion of nucleus_Foxo1_Pa0_Pd1_Pe0_pUb1 to nucleus_Foxo1_Pa1_Pd1_Pe0_pUb1 by Akt_P2";  // modifiers: Akt_P2
  R182: dnabound_Foxo1_Pa0_Pd1_Pe0_pUb1 => dnabound_Foxo1_Pa1_Pd1_Pe0_pUb1; dnabound_Foxo1_Pa0_Pd1_Pe0_pUb1*Akt_P2*R182_kkin*indicator_foxo; R182 is "conversion of dnabound_Foxo1_Pa0_Pd1_Pe0_pUb1 to dnabound_Foxo1_Pa1_Pd1_Pe0_pUb1 by Akt_P2";  // modifiers: Akt_P2
  R183: cytoplasm_Foxo1_Pa0_Pd1_Pe1_pUb0 => cytoplasm_Foxo1_Pa1_Pd1_Pe1_pUb0; cytoplasm_Foxo1_Pa0_Pd1_Pe1_pUb0*Akt_P2*R183_kkin*indicator_foxo; R183 is "conversion of cytoplasm_Foxo1_Pa0_Pd1_Pe1_pUb0 to cytoplasm_Foxo1_Pa1_Pd1_Pe1_pUb0 by Akt_P2";  // modifiers: Akt_P2
  R184: nucleus_Foxo1_Pa0_Pd1_Pe1_pUb0 => nucleus_Foxo1_Pa1_Pd1_Pe1_pUb0; nucleus_Foxo1_Pa0_Pd1_Pe1_pUb0*Akt_P2*R184_kkin*indicator_foxo; R184 is "conversion of nucleus_Foxo1_Pa0_Pd1_Pe1_pUb0 to nucleus_Foxo1_Pa1_Pd1_Pe1_pUb0 by Akt_P2";  // modifiers: Akt_P2
  R185: dnabound_Foxo1_Pa0_Pd1_Pe1_pUb0 => dnabound_Foxo1_Pa1_Pd1_Pe1_pUb0; dnabound_Foxo1_Pa0_Pd1_Pe1_pUb0*Akt_P2*R185_kkin*indicator_foxo; R185 is "conversion of dnabound_Foxo1_Pa0_Pd1_Pe1_pUb0 to dnabound_Foxo1_Pa1_Pd1_Pe1_pUb0 by Akt_P2";  // modifiers: Akt_P2
  R186: cytoplasm_Foxo1_Pa0_Pd1_Pe1_pUb1 => cytoplasm_Foxo1_Pa1_Pd1_Pe1_pUb1; cytoplasm_Foxo1_Pa0_Pd1_Pe1_pUb1*Akt_P2*R186_kkin*indicator_foxo; R186 is "conversion of cytoplasm_Foxo1_Pa0_Pd1_Pe1_pUb1 to cytoplasm_Foxo1_Pa1_Pd1_Pe1_pUb1 by Akt_P2";  // modifiers: Akt_P2
  R187: nucleus_Foxo1_Pa0_Pd1_Pe1_pUb1 => nucleus_Foxo1_Pa1_Pd1_Pe1_pUb1; nucleus_Foxo1_Pa0_Pd1_Pe1_pUb1*Akt_P2*R187_kkin*indicator_foxo; R187 is "conversion of nucleus_Foxo1_Pa0_Pd1_Pe1_pUb1 to nucleus_Foxo1_Pa1_Pd1_Pe1_pUb1 by Akt_P2";  // modifiers: Akt_P2
  R188: dnabound_Foxo1_Pa0_Pd1_Pe1_pUb1 => dnabound_Foxo1_Pa1_Pd1_Pe1_pUb1; dnabound_Foxo1_Pa0_Pd1_Pe1_pUb1*Akt_P2*R188_kkin*indicator_foxo; R188 is "conversion of dnabound_Foxo1_Pa0_Pd1_Pe1_pUb1 to dnabound_Foxo1_Pa1_Pd1_Pe1_pUb1 by Akt_P2";  // modifiers: Akt_P2
  R189: cytoplasm_Foxo1_Pa0_Pd0_Pe0_pUb0 => cytoplasm_Foxo1_Pa1_Pd0_Pe0_pUb0; cytoplasm_Foxo1_Pa0_Pd0_Pe0_pUb0*SGK*R189_kkin*indicator_foxo; R189 is "conversion of cytoplasm_Foxo1_Pa0_Pd0_Pe0_pUb0 to cytoplasm_Foxo1_Pa1_Pd0_Pe0_pUb0 by SGK";  // modifiers: SGK
  R190: nucleus_Foxo1_Pa0_Pd0_Pe0_pUb0 => nucleus_Foxo1_Pa1_Pd0_Pe0_pUb0; nucleus_Foxo1_Pa0_Pd0_Pe0_pUb0*SGK*R190_kkin*indicator_foxo; R190 is "conversion of nucleus_Foxo1_Pa0_Pd0_Pe0_pUb0 to nucleus_Foxo1_Pa1_Pd0_Pe0_pUb0 by SGK";  // modifiers: SGK
  R191: dnabound_Foxo1_Pa0_Pd0_Pe0_pUb0 => dnabound_Foxo1_Pa1_Pd0_Pe0_pUb0; dnabound_Foxo1_Pa0_Pd0_Pe0_pUb0*SGK*R191_kkin*indicator_foxo; R191 is "conversion of dnabound_Foxo1_Pa0_Pd0_Pe0_pUb0 to dnabound_Foxo1_Pa1_Pd0_Pe0_pUb0 by SGK";  // modifiers: SGK
  R192: cytoplasm_Foxo1_Pa0_Pd0_Pe0_pUb1 => cytoplasm_Foxo1_Pa1_Pd0_Pe0_pUb1; cytoplasm_Foxo1_Pa0_Pd0_Pe0_pUb1*SGK*R192_kkin*indicator_foxo; R192 is "conversion of cytoplasm_Foxo1_Pa0_Pd0_Pe0_pUb1 to cytoplasm_Foxo1_Pa1_Pd0_Pe0_pUb1 by SGK";  // modifiers: SGK
  R193: nucleus_Foxo1_Pa0_Pd0_Pe0_pUb1 => nucleus_Foxo1_Pa1_Pd0_Pe0_pUb1; nucleus_Foxo1_Pa0_Pd0_Pe0_pUb1*SGK*R193_kkin*indicator_foxo; R193 is "conversion of nucleus_Foxo1_Pa0_Pd0_Pe0_pUb1 to nucleus_Foxo1_Pa1_Pd0_Pe0_pUb1 by SGK";  // modifiers: SGK
  R194: dnabound_Foxo1_Pa0_Pd0_Pe0_pUb1 => dnabound_Foxo1_Pa1_Pd0_Pe0_pUb1; dnabound_Foxo1_Pa0_Pd0_Pe0_pUb1*SGK*R194_kkin*indicator_foxo; R194 is "conversion of dnabound_Foxo1_Pa0_Pd0_Pe0_pUb1 to dnabound_Foxo1_Pa1_Pd0_Pe0_pUb1 by SGK";  // modifiers: SGK
  R195: cytoplasm_Foxo1_Pa0_Pd0_Pe1_pUb0 => cytoplasm_Foxo1_Pa1_Pd0_Pe1_pUb0; cytoplasm_Foxo1_Pa0_Pd0_Pe1_pUb0*SGK*R195_kkin*indicator_foxo; R195 is "conversion of cytoplasm_Foxo1_Pa0_Pd0_Pe1_pUb0 to cytoplasm_Foxo1_Pa1_Pd0_Pe1_pUb0 by SGK";  // modifiers: SGK
  R196: nucleus_Foxo1_Pa0_Pd0_Pe1_pUb0 => nucleus_Foxo1_Pa1_Pd0_Pe1_pUb0; nucleus_Foxo1_Pa0_Pd0_Pe1_pUb0*SGK*R196_kkin*indicator_foxo; R196 is "conversion of nucleus_Foxo1_Pa0_Pd0_Pe1_pUb0 to nucleus_Foxo1_Pa1_Pd0_Pe1_pUb0 by SGK";  // modifiers: SGK
  R197: dnabound_Foxo1_Pa0_Pd0_Pe1_pUb0 => dnabound_Foxo1_Pa1_Pd0_Pe1_pUb0; dnabound_Foxo1_Pa0_Pd0_Pe1_pUb0*SGK*R197_kkin*indicator_foxo; R197 is "conversion of dnabound_Foxo1_Pa0_Pd0_Pe1_pUb0 to dnabound_Foxo1_Pa1_Pd0_Pe1_pUb0 by SGK";  // modifiers: SGK
  R198: cytoplasm_Foxo1_Pa0_Pd0_Pe1_pUb1 => cytoplasm_Foxo1_Pa1_Pd0_Pe1_pUb1; cytoplasm_Foxo1_Pa0_Pd0_Pe1_pUb1*SGK*R198_kkin*indicator_foxo; R198 is "conversion of cytoplasm_Foxo1_Pa0_Pd0_Pe1_pUb1 to cytoplasm_Foxo1_Pa1_Pd0_Pe1_pUb1 by SGK";  // modifiers: SGK
  R199: nucleus_Foxo1_Pa0_Pd0_Pe1_pUb1 => nucleus_Foxo1_Pa1_Pd0_Pe1_pUb1; nucleus_Foxo1_Pa0_Pd0_Pe1_pUb1*SGK*R199_kkin*indicator_foxo; R199 is "conversion of nucleus_Foxo1_Pa0_Pd0_Pe1_pUb1 to nucleus_Foxo1_Pa1_Pd0_Pe1_pUb1 by SGK";  // modifiers: SGK
  R200: dnabound_Foxo1_Pa0_Pd0_Pe1_pUb1 => dnabound_Foxo1_Pa1_Pd0_Pe1_pUb1; dnabound_Foxo1_Pa0_Pd0_Pe1_pUb1*SGK*R200_kkin*indicator_foxo; R200 is "conversion of dnabound_Foxo1_Pa0_Pd0_Pe1_pUb1 to dnabound_Foxo1_Pa1_Pd0_Pe1_pUb1 by SGK";  // modifiers: SGK
  R201: cytoplasm_Foxo1_Pa0_Pd1_Pe0_pUb0 => cytoplasm_Foxo1_Pa1_Pd1_Pe0_pUb0; cytoplasm_Foxo1_Pa0_Pd1_Pe0_pUb0*SGK*R201_kkin*indicator_foxo; R201 is "conversion of cytoplasm_Foxo1_Pa0_Pd1_Pe0_pUb0 to cytoplasm_Foxo1_Pa1_Pd1_Pe0_pUb0 by SGK";  // modifiers: SGK
  R202: nucleus_Foxo1_Pa0_Pd1_Pe0_pUb0 => nucleus_Foxo1_Pa1_Pd1_Pe0_pUb0; nucleus_Foxo1_Pa0_Pd1_Pe0_pUb0*SGK*R202_kkin*indicator_foxo; R202 is "conversion of nucleus_Foxo1_Pa0_Pd1_Pe0_pUb0 to nucleus_Foxo1_Pa1_Pd1_Pe0_pUb0 by SGK";  // modifiers: SGK
  R203: dnabound_Foxo1_Pa0_Pd1_Pe0_pUb0 => dnabound_Foxo1_Pa1_Pd1_Pe0_pUb0; dnabound_Foxo1_Pa0_Pd1_Pe0_pUb0*SGK*R203_kkin*indicator_foxo; R203 is "conversion of dnabound_Foxo1_Pa0_Pd1_Pe0_pUb0 to dnabound_Foxo1_Pa1_Pd1_Pe0_pUb0 by SGK";  // modifiers: SGK
  R204: cytoplasm_Foxo1_Pa0_Pd1_Pe0_pUb1 => cytoplasm_Foxo1_Pa1_Pd1_Pe0_pUb1; cytoplasm_Foxo1_Pa0_Pd1_Pe0_pUb1*SGK*R204_kkin*indicator_foxo; R204 is "conversion of cytoplasm_Foxo1_Pa0_Pd1_Pe0_pUb1 to cytoplasm_Foxo1_Pa1_Pd1_Pe0_pUb1 by SGK";  // modifiers: SGK
  R205: nucleus_Foxo1_Pa0_Pd1_Pe0_pUb1 => nucleus_Foxo1_Pa1_Pd1_Pe0_pUb1; nucleus_Foxo1_Pa0_Pd1_Pe0_pUb1*SGK*R205_kkin*indicator_foxo; R205 is "conversion of nucleus_Foxo1_Pa0_Pd1_Pe0_pUb1 to nucleus_Foxo1_Pa1_Pd1_Pe0_pUb1 by SGK";  // modifiers: SGK
  R206: dnabound_Foxo1_Pa0_Pd1_Pe0_pUb1 => dnabound_Foxo1_Pa1_Pd1_Pe0_pUb1; dnabound_Foxo1_Pa0_Pd1_Pe0_pUb1*SGK*R206_kkin*indicator_foxo; R206 is "conversion of dnabound_Foxo1_Pa0_Pd1_Pe0_pUb1 to dnabound_Foxo1_Pa1_Pd1_Pe0_pUb1 by SGK";  // modifiers: SGK
  R207: cytoplasm_Foxo1_Pa0_Pd1_Pe1_pUb0 => cytoplasm_Foxo1_Pa1_Pd1_Pe1_pUb0; cytoplasm_Foxo1_Pa0_Pd1_Pe1_pUb0*SGK*R207_kkin*indicator_foxo; R207 is "conversion of cytoplasm_Foxo1_Pa0_Pd1_Pe1_pUb0 to cytoplasm_Foxo1_Pa1_Pd1_Pe1_pUb0 by SGK";  // modifiers: SGK
  R208: nucleus_Foxo1_Pa0_Pd1_Pe1_pUb0 => nucleus_Foxo1_Pa1_Pd1_Pe1_pUb0; nucleus_Foxo1_Pa0_Pd1_Pe1_pUb0*SGK*R208_kkin*indicator_foxo; R208 is "conversion of nucleus_Foxo1_Pa0_Pd1_Pe1_pUb0 to nucleus_Foxo1_Pa1_Pd1_Pe1_pUb0 by SGK";  // modifiers: SGK
  R209: dnabound_Foxo1_Pa0_Pd1_Pe1_pUb0 => dnabound_Foxo1_Pa1_Pd1_Pe1_pUb0; dnabound_Foxo1_Pa0_Pd1_Pe1_pUb0*SGK*R209_kkin*indicator_foxo; R209 is "conversion of dnabound_Foxo1_Pa0_Pd1_Pe1_pUb0 to dnabound_Foxo1_Pa1_Pd1_Pe1_pUb0 by SGK";  // modifiers: SGK
  R210: cytoplasm_Foxo1_Pa0_Pd1_Pe1_pUb1 => cytoplasm_Foxo1_Pa1_Pd1_Pe1_pUb1; cytoplasm_Foxo1_Pa0_Pd1_Pe1_pUb1*SGK*R210_kkin*indicator_foxo; R210 is "conversion of cytoplasm_Foxo1_Pa0_Pd1_Pe1_pUb1 to cytoplasm_Foxo1_Pa1_Pd1_Pe1_pUb1 by SGK";  // modifiers: SGK
  R211: nucleus_Foxo1_Pa0_Pd1_Pe1_pUb1 => nucleus_Foxo1_Pa1_Pd1_Pe1_pUb1; nucleus_Foxo1_Pa0_Pd1_Pe1_pUb1*SGK*R211_kkin*indicator_foxo; R211 is "conversion of nucleus_Foxo1_Pa0_Pd1_Pe1_pUb1 to nucleus_Foxo1_Pa1_Pd1_Pe1_pUb1 by SGK";  // modifiers: SGK
  R212: dnabound_Foxo1_Pa0_Pd1_Pe1_pUb1 => dnabound_Foxo1_Pa1_Pd1_Pe1_pUb1; dnabound_Foxo1_Pa0_Pd1_Pe1_pUb1*SGK*R212_kkin*indicator_foxo; R212 is "conversion of dnabound_Foxo1_Pa0_Pd1_Pe1_pUb1 to dnabound_Foxo1_Pa1_Pd1_Pe1_pUb1 by SGK";  // modifiers: SGK
  R213: cytoplasm_Foxo1_Pa1_Pd0_Pe0_pUb0 => cytoplasm_Foxo1_Pa0_Pd0_Pe0_pUb0; cytoplasm_Foxo1_Pa1_Pd0_Pe0_pUb0*PP2A*R213_kdephos*indicator_foxo; R213 is "conversion of cytoplasm_Foxo1_Pa1_Pd0_Pe0_pUb0 to cytoplasm_Foxo1_Pa0_Pd0_Pe0_pUb0 by PP2A";  // modifiers: PP2A
  R214: nucleus_Foxo1_Pa1_Pd0_Pe0_pUb0 => nucleus_Foxo1_Pa0_Pd0_Pe0_pUb0; nucleus_Foxo1_Pa1_Pd0_Pe0_pUb0*PP2A*R214_kdephos*indicator_foxo; R214 is "conversion of nucleus_Foxo1_Pa1_Pd0_Pe0_pUb0 to nucleus_Foxo1_Pa0_Pd0_Pe0_pUb0 by PP2A";  // modifiers: PP2A
  R215: dnabound_Foxo1_Pa1_Pd0_Pe0_pUb0 => dnabound_Foxo1_Pa0_Pd0_Pe0_pUb0; dnabound_Foxo1_Pa1_Pd0_Pe0_pUb0*PP2A*R215_kdephos*indicator_foxo; R215 is "conversion of dnabound_Foxo1_Pa1_Pd0_Pe0_pUb0 to dnabound_Foxo1_Pa0_Pd0_Pe0_pUb0 by PP2A";  // modifiers: PP2A
  R216: cytoplasm_Foxo1_Pa1_Pd0_Pe0_pUb1 => cytoplasm_Foxo1_Pa0_Pd0_Pe0_pUb1; cytoplasm_Foxo1_Pa1_Pd0_Pe0_pUb1*PP2A*R216_kdephos*indicator_foxo; R216 is "conversion of cytoplasm_Foxo1_Pa1_Pd0_Pe0_pUb1 to cytoplasm_Foxo1_Pa0_Pd0_Pe0_pUb1 by PP2A";  // modifiers: PP2A
  R217: nucleus_Foxo1_Pa1_Pd0_Pe0_pUb1 => nucleus_Foxo1_Pa0_Pd0_Pe0_pUb1; nucleus_Foxo1_Pa1_Pd0_Pe0_pUb1*PP2A*R217_kdephos*indicator_foxo; R217 is "conversion of nucleus_Foxo1_Pa1_Pd0_Pe0_pUb1 to nucleus_Foxo1_Pa0_Pd0_Pe0_pUb1 by PP2A";  // modifiers: PP2A
  R218: dnabound_Foxo1_Pa1_Pd0_Pe0_pUb1 => dnabound_Foxo1_Pa0_Pd0_Pe0_pUb1; dnabound_Foxo1_Pa1_Pd0_Pe0_pUb1*PP2A*R218_kdephos*indicator_foxo; R218 is "conversion of dnabound_Foxo1_Pa1_Pd0_Pe0_pUb1 to dnabound_Foxo1_Pa0_Pd0_Pe0_pUb1 by PP2A";  // modifiers: PP2A
  R219: cytoplasm_Foxo1_Pa1_Pd0_Pe1_pUb0 => cytoplasm_Foxo1_Pa0_Pd0_Pe1_pUb0; cytoplasm_Foxo1_Pa1_Pd0_Pe1_pUb0*PP2A*R219_kdephos*indicator_foxo; R219 is "conversion of cytoplasm_Foxo1_Pa1_Pd0_Pe1_pUb0 to cytoplasm_Foxo1_Pa0_Pd0_Pe1_pUb0 by PP2A";  // modifiers: PP2A
  R220: nucleus_Foxo1_Pa1_Pd0_Pe1_pUb0 => nucleus_Foxo1_Pa0_Pd0_Pe1_pUb0; nucleus_Foxo1_Pa1_Pd0_Pe1_pUb0*PP2A*R220_kdephos*indicator_foxo; R220 is "conversion of nucleus_Foxo1_Pa1_Pd0_Pe1_pUb0 to nucleus_Foxo1_Pa0_Pd0_Pe1_pUb0 by PP2A";  // modifiers: PP2A
  R221: dnabound_Foxo1_Pa1_Pd0_Pe1_pUb0 => dnabound_Foxo1_Pa0_Pd0_Pe1_pUb0; dnabound_Foxo1_Pa1_Pd0_Pe1_pUb0*PP2A*R221_kdephos*indicator_foxo; R221 is "conversion of dnabound_Foxo1_Pa1_Pd0_Pe1_pUb0 to dnabound_Foxo1_Pa0_Pd0_Pe1_pUb0 by PP2A";  // modifiers: PP2A
  R222: cytoplasm_Foxo1_Pa1_Pd0_Pe1_pUb1 => cytoplasm_Foxo1_Pa0_Pd0_Pe1_pUb1; cytoplasm_Foxo1_Pa1_Pd0_Pe1_pUb1*PP2A*R222_kdephos*indicator_foxo; R222 is "conversion of cytoplasm_Foxo1_Pa1_Pd0_Pe1_pUb1 to cytoplasm_Foxo1_Pa0_Pd0_Pe1_pUb1 by PP2A";  // modifiers: PP2A
  R223: nucleus_Foxo1_Pa1_Pd0_Pe1_pUb1 => nucleus_Foxo1_Pa0_Pd0_Pe1_pUb1; nucleus_Foxo1_Pa1_Pd0_Pe1_pUb1*PP2A*R223_kdephos*indicator_foxo; R223 is "conversion of nucleus_Foxo1_Pa1_Pd0_Pe1_pUb1 to nucleus_Foxo1_Pa0_Pd0_Pe1_pUb1 by PP2A";  // modifiers: PP2A
  R224: dnabound_Foxo1_Pa1_Pd0_Pe1_pUb1 => dnabound_Foxo1_Pa0_Pd0_Pe1_pUb1; dnabound_Foxo1_Pa1_Pd0_Pe1_pUb1*PP2A*R224_kdephos*indicator_foxo; R224 is "conversion of dnabound_Foxo1_Pa1_Pd0_Pe1_pUb1 to dnabound_Foxo1_Pa0_Pd0_Pe1_pUb1 by PP2A";  // modifiers: PP2A
  R225: cytoplasm_Foxo1_Pa1_Pd1_Pe0_pUb0 => cytoplasm_Foxo1_Pa0_Pd1_Pe0_pUb0; cytoplasm_Foxo1_Pa1_Pd1_Pe0_pUb0*PP2A*R225_kdephos*indicator_foxo; R225 is "conversion of cytoplasm_Foxo1_Pa1_Pd1_Pe0_pUb0 to cytoplasm_Foxo1_Pa0_Pd1_Pe0_pUb0 by PP2A";  // modifiers: PP2A
  R226: nucleus_Foxo1_Pa1_Pd1_Pe0_pUb0 => nucleus_Foxo1_Pa0_Pd1_Pe0_pUb0; nucleus_Foxo1_Pa1_Pd1_Pe0_pUb0*PP2A*R226_kdephos*indicator_foxo; R226 is "conversion of nucleus_Foxo1_Pa1_Pd1_Pe0_pUb0 to nucleus_Foxo1_Pa0_Pd1_Pe0_pUb0 by PP2A";  // modifiers: PP2A
  R227: dnabound_Foxo1_Pa1_Pd1_Pe0_pUb0 => dnabound_Foxo1_Pa0_Pd1_Pe0_pUb0; dnabound_Foxo1_Pa1_Pd1_Pe0_pUb0*PP2A*R227_kdephos*indicator_foxo; R227 is "conversion of dnabound_Foxo1_Pa1_Pd1_Pe0_pUb0 to dnabound_Foxo1_Pa0_Pd1_Pe0_pUb0 by PP2A";  // modifiers: PP2A
  R228: cytoplasm_Foxo1_Pa1_Pd1_Pe0_pUb1 => cytoplasm_Foxo1_Pa0_Pd1_Pe0_pUb1; cytoplasm_Foxo1_Pa1_Pd1_Pe0_pUb1*PP2A*R228_kdephos*indicator_foxo; R228 is "conversion of cytoplasm_Foxo1_Pa1_Pd1_Pe0_pUb1 to cytoplasm_Foxo1_Pa0_Pd1_Pe0_pUb1 by PP2A";  // modifiers: PP2A
  R229: nucleus_Foxo1_Pa1_Pd1_Pe0_pUb1 => nucleus_Foxo1_Pa0_Pd1_Pe0_pUb1; nucleus_Foxo1_Pa1_Pd1_Pe0_pUb1*PP2A*R229_kdephos*indicator_foxo; R229 is "conversion of nucleus_Foxo1_Pa1_Pd1_Pe0_pUb1 to nucleus_Foxo1_Pa0_Pd1_Pe0_pUb1 by PP2A";  // modifiers: PP2A
  R230: dnabound_Foxo1_Pa1_Pd1_Pe0_pUb1 => dnabound_Foxo1_Pa0_Pd1_Pe0_pUb1; dnabound_Foxo1_Pa1_Pd1_Pe0_pUb1*PP2A*R230_kdephos*indicator_foxo; R230 is "conversion of dnabound_Foxo1_Pa1_Pd1_Pe0_pUb1 to dnabound_Foxo1_Pa0_Pd1_Pe0_pUb1 by PP2A";  // modifiers: PP2A
  R231: cytoplasm_Foxo1_Pa1_Pd1_Pe1_pUb0 => cytoplasm_Foxo1_Pa0_Pd1_Pe1_pUb0; cytoplasm_Foxo1_Pa1_Pd1_Pe1_pUb0*PP2A*R231_kdephos*indicator_foxo; R231 is "conversion of cytoplasm_Foxo1_Pa1_Pd1_Pe1_pUb0 to cytoplasm_Foxo1_Pa0_Pd1_Pe1_pUb0 by PP2A";  // modifiers: PP2A
  R232: nucleus_Foxo1_Pa1_Pd1_Pe1_pUb0 => nucleus_Foxo1_Pa0_Pd1_Pe1_pUb0; nucleus_Foxo1_Pa1_Pd1_Pe1_pUb0*PP2A*R232_kdephos*indicator_foxo; R232 is "conversion of nucleus_Foxo1_Pa1_Pd1_Pe1_pUb0 to nucleus_Foxo1_Pa0_Pd1_Pe1_pUb0 by PP2A";  // modifiers: PP2A
  R233: dnabound_Foxo1_Pa1_Pd1_Pe1_pUb0 => dnabound_Foxo1_Pa0_Pd1_Pe1_pUb0; dnabound_Foxo1_Pa1_Pd1_Pe1_pUb0*PP2A*R233_kdephos*indicator_foxo; R233 is "conversion of dnabound_Foxo1_Pa1_Pd1_Pe1_pUb0 to dnabound_Foxo1_Pa0_Pd1_Pe1_pUb0 by PP2A";  // modifiers: PP2A
  R234: cytoplasm_Foxo1_Pa1_Pd1_Pe1_pUb1 => cytoplasm_Foxo1_Pa0_Pd1_Pe1_pUb1; cytoplasm_Foxo1_Pa1_Pd1_Pe1_pUb1*PP2A*R234_kdephos*indicator_foxo; R234 is "conversion of cytoplasm_Foxo1_Pa1_Pd1_Pe1_pUb1 to cytoplasm_Foxo1_Pa0_Pd1_Pe1_pUb1 by PP2A";  // modifiers: PP2A
  R235: nucleus_Foxo1_Pa1_Pd1_Pe1_pUb1 => nucleus_Foxo1_Pa0_Pd1_Pe1_pUb1; nucleus_Foxo1_Pa1_Pd1_Pe1_pUb1*PP2A*R235_kdephos*indicator_foxo; R235 is "conversion of nucleus_Foxo1_Pa1_Pd1_Pe1_pUb1 to nucleus_Foxo1_Pa0_Pd1_Pe1_pUb1 by PP2A";  // modifiers: PP2A
  R236: dnabound_Foxo1_Pa1_Pd1_Pe1_pUb1 => dnabound_Foxo1_Pa0_Pd1_Pe1_pUb1; dnabound_Foxo1_Pa1_Pd1_Pe1_pUb1*PP2A*R236_kdephos*indicator_foxo; R236 is "conversion of dnabound_Foxo1_Pa1_Pd1_Pe1_pUb1 to dnabound_Foxo1_Pa0_Pd1_Pe1_pUb1 by PP2A";  // modifiers: PP2A
  R237: cytoplasm_Foxo1_Pa0_Pd0_Pe0_pUb0 => cytoplasm_Foxo1_Pa0_Pd1_Pe0_pUb0; cytoplasm_Foxo1_Pa0_Pd0_Pe0_pUb0*IKK_P*by_ikk_phos_factor*R237_kkin*indicator_foxo; R237 is "conversion of cytoplasm_Foxo1_Pa0_Pd0_Pe0_pUb0 to cytoplasm_Foxo1_Pa0_Pd1_Pe0_pUb0 by IKK_P";  // modifiers: IKK_P
  R238: nucleus_Foxo1_Pa0_Pd0_Pe0_pUb0 => nucleus_Foxo1_Pa0_Pd1_Pe0_pUb0; nucleus_Foxo1_Pa0_Pd0_Pe0_pUb0*IKK_P*by_ikk_phos_factor*R238_kkin*indicator_foxo; R238 is "conversion of nucleus_Foxo1_Pa0_Pd0_Pe0_pUb0 to nucleus_Foxo1_Pa0_Pd1_Pe0_pUb0 by IKK_P";  // modifiers: IKK_P
  R239: dnabound_Foxo1_Pa0_Pd0_Pe0_pUb0 => dnabound_Foxo1_Pa0_Pd1_Pe0_pUb0; dnabound_Foxo1_Pa0_Pd0_Pe0_pUb0*IKK_P*by_ikk_phos_factor*R239_kkin*indicator_foxo; R239 is "conversion of dnabound_Foxo1_Pa0_Pd0_Pe0_pUb0 to dnabound_Foxo1_Pa0_Pd1_Pe0_pUb0 by IKK_P";  // modifiers: IKK_P
  R240: cytoplasm_Foxo1_Pa0_Pd0_Pe0_pUb1 => cytoplasm_Foxo1_Pa0_Pd1_Pe0_pUb1; cytoplasm_Foxo1_Pa0_Pd0_Pe0_pUb1*IKK_P*by_ikk_phos_factor*R240_kkin*indicator_foxo; R240 is "conversion of cytoplasm_Foxo1_Pa0_Pd0_Pe0_pUb1 to cytoplasm_Foxo1_Pa0_Pd1_Pe0_pUb1 by IKK_P";  // modifiers: IKK_P
  R241: nucleus_Foxo1_Pa0_Pd0_Pe0_pUb1 => nucleus_Foxo1_Pa0_Pd1_Pe0_pUb1; nucleus_Foxo1_Pa0_Pd0_Pe0_pUb1*IKK_P*by_ikk_phos_factor*R241_kkin*indicator_foxo; R241 is "conversion of nucleus_Foxo1_Pa0_Pd0_Pe0_pUb1 to nucleus_Foxo1_Pa0_Pd1_Pe0_pUb1 by IKK_P";  // modifiers: IKK_P
  R242: dnabound_Foxo1_Pa0_Pd0_Pe0_pUb1 => dnabound_Foxo1_Pa0_Pd1_Pe0_pUb1; dnabound_Foxo1_Pa0_Pd0_Pe0_pUb1*IKK_P*by_ikk_phos_factor*R242_kkin*indicator_foxo; R242 is "conversion of dnabound_Foxo1_Pa0_Pd0_Pe0_pUb1 to dnabound_Foxo1_Pa0_Pd1_Pe0_pUb1 by IKK_P";  // modifiers: IKK_P
  R243: cytoplasm_Foxo1_Pa0_Pd0_Pe1_pUb0 => cytoplasm_Foxo1_Pa0_Pd1_Pe1_pUb0; cytoplasm_Foxo1_Pa0_Pd0_Pe1_pUb0*IKK_P*by_ikk_phos_factor*R243_kkin*indicator_foxo; R243 is "conversion of cytoplasm_Foxo1_Pa0_Pd0_Pe1_pUb0 to cytoplasm_Foxo1_Pa0_Pd1_Pe1_pUb0 by IKK_P";  // modifiers: IKK_P
  R244: nucleus_Foxo1_Pa0_Pd0_Pe1_pUb0 => nucleus_Foxo1_Pa0_Pd1_Pe1_pUb0; nucleus_Foxo1_Pa0_Pd0_Pe1_pUb0*IKK_P*by_ikk_phos_factor*R244_kkin*indicator_foxo; R244 is "conversion of nucleus_Foxo1_Pa0_Pd0_Pe1_pUb0 to nucleus_Foxo1_Pa0_Pd1_Pe1_pUb0 by IKK_P";  // modifiers: IKK_P
  R245: dnabound_Foxo1_Pa0_Pd0_Pe1_pUb0 => dnabound_Foxo1_Pa0_Pd1_Pe1_pUb0; dnabound_Foxo1_Pa0_Pd0_Pe1_pUb0*IKK_P*by_ikk_phos_factor*R245_kkin*indicator_foxo; R245 is "conversion of dnabound_Foxo1_Pa0_Pd0_Pe1_pUb0 to dnabound_Foxo1_Pa0_Pd1_Pe1_pUb0 by IKK_P";  // modifiers: IKK_P
  R246: cytoplasm_Foxo1_Pa0_Pd0_Pe1_pUb1 => cytoplasm_Foxo1_Pa0_Pd1_Pe1_pUb1; cytoplasm_Foxo1_Pa0_Pd0_Pe1_pUb1*IKK_P*by_ikk_phos_factor*R246_kkin*indicator_foxo; R246 is "conversion of cytoplasm_Foxo1_Pa0_Pd0_Pe1_pUb1 to cytoplasm_Foxo1_Pa0_Pd1_Pe1_pUb1 by IKK_P";  // modifiers: IKK_P
  R247: nucleus_Foxo1_Pa0_Pd0_Pe1_pUb1 => nucleus_Foxo1_Pa0_Pd1_Pe1_pUb1; nucleus_Foxo1_Pa0_Pd0_Pe1_pUb1*IKK_P*by_ikk_phos_factor*R247_kkin*indicator_foxo; R247 is "conversion of nucleus_Foxo1_Pa0_Pd0_Pe1_pUb1 to nucleus_Foxo1_Pa0_Pd1_Pe1_pUb1 by IKK_P";  // modifiers: IKK_P
  R248: dnabound_Foxo1_Pa0_Pd0_Pe1_pUb1 => dnabound_Foxo1_Pa0_Pd1_Pe1_pUb1; dnabound_Foxo1_Pa0_Pd0_Pe1_pUb1*IKK_P*by_ikk_phos_factor*R248_kkin*indicator_foxo; R248 is "conversion of dnabound_Foxo1_Pa0_Pd0_Pe1_pUb1 to dnabound_Foxo1_Pa0_Pd1_Pe1_pUb1 by IKK_P";  // modifiers: IKK_P
  R249: cytoplasm_Foxo1_Pa0_Pd1_Pe0_pUb0 => cytoplasm_Foxo1_Pa0_Pd0_Pe0_pUb0; cytoplasm_Foxo1_Pa0_Pd1_Pe0_pUb0*PP2A*R249_kdephos*indicator_foxo; R249 is "conversion of cytoplasm_Foxo1_Pa0_Pd1_Pe0_pUb0 to cytoplasm_Foxo1_Pa0_Pd0_Pe0_pUb0 by PP2A";  // modifiers: PP2A
  R250: nucleus_Foxo1_Pa0_Pd1_Pe0_pUb0 => nucleus_Foxo1_Pa0_Pd0_Pe0_pUb0; nucleus_Foxo1_Pa0_Pd1_Pe0_pUb0*PP2A*R250_kdephos*indicator_foxo; R250 is "conversion of nucleus_Foxo1_Pa0_Pd1_Pe0_pUb0 to nucleus_Foxo1_Pa0_Pd0_Pe0_pUb0 by PP2A";  // modifiers: PP2A
  R251: dnabound_Foxo1_Pa0_Pd1_Pe0_pUb0 => dnabound_Foxo1_Pa0_Pd0_Pe0_pUb0; dnabound_Foxo1_Pa0_Pd1_Pe0_pUb0*PP2A*R251_kdephos*indicator_foxo; R251 is "conversion of dnabound_Foxo1_Pa0_Pd1_Pe0_pUb0 to dnabound_Foxo1_Pa0_Pd0_Pe0_pUb0 by PP2A";  // modifiers: PP2A
  R252: cytoplasm_Foxo1_Pa0_Pd1_Pe0_pUb1 => cytoplasm_Foxo1_Pa0_Pd0_Pe0_pUb1; cytoplasm_Foxo1_Pa0_Pd1_Pe0_pUb1*PP2A*R252_kdephos*indicator_foxo; R252 is "conversion of cytoplasm_Foxo1_Pa0_Pd1_Pe0_pUb1 to cytoplasm_Foxo1_Pa0_Pd0_Pe0_pUb1 by PP2A";  // modifiers: PP2A
  R253: nucleus_Foxo1_Pa0_Pd1_Pe0_pUb1 => nucleus_Foxo1_Pa0_Pd0_Pe0_pUb1; nucleus_Foxo1_Pa0_Pd1_Pe0_pUb1*PP2A*R253_kdephos*indicator_foxo; R253 is "conversion of nucleus_Foxo1_Pa0_Pd1_Pe0_pUb1 to nucleus_Foxo1_Pa0_Pd0_Pe0_pUb1 by PP2A";  // modifiers: PP2A
  R254: dnabound_Foxo1_Pa0_Pd1_Pe0_pUb1 => dnabound_Foxo1_Pa0_Pd0_Pe0_pUb1; dnabound_Foxo1_Pa0_Pd1_Pe0_pUb1*PP2A*R254_kdephos*indicator_foxo; R254 is "conversion of dnabound_Foxo1_Pa0_Pd1_Pe0_pUb1 to dnabound_Foxo1_Pa0_Pd0_Pe0_pUb1 by PP2A";  // modifiers: PP2A
  R255: cytoplasm_Foxo1_Pa0_Pd1_Pe1_pUb0 => cytoplasm_Foxo1_Pa0_Pd0_Pe1_pUb0; cytoplasm_Foxo1_Pa0_Pd1_Pe1_pUb0*PP2A*R255_kdephos*indicator_foxo; R255 is "conversion of cytoplasm_Foxo1_Pa0_Pd1_Pe1_pUb0 to cytoplasm_Foxo1_Pa0_Pd0_Pe1_pUb0 by PP2A";  // modifiers: PP2A
  R256: nucleus_Foxo1_Pa0_Pd1_Pe1_pUb0 => nucleus_Foxo1_Pa0_Pd0_Pe1_pUb0; nucleus_Foxo1_Pa0_Pd1_Pe1_pUb0*PP2A*R256_kdephos*indicator_foxo; R256 is "conversion of nucleus_Foxo1_Pa0_Pd1_Pe1_pUb0 to nucleus_Foxo1_Pa0_Pd0_Pe1_pUb0 by PP2A";  // modifiers: PP2A
  R257: dnabound_Foxo1_Pa0_Pd1_Pe1_pUb0 => dnabound_Foxo1_Pa0_Pd0_Pe1_pUb0; dnabound_Foxo1_Pa0_Pd1_Pe1_pUb0*PP2A*R257_kdephos*indicator_foxo; R257 is "conversion of dnabound_Foxo1_Pa0_Pd1_Pe1_pUb0 to dnabound_Foxo1_Pa0_Pd0_Pe1_pUb0 by PP2A";  // modifiers: PP2A
  R258: cytoplasm_Foxo1_Pa0_Pd1_Pe1_pUb1 => cytoplasm_Foxo1_Pa0_Pd0_Pe1_pUb1; cytoplasm_Foxo1_Pa0_Pd1_Pe1_pUb1*PP2A*R258_kdephos*indicator_foxo; R258 is "conversion of cytoplasm_Foxo1_Pa0_Pd1_Pe1_pUb1 to cytoplasm_Foxo1_Pa0_Pd0_Pe1_pUb1 by PP2A";  // modifiers: PP2A
  R259: nucleus_Foxo1_Pa0_Pd1_Pe1_pUb1 => nucleus_Foxo1_Pa0_Pd0_Pe1_pUb1; nucleus_Foxo1_Pa0_Pd1_Pe1_pUb1*PP2A*R259_kdephos*indicator_foxo; R259 is "conversion of nucleus_Foxo1_Pa0_Pd1_Pe1_pUb1 to nucleus_Foxo1_Pa0_Pd0_Pe1_pUb1 by PP2A";  // modifiers: PP2A
  R260: dnabound_Foxo1_Pa0_Pd1_Pe1_pUb1 => dnabound_Foxo1_Pa0_Pd0_Pe1_pUb1; dnabound_Foxo1_Pa0_Pd1_Pe1_pUb1*PP2A*R260_kdephos*indicator_foxo; R260 is "conversion of dnabound_Foxo1_Pa0_Pd1_Pe1_pUb1 to dnabound_Foxo1_Pa0_Pd0_Pe1_pUb1 by PP2A";  // modifiers: PP2A
  R261: cytoplasm_Foxo1_Pa1_Pd0_Pe0_pUb0 => cytoplasm_Foxo1_Pa1_Pd1_Pe0_pUb0; cytoplasm_Foxo1_Pa1_Pd0_Pe0_pUb0*IKK_P*by_ikk_phos_factor*R261_kkin*indicator_foxo; R261 is "conversion of cytoplasm_Foxo1_Pa1_Pd0_Pe0_pUb0 to cytoplasm_Foxo1_Pa1_Pd1_Pe0_pUb0 by IKK_P";  // modifiers: IKK_P
  R262: nucleus_Foxo1_Pa1_Pd0_Pe0_pUb0 => nucleus_Foxo1_Pa1_Pd1_Pe0_pUb0; nucleus_Foxo1_Pa1_Pd0_Pe0_pUb0*IKK_P*by_ikk_phos_factor*R262_kkin*indicator_foxo; R262 is "conversion of nucleus_Foxo1_Pa1_Pd0_Pe0_pUb0 to nucleus_Foxo1_Pa1_Pd1_Pe0_pUb0 by IKK_P";  // modifiers: IKK_P
  R263: dnabound_Foxo1_Pa1_Pd0_Pe0_pUb0 => dnabound_Foxo1_Pa1_Pd1_Pe0_pUb0; dnabound_Foxo1_Pa1_Pd0_Pe0_pUb0*IKK_P*by_ikk_phos_factor*R263_kkin*indicator_foxo; R263 is "conversion of dnabound_Foxo1_Pa1_Pd0_Pe0_pUb0 to dnabound_Foxo1_Pa1_Pd1_Pe0_pUb0 by IKK_P";  // modifiers: IKK_P
  R264: cytoplasm_Foxo1_Pa1_Pd0_Pe0_pUb1 => cytoplasm_Foxo1_Pa1_Pd1_Pe0_pUb1; cytoplasm_Foxo1_Pa1_Pd0_Pe0_pUb1*IKK_P*by_ikk_phos_factor*R264_kkin*indicator_foxo; R264 is "conversion of cytoplasm_Foxo1_Pa1_Pd0_Pe0_pUb1 to cytoplasm_Foxo1_Pa1_Pd1_Pe0_pUb1 by IKK_P";  // modifiers: IKK_P
  R265: nucleus_Foxo1_Pa1_Pd0_Pe0_pUb1 => nucleus_Foxo1_Pa1_Pd1_Pe0_pUb1; nucleus_Foxo1_Pa1_Pd0_Pe0_pUb1*IKK_P*by_ikk_phos_factor*R265_kkin*indicator_foxo; R265 is "conversion of nucleus_Foxo1_Pa1_Pd0_Pe0_pUb1 to nucleus_Foxo1_Pa1_Pd1_Pe0_pUb1 by IKK_P";  // modifiers: IKK_P
  R266: dnabound_Foxo1_Pa1_Pd0_Pe0_pUb1 => dnabound_Foxo1_Pa1_Pd1_Pe0_pUb1; dnabound_Foxo1_Pa1_Pd0_Pe0_pUb1*IKK_P*by_ikk_phos_factor*R266_kkin*indicator_foxo; R266 is "conversion of dnabound_Foxo1_Pa1_Pd0_Pe0_pUb1 to dnabound_Foxo1_Pa1_Pd1_Pe0_pUb1 by IKK_P";  // modifiers: IKK_P
  R267: cytoplasm_Foxo1_Pa1_Pd0_Pe1_pUb0 => cytoplasm_Foxo1_Pa1_Pd1_Pe1_pUb0; cytoplasm_Foxo1_Pa1_Pd0_Pe1_pUb0*IKK_P*by_ikk_phos_factor*R267_kkin*indicator_foxo; R267 is "conversion of cytoplasm_Foxo1_Pa1_Pd0_Pe1_pUb0 to cytoplasm_Foxo1_Pa1_Pd1_Pe1_pUb0 by IKK_P";  // modifiers: IKK_P
  R268: nucleus_Foxo1_Pa1_Pd0_Pe1_pUb0 => nucleus_Foxo1_Pa1_Pd1_Pe1_pUb0; nucleus_Foxo1_Pa1_Pd0_Pe1_pUb0*IKK_P*by_ikk_phos_factor*R268_kkin*indicator_foxo; R268 is "conversion of nucleus_Foxo1_Pa1_Pd0_Pe1_pUb0 to nucleus_Foxo1_Pa1_Pd1_Pe1_pUb0 by IKK_P";  // modifiers: IKK_P
  R269: dnabound_Foxo1_Pa1_Pd0_Pe1_pUb0 => dnabound_Foxo1_Pa1_Pd1_Pe1_pUb0; dnabound_Foxo1_Pa1_Pd0_Pe1_pUb0*IKK_P*by_ikk_phos_factor*R269_kkin*indicator_foxo; R269 is "conversion of dnabound_Foxo1_Pa1_Pd0_Pe1_pUb0 to dnabound_Foxo1_Pa1_Pd1_Pe1_pUb0 by IKK_P";  // modifiers: IKK_P
  R270: cytoplasm_Foxo1_Pa1_Pd0_Pe1_pUb1 => cytoplasm_Foxo1_Pa1_Pd1_Pe1_pUb1; cytoplasm_Foxo1_Pa1_Pd0_Pe1_pUb1*IKK_P*by_ikk_phos_factor*R270_kkin*indicator_foxo; R270 is "conversion of cytoplasm_Foxo1_Pa1_Pd0_Pe1_pUb1 to cytoplasm_Foxo1_Pa1_Pd1_Pe1_pUb1 by IKK_P";  // modifiers: IKK_P
  R271: nucleus_Foxo1_Pa1_Pd0_Pe1_pUb1 => nucleus_Foxo1_Pa1_Pd1_Pe1_pUb1; nucleus_Foxo1_Pa1_Pd0_Pe1_pUb1*IKK_P*by_ikk_phos_factor*R271_kkin*indicator_foxo; R271 is "conversion of nucleus_Foxo1_Pa1_Pd0_Pe1_pUb1 to nucleus_Foxo1_Pa1_Pd1_Pe1_pUb1 by IKK_P";  // modifiers: IKK_P
  R272: dnabound_Foxo1_Pa1_Pd0_Pe1_pUb1 => dnabound_Foxo1_Pa1_Pd1_Pe1_pUb1; dnabound_Foxo1_Pa1_Pd0_Pe1_pUb1*IKK_P*by_ikk_phos_factor*R272_kkin*indicator_foxo; R272 is "conversion of dnabound_Foxo1_Pa1_Pd0_Pe1_pUb1 to dnabound_Foxo1_Pa1_Pd1_Pe1_pUb1 by IKK_P";  // modifiers: IKK_P
  R273: cytoplasm_Foxo1_Pa1_Pd1_Pe0_pUb0 => cytoplasm_Foxo1_Pa1_Pd0_Pe0_pUb0; cytoplasm_Foxo1_Pa1_Pd1_Pe0_pUb0*PP2A*R273_kdephos*indicator_foxo; R273 is "conversion of cytoplasm_Foxo1_Pa1_Pd1_Pe0_pUb0 to cytoplasm_Foxo1_Pa1_Pd0_Pe0_pUb0 by PP2A";  // modifiers: PP2A
  R274: nucleus_Foxo1_Pa1_Pd1_Pe0_pUb0 => nucleus_Foxo1_Pa1_Pd0_Pe0_pUb0; nucleus_Foxo1_Pa1_Pd1_Pe0_pUb0*PP2A*R274_kdephos*indicator_foxo; R274 is "conversion of nucleus_Foxo1_Pa1_Pd1_Pe0_pUb0 to nucleus_Foxo1_Pa1_Pd0_Pe0_pUb0 by PP2A";  // modifiers: PP2A
  R275: dnabound_Foxo1_Pa1_Pd1_Pe0_pUb0 => dnabound_Foxo1_Pa1_Pd0_Pe0_pUb0; dnabound_Foxo1_Pa1_Pd1_Pe0_pUb0*PP2A*R275_kdephos*indicator_foxo; R275 is "conversion of dnabound_Foxo1_Pa1_Pd1_Pe0_pUb0 to dnabound_Foxo1_Pa1_Pd0_Pe0_pUb0 by PP2A";  // modifiers: PP2A
  R276: cytoplasm_Foxo1_Pa1_Pd1_Pe0_pUb1 => cytoplasm_Foxo1_Pa1_Pd0_Pe0_pUb1; cytoplasm_Foxo1_Pa1_Pd1_Pe0_pUb1*PP2A*R276_kdephos*indicator_foxo; R276 is "conversion of cytoplasm_Foxo1_Pa1_Pd1_Pe0_pUb1 to cytoplasm_Foxo1_Pa1_Pd0_Pe0_pUb1 by PP2A";  // modifiers: PP2A
  R277: nucleus_Foxo1_Pa1_Pd1_Pe0_pUb1 => nucleus_Foxo1_Pa1_Pd0_Pe0_pUb1; nucleus_Foxo1_Pa1_Pd1_Pe0_pUb1*PP2A*R277_kdephos*indicator_foxo; R277 is "conversion of nucleus_Foxo1_Pa1_Pd1_Pe0_pUb1 to nucleus_Foxo1_Pa1_Pd0_Pe0_pUb1 by PP2A";  // modifiers: PP2A
  R278: dnabound_Foxo1_Pa1_Pd1_Pe0_pUb1 => dnabound_Foxo1_Pa1_Pd0_Pe0_pUb1; dnabound_Foxo1_Pa1_Pd1_Pe0_pUb1*PP2A*R278_kdephos*indicator_foxo; R278 is "conversion of dnabound_Foxo1_Pa1_Pd1_Pe0_pUb1 to dnabound_Foxo1_Pa1_Pd0_Pe0_pUb1 by PP2A";  // modifiers: PP2A
  R279: cytoplasm_Foxo1_Pa1_Pd1_Pe1_pUb0 => cytoplasm_Foxo1_Pa1_Pd0_Pe1_pUb0; cytoplasm_Foxo1_Pa1_Pd1_Pe1_pUb0*PP2A*R279_kdephos*indicator_foxo; R279 is "conversion of cytoplasm_Foxo1_Pa1_Pd1_Pe1_pUb0 to cytoplasm_Foxo1_Pa1_Pd0_Pe1_pUb0 by PP2A";  // modifiers: PP2A
  R280: nucleus_Foxo1_Pa1_Pd1_Pe1_pUb0 => nucleus_Foxo1_Pa1_Pd0_Pe1_pUb0; nucleus_Foxo1_Pa1_Pd1_Pe1_pUb0*PP2A*R280_kdephos*indicator_foxo; R280 is "conversion of nucleus_Foxo1_Pa1_Pd1_Pe1_pUb0 to nucleus_Foxo1_Pa1_Pd0_Pe1_pUb0 by PP2A";  // modifiers: PP2A
  R281: dnabound_Foxo1_Pa1_Pd1_Pe1_pUb0 => dnabound_Foxo1_Pa1_Pd0_Pe1_pUb0; dnabound_Foxo1_Pa1_Pd1_Pe1_pUb0*PP2A*R281_kdephos*indicator_foxo; R281 is "conversion of dnabound_Foxo1_Pa1_Pd1_Pe1_pUb0 to dnabound_Foxo1_Pa1_Pd0_Pe1_pUb0 by PP2A";  // modifiers: PP2A
  R282: cytoplasm_Foxo1_Pa1_Pd1_Pe1_pUb1 => cytoplasm_Foxo1_Pa1_Pd0_Pe1_pUb1; cytoplasm_Foxo1_Pa1_Pd1_Pe1_pUb1*PP2A*R282_kdephos*indicator_foxo; R282 is "conversion of cytoplasm_Foxo1_Pa1_Pd1_Pe1_pUb1 to cytoplasm_Foxo1_Pa1_Pd0_Pe1_pUb1 by PP2A";  // modifiers: PP2A
  R283: nucleus_Foxo1_Pa1_Pd1_Pe1_pUb1 => nucleus_Foxo1_Pa1_Pd0_Pe1_pUb1; nucleus_Foxo1_Pa1_Pd1_Pe1_pUb1*PP2A*R283_kdephos*indicator_foxo; R283 is "conversion of nucleus_Foxo1_Pa1_Pd1_Pe1_pUb1 to nucleus_Foxo1_Pa1_Pd0_Pe1_pUb1 by PP2A";  // modifiers: PP2A
  R284: dnabound_Foxo1_Pa1_Pd1_Pe1_pUb1 => dnabound_Foxo1_Pa1_Pd0_Pe1_pUb1; dnabound_Foxo1_Pa1_Pd1_Pe1_pUb1*PP2A*R284_kdephos*indicator_foxo; R284 is "conversion of dnabound_Foxo1_Pa1_Pd1_Pe1_pUb1 to dnabound_Foxo1_Pa1_Pd0_Pe1_pUb1 by PP2A";  // modifiers: PP2A
  R285: cytoplasm_Foxo1_Pa0_Pd0_Pe0_pUb0 => cytoplasm_Foxo1_Pa0_Pd0_Pe1_pUb0; cytoplasm_Foxo1_Pa0_Pd0_Pe0_pUb0*JNK_P*by_jnk_phos_factor*R285_kkin*indicator_foxo; R285 is "conversion of cytoplasm_Foxo1_Pa0_Pd0_Pe0_pUb0 to cytoplasm_Foxo1_Pa0_Pd0_Pe1_pUb0 by JNK_P";  // modifiers: JNK_P
  R286: nucleus_Foxo1_Pa0_Pd0_Pe0_pUb0 => nucleus_Foxo1_Pa0_Pd0_Pe1_pUb0; nucleus_Foxo1_Pa0_Pd0_Pe0_pUb0*JNK_P*by_jnk_phos_factor*R286_kkin*indicator_foxo; R286 is "conversion of nucleus_Foxo1_Pa0_Pd0_Pe0_pUb0 to nucleus_Foxo1_Pa0_Pd0_Pe1_pUb0 by JNK_P";  // modifiers: JNK_P
  R287: dnabound_Foxo1_Pa0_Pd0_Pe0_pUb0 => dnabound_Foxo1_Pa0_Pd0_Pe1_pUb0; dnabound_Foxo1_Pa0_Pd0_Pe0_pUb0*JNK_P*by_jnk_phos_factor*R287_kkin*indicator_foxo; R287 is "conversion of dnabound_Foxo1_Pa0_Pd0_Pe0_pUb0 to dnabound_Foxo1_Pa0_Pd0_Pe1_pUb0 by JNK_P";  // modifiers: JNK_P
  R288: cytoplasm_Foxo1_Pa0_Pd0_Pe0_pUb1 => cytoplasm_Foxo1_Pa0_Pd0_Pe1_pUb1; cytoplasm_Foxo1_Pa0_Pd0_Pe0_pUb1*JNK_P*by_jnk_phos_factor*R288_kkin*indicator_foxo; R288 is "conversion of cytoplasm_Foxo1_Pa0_Pd0_Pe0_pUb1 to cytoplasm_Foxo1_Pa0_Pd0_Pe1_pUb1 by JNK_P";  // modifiers: JNK_P
  R289: nucleus_Foxo1_Pa0_Pd0_Pe0_pUb1 => nucleus_Foxo1_Pa0_Pd0_Pe1_pUb1; nucleus_Foxo1_Pa0_Pd0_Pe0_pUb1*JNK_P*by_jnk_phos_factor*R289_kkin*indicator_foxo; R289 is "conversion of nucleus_Foxo1_Pa0_Pd0_Pe0_pUb1 to nucleus_Foxo1_Pa0_Pd0_Pe1_pUb1 by JNK_P";  // modifiers: JNK_P
  R290: dnabound_Foxo1_Pa0_Pd0_Pe0_pUb1 => dnabound_Foxo1_Pa0_Pd0_Pe1_pUb1; dnabound_Foxo1_Pa0_Pd0_Pe0_pUb1*JNK_P*by_jnk_phos_factor*R290_kkin*indicator_foxo; R290 is "conversion of dnabound_Foxo1_Pa0_Pd0_Pe0_pUb1 to dnabound_Foxo1_Pa0_Pd0_Pe1_pUb1 by JNK_P";  // modifiers: JNK_P
  R291: cytoplasm_Foxo1_Pa0_Pd0_Pe1_pUb0 => cytoplasm_Foxo1_Pa0_Pd0_Pe0_pUb0; cytoplasm_Foxo1_Pa0_Pd0_Pe1_pUb0*PP2A*R291_kdephos*indicator_foxo; R291 is "conversion of cytoplasm_Foxo1_Pa0_Pd0_Pe1_pUb0 to cytoplasm_Foxo1_Pa0_Pd0_Pe0_pUb0 by PP2A";  // modifiers: PP2A
  R292: nucleus_Foxo1_Pa0_Pd0_Pe1_pUb0 => nucleus_Foxo1_Pa0_Pd0_Pe0_pUb0; nucleus_Foxo1_Pa0_Pd0_Pe1_pUb0*PP2A*R292_kdephos*indicator_foxo; R292 is "conversion of nucleus_Foxo1_Pa0_Pd0_Pe1_pUb0 to nucleus_Foxo1_Pa0_Pd0_Pe0_pUb0 by PP2A";  // modifiers: PP2A
  R293: dnabound_Foxo1_Pa0_Pd0_Pe1_pUb0 => dnabound_Foxo1_Pa0_Pd0_Pe0_pUb0; dnabound_Foxo1_Pa0_Pd0_Pe1_pUb0*PP2A*R293_kdephos*indicator_foxo; R293 is "conversion of dnabound_Foxo1_Pa0_Pd0_Pe1_pUb0 to dnabound_Foxo1_Pa0_Pd0_Pe0_pUb0 by PP2A";  // modifiers: PP2A
  R294: cytoplasm_Foxo1_Pa0_Pd0_Pe1_pUb1 => cytoplasm_Foxo1_Pa0_Pd0_Pe0_pUb1; cytoplasm_Foxo1_Pa0_Pd0_Pe1_pUb1*PP2A*R294_kdephos*indicator_foxo; R294 is "conversion of cytoplasm_Foxo1_Pa0_Pd0_Pe1_pUb1 to cytoplasm_Foxo1_Pa0_Pd0_Pe0_pUb1 by PP2A";  // modifiers: PP2A
  R295: nucleus_Foxo1_Pa0_Pd0_Pe1_pUb1 => nucleus_Foxo1_Pa0_Pd0_Pe0_pUb1; nucleus_Foxo1_Pa0_Pd0_Pe1_pUb1*PP2A*R295_kdephos*indicator_foxo; R295 is "conversion of nucleus_Foxo1_Pa0_Pd0_Pe1_pUb1 to nucleus_Foxo1_Pa0_Pd0_Pe0_pUb1 by PP2A";  // modifiers: PP2A
  R296: dnabound_Foxo1_Pa0_Pd0_Pe1_pUb1 => dnabound_Foxo1_Pa0_Pd0_Pe0_pUb1; dnabound_Foxo1_Pa0_Pd0_Pe1_pUb1*PP2A*R296_kdephos*indicator_foxo; R296 is "conversion of dnabound_Foxo1_Pa0_Pd0_Pe1_pUb1 to dnabound_Foxo1_Pa0_Pd0_Pe0_pUb1 by PP2A";  // modifiers: PP2A
  R297: cytoplasm_Foxo1_Pa0_Pd1_Pe0_pUb0 => cytoplasm_Foxo1_Pa0_Pd1_Pe1_pUb0; cytoplasm_Foxo1_Pa0_Pd1_Pe0_pUb0*JNK_P*by_jnk_phos_factor*R297_kkin*indicator_foxo; R297 is "conversion of cytoplasm_Foxo1_Pa0_Pd1_Pe0_pUb0 to cytoplasm_Foxo1_Pa0_Pd1_Pe1_pUb0 by JNK_P";  // modifiers: JNK_P
  R298: nucleus_Foxo1_Pa0_Pd1_Pe0_pUb0 => nucleus_Foxo1_Pa0_Pd1_Pe1_pUb0; nucleus_Foxo1_Pa0_Pd1_Pe0_pUb0*JNK_P*by_jnk_phos_factor*R298_kkin*indicator_foxo; R298 is "conversion of nucleus_Foxo1_Pa0_Pd1_Pe0_pUb0 to nucleus_Foxo1_Pa0_Pd1_Pe1_pUb0 by JNK_P";  // modifiers: JNK_P
  R299: dnabound_Foxo1_Pa0_Pd1_Pe0_pUb0 => dnabound_Foxo1_Pa0_Pd1_Pe1_pUb0; dnabound_Foxo1_Pa0_Pd1_Pe0_pUb0*JNK_P*by_jnk_phos_factor*R299_kkin*indicator_foxo; R299 is "conversion of dnabound_Foxo1_Pa0_Pd1_Pe0_pUb0 to dnabound_Foxo1_Pa0_Pd1_Pe1_pUb0 by JNK_P";  // modifiers: JNK_P
  R300: cytoplasm_Foxo1_Pa0_Pd1_Pe0_pUb1 => cytoplasm_Foxo1_Pa0_Pd1_Pe1_pUb1; cytoplasm_Foxo1_Pa0_Pd1_Pe0_pUb1*JNK_P*by_jnk_phos_factor*R300_kkin*indicator_foxo; R300 is "conversion of cytoplasm_Foxo1_Pa0_Pd1_Pe0_pUb1 to cytoplasm_Foxo1_Pa0_Pd1_Pe1_pUb1 by JNK_P";  // modifiers: JNK_P
  R301: nucleus_Foxo1_Pa0_Pd1_Pe0_pUb1 => nucleus_Foxo1_Pa0_Pd1_Pe1_pUb1; nucleus_Foxo1_Pa0_Pd1_Pe0_pUb1*JNK_P*by_jnk_phos_factor*R301_kkin*indicator_foxo; R301 is "conversion of nucleus_Foxo1_Pa0_Pd1_Pe0_pUb1 to nucleus_Foxo1_Pa0_Pd1_Pe1_pUb1 by JNK_P";  // modifiers: JNK_P
  R302: dnabound_Foxo1_Pa0_Pd1_Pe0_pUb1 => dnabound_Foxo1_Pa0_Pd1_Pe1_pUb1; dnabound_Foxo1_Pa0_Pd1_Pe0_pUb1*JNK_P*by_jnk_phos_factor*R302_kkin*indicator_foxo; R302 is "conversion of dnabound_Foxo1_Pa0_Pd1_Pe0_pUb1 to dnabound_Foxo1_Pa0_Pd1_Pe1_pUb1 by JNK_P";  // modifiers: JNK_P
  R303: cytoplasm_Foxo1_Pa0_Pd1_Pe1_pUb0 => cytoplasm_Foxo1_Pa0_Pd1_Pe0_pUb0; cytoplasm_Foxo1_Pa0_Pd1_Pe1_pUb0*PP2A*R303_kdephos*indicator_foxo; R303 is "conversion of cytoplasm_Foxo1_Pa0_Pd1_Pe1_pUb0 to cytoplasm_Foxo1_Pa0_Pd1_Pe0_pUb0 by PP2A";  // modifiers: PP2A
  R304: nucleus_Foxo1_Pa0_Pd1_Pe1_pUb0 => nucleus_Foxo1_Pa0_Pd1_Pe0_pUb0; nucleus_Foxo1_Pa0_Pd1_Pe1_pUb0*PP2A*R304_kdephos*indicator_foxo; R304 is "conversion of nucleus_Foxo1_Pa0_Pd1_Pe1_pUb0 to nucleus_Foxo1_Pa0_Pd1_Pe0_pUb0 by PP2A";  // modifiers: PP2A
  R305: dnabound_Foxo1_Pa0_Pd1_Pe1_pUb0 => dnabound_Foxo1_Pa0_Pd1_Pe0_pUb0; dnabound_Foxo1_Pa0_Pd1_Pe1_pUb0*PP2A*R305_kdephos*indicator_foxo; R305 is "conversion of dnabound_Foxo1_Pa0_Pd1_Pe1_pUb0 to dnabound_Foxo1_Pa0_Pd1_Pe0_pUb0 by PP2A";  // modifiers: PP2A
  R306: cytoplasm_Foxo1_Pa0_Pd1_Pe1_pUb1 => cytoplasm_Foxo1_Pa0_Pd1_Pe0_pUb1; cytoplasm_Foxo1_Pa0_Pd1_Pe1_pUb1*PP2A*R306_kdephos*indicator_foxo; R306 is "conversion of cytoplasm_Foxo1_Pa0_Pd1_Pe1_pUb1 to cytoplasm_Foxo1_Pa0_Pd1_Pe0_pUb1 by PP2A";  // modifiers: PP2A
  R307: nucleus_Foxo1_Pa0_Pd1_Pe1_pUb1 => nucleus_Foxo1_Pa0_Pd1_Pe0_pUb1; nucleus_Foxo1_Pa0_Pd1_Pe1_pUb1*PP2A*R307_kdephos*indicator_foxo; R307 is "conversion of nucleus_Foxo1_Pa0_Pd1_Pe1_pUb1 to nucleus_Foxo1_Pa0_Pd1_Pe0_pUb1 by PP2A";  // modifiers: PP2A
  R308: dnabound_Foxo1_Pa0_Pd1_Pe1_pUb1 => dnabound_Foxo1_Pa0_Pd1_Pe0_pUb1; dnabound_Foxo1_Pa0_Pd1_Pe1_pUb1*PP2A*R308_kdephos*indicator_foxo; R308 is "conversion of dnabound_Foxo1_Pa0_Pd1_Pe1_pUb1 to dnabound_Foxo1_Pa0_Pd1_Pe0_pUb1 by PP2A";  // modifiers: PP2A
  R309: cytoplasm_Foxo1_Pa1_Pd0_Pe0_pUb0 => cytoplasm_Foxo1_Pa1_Pd0_Pe1_pUb0; cytoplasm_Foxo1_Pa1_Pd0_Pe0_pUb0*JNK_P*by_jnk_phos_factor*R309_kkin*indicator_foxo; R309 is "conversion of cytoplasm_Foxo1_Pa1_Pd0_Pe0_pUb0 to cytoplasm_Foxo1_Pa1_Pd0_Pe1_pUb0 by JNK_P";  // modifiers: JNK_P
  R310: nucleus_Foxo1_Pa1_Pd0_Pe0_pUb0 => nucleus_Foxo1_Pa1_Pd0_Pe1_pUb0; nucleus_Foxo1_Pa1_Pd0_Pe0_pUb0*JNK_P*by_jnk_phos_factor*R310_kkin*indicator_foxo; R310 is "conversion of nucleus_Foxo1_Pa1_Pd0_Pe0_pUb0 to nucleus_Foxo1_Pa1_Pd0_Pe1_pUb0 by JNK_P";  // modifiers: JNK_P
  R311: dnabound_Foxo1_Pa1_Pd0_Pe0_pUb0 => dnabound_Foxo1_Pa1_Pd0_Pe1_pUb0; dnabound_Foxo1_Pa1_Pd0_Pe0_pUb0*JNK_P*by_jnk_phos_factor*R311_kkin*indicator_foxo; R311 is "conversion of dnabound_Foxo1_Pa1_Pd0_Pe0_pUb0 to dnabound_Foxo1_Pa1_Pd0_Pe1_pUb0 by JNK_P";  // modifiers: JNK_P
  R312: cytoplasm_Foxo1_Pa1_Pd0_Pe0_pUb1 => cytoplasm_Foxo1_Pa1_Pd0_Pe1_pUb1; cytoplasm_Foxo1_Pa1_Pd0_Pe0_pUb1*JNK_P*by_jnk_phos_factor*R312_kkin*indicator_foxo; R312 is "conversion of cytoplasm_Foxo1_Pa1_Pd0_Pe0_pUb1 to cytoplasm_Foxo1_Pa1_Pd0_Pe1_pUb1 by JNK_P";  // modifiers: JNK_P
  R313: nucleus_Foxo1_Pa1_Pd0_Pe0_pUb1 => nucleus_Foxo1_Pa1_Pd0_Pe1_pUb1; nucleus_Foxo1_Pa1_Pd0_Pe0_pUb1*JNK_P*by_jnk_phos_factor*R313_kkin*indicator_foxo; R313 is "conversion of nucleus_Foxo1_Pa1_Pd0_Pe0_pUb1 to nucleus_Foxo1_Pa1_Pd0_Pe1_pUb1 by JNK_P";  // modifiers: JNK_P
  R314: dnabound_Foxo1_Pa1_Pd0_Pe0_pUb1 => dnabound_Foxo1_Pa1_Pd0_Pe1_pUb1; dnabound_Foxo1_Pa1_Pd0_Pe0_pUb1*JNK_P*by_jnk_phos_factor*R314_kkin*indicator_foxo; R314 is "conversion of dnabound_Foxo1_Pa1_Pd0_Pe0_pUb1 to dnabound_Foxo1_Pa1_Pd0_Pe1_pUb1 by JNK_P";  // modifiers: JNK_P
  R315: cytoplasm_Foxo1_Pa1_Pd0_Pe1_pUb0 => cytoplasm_Foxo1_Pa1_Pd0_Pe0_pUb0; cytoplasm_Foxo1_Pa1_Pd0_Pe1_pUb0*PP2A*R315_kdephos*indicator_foxo; R315 is "conversion of cytoplasm_Foxo1_Pa1_Pd0_Pe1_pUb0 to cytoplasm_Foxo1_Pa1_Pd0_Pe0_pUb0 by PP2A";  // modifiers: PP2A
  R316: nucleus_Foxo1_Pa1_Pd0_Pe1_pUb0 => nucleus_Foxo1_Pa1_Pd0_Pe0_pUb0; nucleus_Foxo1_Pa1_Pd0_Pe1_pUb0*PP2A*R316_kdephos*indicator_foxo; R316 is "conversion of nucleus_Foxo1_Pa1_Pd0_Pe1_pUb0 to nucleus_Foxo1_Pa1_Pd0_Pe0_pUb0 by PP2A";  // modifiers: PP2A
  R317: dnabound_Foxo1_Pa1_Pd0_Pe1_pUb0 => dnabound_Foxo1_Pa1_Pd0_Pe0_pUb0; dnabound_Foxo1_Pa1_Pd0_Pe1_pUb0*PP2A*R317_kdephos*indicator_foxo; R317 is "conversion of dnabound_Foxo1_Pa1_Pd0_Pe1_pUb0 to dnabound_Foxo1_Pa1_Pd0_Pe0_pUb0 by PP2A";  // modifiers: PP2A
  R318: cytoplasm_Foxo1_Pa1_Pd0_Pe1_pUb1 => cytoplasm_Foxo1_Pa1_Pd0_Pe0_pUb1; cytoplasm_Foxo1_Pa1_Pd0_Pe1_pUb1*PP2A*R318_kdephos*indicator_foxo; R318 is "conversion of cytoplasm_Foxo1_Pa1_Pd0_Pe1_pUb1 to cytoplasm_Foxo1_Pa1_Pd0_Pe0_pUb1 by PP2A";  // modifiers: PP2A
  R319: nucleus_Foxo1_Pa1_Pd0_Pe1_pUb1 => nucleus_Foxo1_Pa1_Pd0_Pe0_pUb1; nucleus_Foxo1_Pa1_Pd0_Pe1_pUb1*PP2A*R319_kdephos*indicator_foxo; R319 is "conversion of nucleus_Foxo1_Pa1_Pd0_Pe1_pUb1 to nucleus_Foxo1_Pa1_Pd0_Pe0_pUb1 by PP2A";  // modifiers: PP2A
  R320: dnabound_Foxo1_Pa1_Pd0_Pe1_pUb1 => dnabound_Foxo1_Pa1_Pd0_Pe0_pUb1; dnabound_Foxo1_Pa1_Pd0_Pe1_pUb1*PP2A*R320_kdephos*indicator_foxo; R320 is "conversion of dnabound_Foxo1_Pa1_Pd0_Pe1_pUb1 to dnabound_Foxo1_Pa1_Pd0_Pe0_pUb1 by PP2A";  // modifiers: PP2A
  R321: cytoplasm_Foxo1_Pa1_Pd1_Pe0_pUb0 => cytoplasm_Foxo1_Pa1_Pd1_Pe1_pUb0; cytoplasm_Foxo1_Pa1_Pd1_Pe0_pUb0*JNK_P*by_jnk_phos_factor*R321_kkin*indicator_foxo; R321 is "conversion of cytoplasm_Foxo1_Pa1_Pd1_Pe0_pUb0 to cytoplasm_Foxo1_Pa1_Pd1_Pe1_pUb0 by JNK_P";  // modifiers: JNK_P
  R322: nucleus_Foxo1_Pa1_Pd1_Pe0_pUb0 => nucleus_Foxo1_Pa1_Pd1_Pe1_pUb0; nucleus_Foxo1_Pa1_Pd1_Pe0_pUb0*JNK_P*by_jnk_phos_factor*R322_kkin*indicator_foxo; R322 is "conversion of nucleus_Foxo1_Pa1_Pd1_Pe0_pUb0 to nucleus_Foxo1_Pa1_Pd1_Pe1_pUb0 by JNK_P";  // modifiers: JNK_P
  R323: dnabound_Foxo1_Pa1_Pd1_Pe0_pUb0 => dnabound_Foxo1_Pa1_Pd1_Pe1_pUb0; dnabound_Foxo1_Pa1_Pd1_Pe0_pUb0*JNK_P*by_jnk_phos_factor*R323_kkin*indicator_foxo; R323 is "conversion of dnabound_Foxo1_Pa1_Pd1_Pe0_pUb0 to dnabound_Foxo1_Pa1_Pd1_Pe1_pUb0 by JNK_P";  // modifiers: JNK_P
  R324: cytoplasm_Foxo1_Pa1_Pd1_Pe0_pUb1 => cytoplasm_Foxo1_Pa1_Pd1_Pe1_pUb1; cytoplasm_Foxo1_Pa1_Pd1_Pe0_pUb1*JNK_P*by_jnk_phos_factor*R324_kkin*indicator_foxo; R324 is "conversion of cytoplasm_Foxo1_Pa1_Pd1_Pe0_pUb1 to cytoplasm_Foxo1_Pa1_Pd1_Pe1_pUb1 by JNK_P";  // modifiers: JNK_P
  R325: nucleus_Foxo1_Pa1_Pd1_Pe0_pUb1 => nucleus_Foxo1_Pa1_Pd1_Pe1_pUb1; nucleus_Foxo1_Pa1_Pd1_Pe0_pUb1*JNK_P*by_jnk_phos_factor*R325_kkin*indicator_foxo; R325 is "conversion of nucleus_Foxo1_Pa1_Pd1_Pe0_pUb1 to nucleus_Foxo1_Pa1_Pd1_Pe1_pUb1 by JNK_P";  // modifiers: JNK_P
  R326: dnabound_Foxo1_Pa1_Pd1_Pe0_pUb1 => dnabound_Foxo1_Pa1_Pd1_Pe1_pUb1; dnabound_Foxo1_Pa1_Pd1_Pe0_pUb1*JNK_P*by_jnk_phos_factor*R326_kkin*indicator_foxo; R326 is "conversion of dnabound_Foxo1_Pa1_Pd1_Pe0_pUb1 to dnabound_Foxo1_Pa1_Pd1_Pe1_pUb1 by JNK_P";  // modifiers: JNK_P
  R327: cytoplasm_Foxo1_Pa1_Pd1_Pe1_pUb0 => cytoplasm_Foxo1_Pa1_Pd1_Pe0_pUb0; cytoplasm_Foxo1_Pa1_Pd1_Pe1_pUb0*PP2A*R327_kdephos*indicator_foxo; R327 is "conversion of cytoplasm_Foxo1_Pa1_Pd1_Pe1_pUb0 to cytoplasm_Foxo1_Pa1_Pd1_Pe0_pUb0 by PP2A";  // modifiers: PP2A
  R328: nucleus_Foxo1_Pa1_Pd1_Pe1_pUb0 => nucleus_Foxo1_Pa1_Pd1_Pe0_pUb0; nucleus_Foxo1_Pa1_Pd1_Pe1_pUb0*PP2A*R328_kdephos*indicator_foxo; R328 is "conversion of nucleus_Foxo1_Pa1_Pd1_Pe1_pUb0 to nucleus_Foxo1_Pa1_Pd1_Pe0_pUb0 by PP2A";  // modifiers: PP2A
  R329: dnabound_Foxo1_Pa1_Pd1_Pe1_pUb0 => dnabound_Foxo1_Pa1_Pd1_Pe0_pUb0; dnabound_Foxo1_Pa1_Pd1_Pe1_pUb0*PP2A*R329_kdephos*indicator_foxo; R329 is "conversion of dnabound_Foxo1_Pa1_Pd1_Pe1_pUb0 to dnabound_Foxo1_Pa1_Pd1_Pe0_pUb0 by PP2A";  // modifiers: PP2A
  R330: cytoplasm_Foxo1_Pa1_Pd1_Pe1_pUb1 => cytoplasm_Foxo1_Pa1_Pd1_Pe0_pUb1; cytoplasm_Foxo1_Pa1_Pd1_Pe1_pUb1*PP2A*R330_kdephos*indicator_foxo; R330 is "conversion of cytoplasm_Foxo1_Pa1_Pd1_Pe1_pUb1 to cytoplasm_Foxo1_Pa1_Pd1_Pe0_pUb1 by PP2A";  // modifiers: PP2A
  R331: nucleus_Foxo1_Pa1_Pd1_Pe1_pUb1 => nucleus_Foxo1_Pa1_Pd1_Pe0_pUb1; nucleus_Foxo1_Pa1_Pd1_Pe1_pUb1*PP2A*R331_kdephos*indicator_foxo; R331 is "conversion of nucleus_Foxo1_Pa1_Pd1_Pe1_pUb1 to nucleus_Foxo1_Pa1_Pd1_Pe0_pUb1 by PP2A";  // modifiers: PP2A
  R332: dnabound_Foxo1_Pa1_Pd1_Pe1_pUb1 => dnabound_Foxo1_Pa1_Pd1_Pe0_pUb1; dnabound_Foxo1_Pa1_Pd1_Pe1_pUb1*PP2A*R332_kdephos*indicator_foxo; R332 is "conversion of dnabound_Foxo1_Pa1_Pd1_Pe1_pUb1 to dnabound_Foxo1_Pa1_Pd1_Pe0_pUb1 by PP2A";  // modifiers: PP2A
  R333: cytoplasm_Foxo1_Pa0_Pd0_Pe0_pUb0 => cytoplasm_Foxo1_Pa0_Pd0_Pe0_pUb1; cytoplasm_Foxo1_Pa0_Pd0_Pe0_pUb0*SCF*R333_kub*indicator_foxo; R333 is "conversion of cytoplasm_Foxo1_Pa0_Pd0_Pe0_pUb0 to cytoplasm_Foxo1_Pa0_Pd0_Pe0_pUb1 by SCF";  // modifiers: SCF
  R334: nucleus_Foxo1_Pa0_Pd0_Pe0_pUb0 => nucleus_Foxo1_Pa0_Pd0_Pe0_pUb1; nucleus_Foxo1_Pa0_Pd0_Pe0_pUb0*SCF*R334_kub*indicator_foxo; R334 is "conversion of nucleus_Foxo1_Pa0_Pd0_Pe0_pUb0 to nucleus_Foxo1_Pa0_Pd0_Pe0_pUb1 by SCF";  // modifiers: SCF
  R335: dnabound_Foxo1_Pa0_Pd0_Pe0_pUb0 => dnabound_Foxo1_Pa0_Pd0_Pe0_pUb1; dnabound_Foxo1_Pa0_Pd0_Pe0_pUb0*SCF*R335_kub*indicator_foxo; R335 is "conversion of dnabound_Foxo1_Pa0_Pd0_Pe0_pUb0 to dnabound_Foxo1_Pa0_Pd0_Pe0_pUb1 by SCF";  // modifiers: SCF
  R336: cytoplasm_Foxo1_Pa0_Pd0_Pe1_pUb0 => cytoplasm_Foxo1_Pa0_Pd0_Pe1_pUb1; cytoplasm_Foxo1_Pa0_Pd0_Pe1_pUb0*SCF*R336_kub*indicator_foxo; R336 is "conversion of cytoplasm_Foxo1_Pa0_Pd0_Pe1_pUb0 to cytoplasm_Foxo1_Pa0_Pd0_Pe1_pUb1 by SCF";  // modifiers: SCF
  R337: nucleus_Foxo1_Pa0_Pd0_Pe1_pUb0 => nucleus_Foxo1_Pa0_Pd0_Pe1_pUb1; nucleus_Foxo1_Pa0_Pd0_Pe1_pUb0*SCF*R337_kub*indicator_foxo; R337 is "conversion of nucleus_Foxo1_Pa0_Pd0_Pe1_pUb0 to nucleus_Foxo1_Pa0_Pd0_Pe1_pUb1 by SCF";  // modifiers: SCF
  R338: dnabound_Foxo1_Pa0_Pd0_Pe1_pUb0 => dnabound_Foxo1_Pa0_Pd0_Pe1_pUb1; dnabound_Foxo1_Pa0_Pd0_Pe1_pUb0*SCF*R338_kub*indicator_foxo; R338 is "conversion of dnabound_Foxo1_Pa0_Pd0_Pe1_pUb0 to dnabound_Foxo1_Pa0_Pd0_Pe1_pUb1 by SCF";  // modifiers: SCF
  R339: cytoplasm_Foxo1_Pa0_Pd1_Pe0_pUb0 => cytoplasm_Foxo1_Pa0_Pd1_Pe0_pUb1; cytoplasm_Foxo1_Pa0_Pd1_Pe0_pUb0*SCF*R339_kub*indicator_foxo; R339 is "conversion of cytoplasm_Foxo1_Pa0_Pd1_Pe0_pUb0 to cytoplasm_Foxo1_Pa0_Pd1_Pe0_pUb1 by SCF";  // modifiers: SCF
  R340: nucleus_Foxo1_Pa0_Pd1_Pe0_pUb0 => nucleus_Foxo1_Pa0_Pd1_Pe0_pUb1; nucleus_Foxo1_Pa0_Pd1_Pe0_pUb0*SCF*R340_kub*indicator_foxo; R340 is "conversion of nucleus_Foxo1_Pa0_Pd1_Pe0_pUb0 to nucleus_Foxo1_Pa0_Pd1_Pe0_pUb1 by SCF";  // modifiers: SCF
  R341: dnabound_Foxo1_Pa0_Pd1_Pe0_pUb0 => dnabound_Foxo1_Pa0_Pd1_Pe0_pUb1; dnabound_Foxo1_Pa0_Pd1_Pe0_pUb0*SCF*R341_kub*indicator_foxo; R341 is "conversion of dnabound_Foxo1_Pa0_Pd1_Pe0_pUb0 to dnabound_Foxo1_Pa0_Pd1_Pe0_pUb1 by SCF";  // modifiers: SCF
  R342: cytoplasm_Foxo1_Pa0_Pd1_Pe1_pUb0 => cytoplasm_Foxo1_Pa0_Pd1_Pe1_pUb1; cytoplasm_Foxo1_Pa0_Pd1_Pe1_pUb0*SCF*R342_kub*indicator_foxo; R342 is "conversion of cytoplasm_Foxo1_Pa0_Pd1_Pe1_pUb0 to cytoplasm_Foxo1_Pa0_Pd1_Pe1_pUb1 by SCF";  // modifiers: SCF
  R343: nucleus_Foxo1_Pa0_Pd1_Pe1_pUb0 => nucleus_Foxo1_Pa0_Pd1_Pe1_pUb1; nucleus_Foxo1_Pa0_Pd1_Pe1_pUb0*SCF*R343_kub*indicator_foxo; R343 is "conversion of nucleus_Foxo1_Pa0_Pd1_Pe1_pUb0 to nucleus_Foxo1_Pa0_Pd1_Pe1_pUb1 by SCF";  // modifiers: SCF
  R344: dnabound_Foxo1_Pa0_Pd1_Pe1_pUb0 => dnabound_Foxo1_Pa0_Pd1_Pe1_pUb1; dnabound_Foxo1_Pa0_Pd1_Pe1_pUb0*SCF*R344_kub*indicator_foxo; R344 is "conversion of dnabound_Foxo1_Pa0_Pd1_Pe1_pUb0 to dnabound_Foxo1_Pa0_Pd1_Pe1_pUb1 by SCF";  // modifiers: SCF
  R345: cytoplasm_Foxo1_Pa1_Pd0_Pe0_pUb0 => cytoplasm_Foxo1_Pa1_Pd0_Pe0_pUb1; cytoplasm_Foxo1_Pa1_Pd0_Pe0_pUb0*SCF*R345_kub*indicator_foxo; R345 is "conversion of cytoplasm_Foxo1_Pa1_Pd0_Pe0_pUb0 to cytoplasm_Foxo1_Pa1_Pd0_Pe0_pUb1 by SCF";  // modifiers: SCF
  R346: nucleus_Foxo1_Pa1_Pd0_Pe0_pUb0 => nucleus_Foxo1_Pa1_Pd0_Pe0_pUb1; nucleus_Foxo1_Pa1_Pd0_Pe0_pUb0*SCF*R346_kub*indicator_foxo; R346 is "conversion of nucleus_Foxo1_Pa1_Pd0_Pe0_pUb0 to nucleus_Foxo1_Pa1_Pd0_Pe0_pUb1 by SCF";  // modifiers: SCF
  R347: dnabound_Foxo1_Pa1_Pd0_Pe0_pUb0 => dnabound_Foxo1_Pa1_Pd0_Pe0_pUb1; dnabound_Foxo1_Pa1_Pd0_Pe0_pUb0*SCF*R347_kub*indicator_foxo; R347 is "conversion of dnabound_Foxo1_Pa1_Pd0_Pe0_pUb0 to dnabound_Foxo1_Pa1_Pd0_Pe0_pUb1 by SCF";  // modifiers: SCF
  R348: cytoplasm_Foxo1_Pa1_Pd0_Pe1_pUb0 => cytoplasm_Foxo1_Pa1_Pd0_Pe1_pUb1; cytoplasm_Foxo1_Pa1_Pd0_Pe1_pUb0*SCF*R348_kub*indicator_foxo; R348 is "conversion of cytoplasm_Foxo1_Pa1_Pd0_Pe1_pUb0 to cytoplasm_Foxo1_Pa1_Pd0_Pe1_pUb1 by SCF";  // modifiers: SCF
  R349: nucleus_Foxo1_Pa1_Pd0_Pe1_pUb0 => nucleus_Foxo1_Pa1_Pd0_Pe1_pUb1; nucleus_Foxo1_Pa1_Pd0_Pe1_pUb0*SCF*R349_kub*indicator_foxo; R349 is "conversion of nucleus_Foxo1_Pa1_Pd0_Pe1_pUb0 to nucleus_Foxo1_Pa1_Pd0_Pe1_pUb1 by SCF";  // modifiers: SCF
  R350: dnabound_Foxo1_Pa1_Pd0_Pe1_pUb0 => dnabound_Foxo1_Pa1_Pd0_Pe1_pUb1; dnabound_Foxo1_Pa1_Pd0_Pe1_pUb0*SCF*R350_kub*indicator_foxo; R350 is "conversion of dnabound_Foxo1_Pa1_Pd0_Pe1_pUb0 to dnabound_Foxo1_Pa1_Pd0_Pe1_pUb1 by SCF";  // modifiers: SCF
  R351: cytoplasm_Foxo1_Pa1_Pd1_Pe0_pUb0 => cytoplasm_Foxo1_Pa1_Pd1_Pe0_pUb1; cytoplasm_Foxo1_Pa1_Pd1_Pe0_pUb0*SCF*R351_kub*indicator_foxo; R351 is "conversion of cytoplasm_Foxo1_Pa1_Pd1_Pe0_pUb0 to cytoplasm_Foxo1_Pa1_Pd1_Pe0_pUb1 by SCF";  // modifiers: SCF
  R352: nucleus_Foxo1_Pa1_Pd1_Pe0_pUb0 => nucleus_Foxo1_Pa1_Pd1_Pe0_pUb1; nucleus_Foxo1_Pa1_Pd1_Pe0_pUb0*SCF*R352_kub*indicator_foxo; R352 is "conversion of nucleus_Foxo1_Pa1_Pd1_Pe0_pUb0 to nucleus_Foxo1_Pa1_Pd1_Pe0_pUb1 by SCF";  // modifiers: SCF
  R353: dnabound_Foxo1_Pa1_Pd1_Pe0_pUb0 => dnabound_Foxo1_Pa1_Pd1_Pe0_pUb1; dnabound_Foxo1_Pa1_Pd1_Pe0_pUb0*SCF*R353_kub*indicator_foxo; R353 is "conversion of dnabound_Foxo1_Pa1_Pd1_Pe0_pUb0 to dnabound_Foxo1_Pa1_Pd1_Pe0_pUb1 by SCF";  // modifiers: SCF
  R354: cytoplasm_Foxo1_Pa1_Pd1_Pe1_pUb0 => cytoplasm_Foxo1_Pa1_Pd1_Pe1_pUb1; cytoplasm_Foxo1_Pa1_Pd1_Pe1_pUb0*SCF*R354_kub*indicator_foxo; R354 is "conversion of cytoplasm_Foxo1_Pa1_Pd1_Pe1_pUb0 to cytoplasm_Foxo1_Pa1_Pd1_Pe1_pUb1 by SCF";  // modifiers: SCF
  R355: nucleus_Foxo1_Pa1_Pd1_Pe1_pUb0 => nucleus_Foxo1_Pa1_Pd1_Pe1_pUb1; nucleus_Foxo1_Pa1_Pd1_Pe1_pUb0*SCF*R355_kub*indicator_foxo; R355 is "conversion of nucleus_Foxo1_Pa1_Pd1_Pe1_pUb0 to nucleus_Foxo1_Pa1_Pd1_Pe1_pUb1 by SCF";  // modifiers: SCF
  R356: dnabound_Foxo1_Pa1_Pd1_Pe1_pUb0 => dnabound_Foxo1_Pa1_Pd1_Pe1_pUb1; dnabound_Foxo1_Pa1_Pd1_Pe1_pUb0*SCF*R356_kub*indicator_foxo; R356 is "conversion of dnabound_Foxo1_Pa1_Pd1_Pe1_pUb0 to dnabound_Foxo1_Pa1_Pd1_Pe1_pUb1 by SCF";  // modifiers: SCF
  R357: cytoplasm_Foxo1_Pa0_Pd0_Pe0_pUb1 => degr_Foxo1; cytoplasm_Foxo1_Pa0_Pd0_Pe0_pUb1*Proteasome*R357_kdeg*indicator_foxo; R357 is "degradation of cytoplasm_Foxo1_Pa0_Pd0_Pe0_pUb1";  // modifiers: Proteasome
  R358: cytoplasm_Foxo1_Pa0_Pd0_Pe1_pUb1 => degr_Foxo1; cytoplasm_Foxo1_Pa0_Pd0_Pe1_pUb1*Proteasome*R358_kdeg*indicator_foxo; R358 is "degradation of cytoplasm_Foxo1_Pa0_Pd0_Pe1_pUb1";  // modifiers: Proteasome
  R359: cytoplasm_Foxo1_Pa0_Pd1_Pe0_pUb1 => degr_Foxo1; cytoplasm_Foxo1_Pa0_Pd1_Pe0_pUb1*Proteasome*R359_kdeg*indicator_foxo; R359 is "degradation of cytoplasm_Foxo1_Pa0_Pd1_Pe0_pUb1";  // modifiers: Proteasome
  R360: cytoplasm_Foxo1_Pa0_Pd1_Pe1_pUb1 => degr_Foxo1; cytoplasm_Foxo1_Pa0_Pd1_Pe1_pUb1*Proteasome*R360_kdeg*indicator_foxo; R360 is "degradation of cytoplasm_Foxo1_Pa0_Pd1_Pe1_pUb1";  // modifiers: Proteasome
  R361: cytoplasm_Foxo1_Pa1_Pd0_Pe0_pUb1 => degr_Foxo1; cytoplasm_Foxo1_Pa1_Pd0_Pe0_pUb1*Proteasome*R361_kdeg*indicator_foxo; R361 is "degradation of cytoplasm_Foxo1_Pa1_Pd0_Pe0_pUb1";  // modifiers: Proteasome
  R362: cytoplasm_Foxo1_Pa1_Pd0_Pe1_pUb1 => degr_Foxo1; cytoplasm_Foxo1_Pa1_Pd0_Pe1_pUb1*Proteasome*R362_kdeg*indicator_foxo; R362 is "degradation of cytoplasm_Foxo1_Pa1_Pd0_Pe1_pUb1";  // modifiers: Proteasome
  R363: cytoplasm_Foxo1_Pa1_Pd1_Pe0_pUb1 => degr_Foxo1; cytoplasm_Foxo1_Pa1_Pd1_Pe0_pUb1*Proteasome*R363_kdeg*indicator_foxo; R363 is "degradation of cytoplasm_Foxo1_Pa1_Pd1_Pe0_pUb1";  // modifiers: Proteasome
  R364: cytoplasm_Foxo1_Pa1_Pd1_Pe1_pUb1 => degr_Foxo1; cytoplasm_Foxo1_Pa1_Pd1_Pe1_pUb1*Proteasome*R364_kdeg*indicator_foxo; R364 is "degradation of cytoplasm_Foxo1_Pa1_Pd1_Pe1_pUb1";  // modifiers: Proteasome
  R365: $null => nucleus_RNA_InR; dnabound_Foxo1_Pa0_Pd0_Pe0_pUb0*R365_ktranscr*indicator_foxo; R365 is "transcription of InR by dnabound_Foxo1_Pa0_Pd0_Pe0_pUb0";  // modifiers: dnabound_Foxo1_Pa0_Pd0_Pe0_pUb0
  R366: $null => nucleus_RNA_SOD2; dnabound_Foxo1_Pa0_Pd0_Pe0_pUb0*R366_ktranscr*indicator_foxo; R366 is "transcription of SOD2 by dnabound_Foxo1_Pa0_Pd0_Pe0_pUb0";  // modifiers: dnabound_Foxo1_Pa0_Pd0_Pe0_pUb0
  R367: $null => nucleus_RNA_InR; dnabound_Foxo1_Pa0_Pd0_Pe0_pUb1*R367_ktranscr*indicator_foxo; R367 is "transcription of InR by dnabound_Foxo1_Pa0_Pd0_Pe0_pUb1";  // modifiers: dnabound_Foxo1_Pa0_Pd0_Pe0_pUb1
  R368: $null => nucleus_RNA_SOD2; dnabound_Foxo1_Pa0_Pd0_Pe0_pUb1*R368_ktranscr*indicator_foxo; R368 is "transcription of SOD2 by dnabound_Foxo1_Pa0_Pd0_Pe0_pUb1";  // modifiers: dnabound_Foxo1_Pa0_Pd0_Pe0_pUb1
  R369: $null => nucleus_RNA_InR; dnabound_Foxo1_Pa0_Pd0_Pe1_pUb0*R369_ktranscr*indicator_foxo; R369 is "transcription of InR by dnabound_Foxo1_Pa0_Pd0_Pe1_pUb0";  // modifiers: dnabound_Foxo1_Pa0_Pd0_Pe1_pUb0
  R370: $null => nucleus_RNA_SOD2; dnabound_Foxo1_Pa0_Pd0_Pe1_pUb0*R370_ktranscr*indicator_foxo; R370 is "transcription of SOD2 by dnabound_Foxo1_Pa0_Pd0_Pe1_pUb0";  // modifiers: dnabound_Foxo1_Pa0_Pd0_Pe1_pUb0
  R371: $null => nucleus_RNA_InR; dnabound_Foxo1_Pa0_Pd0_Pe1_pUb1*R371_ktranscr*indicator_foxo; R371 is "transcription of InR by dnabound_Foxo1_Pa0_Pd0_Pe1_pUb1";  // modifiers: dnabound_Foxo1_Pa0_Pd0_Pe1_pUb1
  R372: $null => nucleus_RNA_SOD2; dnabound_Foxo1_Pa0_Pd0_Pe1_pUb1*R372_ktranscr*indicator_foxo; R372 is "transcription of SOD2 by dnabound_Foxo1_Pa0_Pd0_Pe1_pUb1";  // modifiers: dnabound_Foxo1_Pa0_Pd0_Pe1_pUb1
  R373: $null => nucleus_RNA_InR; dnabound_Foxo1_Pa0_Pd1_Pe0_pUb0*R373_ktranscr*indicator_foxo; R373 is "transcription of InR by dnabound_Foxo1_Pa0_Pd1_Pe0_pUb0";  // modifiers: dnabound_Foxo1_Pa0_Pd1_Pe0_pUb0
  R374: $null => nucleus_RNA_SOD2; dnabound_Foxo1_Pa0_Pd1_Pe0_pUb0*R374_ktranscr*indicator_foxo; R374 is "transcription of SOD2 by dnabound_Foxo1_Pa0_Pd1_Pe0_pUb0";  // modifiers: dnabound_Foxo1_Pa0_Pd1_Pe0_pUb0
  R375: $null => nucleus_RNA_InR; dnabound_Foxo1_Pa0_Pd1_Pe0_pUb1*R375_ktranscr*indicator_foxo; R375 is "transcription of InR by dnabound_Foxo1_Pa0_Pd1_Pe0_pUb1";  // modifiers: dnabound_Foxo1_Pa0_Pd1_Pe0_pUb1
  R376: $null => nucleus_RNA_SOD2; dnabound_Foxo1_Pa0_Pd1_Pe0_pUb1*R376_ktranscr*indicator_foxo; R376 is "transcription of SOD2 by dnabound_Foxo1_Pa0_Pd1_Pe0_pUb1";  // modifiers: dnabound_Foxo1_Pa0_Pd1_Pe0_pUb1
  R377: $null => nucleus_RNA_InR; dnabound_Foxo1_Pa0_Pd1_Pe1_pUb0*R377_ktranscr*indicator_foxo; R377 is "transcription of InR by dnabound_Foxo1_Pa0_Pd1_Pe1_pUb0";  // modifiers: dnabound_Foxo1_Pa0_Pd1_Pe1_pUb0
  R378: $null => nucleus_RNA_SOD2; dnabound_Foxo1_Pa0_Pd1_Pe1_pUb0*R378_ktranscr*indicator_foxo; R378 is "transcription of SOD2 by dnabound_Foxo1_Pa0_Pd1_Pe1_pUb0";  // modifiers: dnabound_Foxo1_Pa0_Pd1_Pe1_pUb0
  R379: $null => nucleus_RNA_InR; dnabound_Foxo1_Pa0_Pd1_Pe1_pUb1*R379_ktranscr*indicator_foxo; R379 is "transcription of InR by dnabound_Foxo1_Pa0_Pd1_Pe1_pUb1";  // modifiers: dnabound_Foxo1_Pa0_Pd1_Pe1_pUb1
  R380: $null => nucleus_RNA_SOD2; dnabound_Foxo1_Pa0_Pd1_Pe1_pUb1*R380_ktranscr*indicator_foxo; R380 is "transcription of SOD2 by dnabound_Foxo1_Pa0_Pd1_Pe1_pUb1";  // modifiers: dnabound_Foxo1_Pa0_Pd1_Pe1_pUb1
  R381: $null => nucleus_RNA_InR; dnabound_Foxo1_Pa1_Pd0_Pe0_pUb0*R381_ktranscr*indicator_foxo; R381 is "transcription of InR by dnabound_Foxo1_Pa1_Pd0_Pe0_pUb0";  // modifiers: dnabound_Foxo1_Pa1_Pd0_Pe0_pUb0
  R382: $null => nucleus_RNA_SOD2; dnabound_Foxo1_Pa1_Pd0_Pe0_pUb0*R382_ktranscr*indicator_foxo; R382 is "transcription of SOD2 by dnabound_Foxo1_Pa1_Pd0_Pe0_pUb0";  // modifiers: dnabound_Foxo1_Pa1_Pd0_Pe0_pUb0
  R383: $null => nucleus_RNA_InR; dnabound_Foxo1_Pa1_Pd0_Pe0_pUb1*R383_ktranscr*indicator_foxo; R383 is "transcription of InR by dnabound_Foxo1_Pa1_Pd0_Pe0_pUb1";  // modifiers: dnabound_Foxo1_Pa1_Pd0_Pe0_pUb1
  R384: $null => nucleus_RNA_SOD2; dnabound_Foxo1_Pa1_Pd0_Pe0_pUb1*R384_ktranscr*indicator_foxo; R384 is "transcription of SOD2 by dnabound_Foxo1_Pa1_Pd0_Pe0_pUb1";  // modifiers: dnabound_Foxo1_Pa1_Pd0_Pe0_pUb1
  R385: $null => nucleus_RNA_InR; dnabound_Foxo1_Pa1_Pd0_Pe1_pUb0*R385_ktranscr*indicator_foxo; R385 is "transcription of InR by dnabound_Foxo1_Pa1_Pd0_Pe1_pUb0";  // modifiers: dnabound_Foxo1_Pa1_Pd0_Pe1_pUb0
  R386: $null => nucleus_RNA_SOD2; dnabound_Foxo1_Pa1_Pd0_Pe1_pUb0*R386_ktranscr*indicator_foxo; R386 is "transcription of SOD2 by dnabound_Foxo1_Pa1_Pd0_Pe1_pUb0";  // modifiers: dnabound_Foxo1_Pa1_Pd0_Pe1_pUb0
  R387: $null => nucleus_RNA_InR; dnabound_Foxo1_Pa1_Pd0_Pe1_pUb1*R387_ktranscr*indicator_foxo; R387 is "transcription of InR by dnabound_Foxo1_Pa1_Pd0_Pe1_pUb1";  // modifiers: dnabound_Foxo1_Pa1_Pd0_Pe1_pUb1
  R388: $null => nucleus_RNA_SOD2; dnabound_Foxo1_Pa1_Pd0_Pe1_pUb1*R388_ktranscr*indicator_foxo; R388 is "transcription of SOD2 by dnabound_Foxo1_Pa1_Pd0_Pe1_pUb1";  // modifiers: dnabound_Foxo1_Pa1_Pd0_Pe1_pUb1
  R389: $null => nucleus_RNA_InR; dnabound_Foxo1_Pa1_Pd1_Pe0_pUb0*R389_ktranscr*indicator_foxo; R389 is "transcription of InR by dnabound_Foxo1_Pa1_Pd1_Pe0_pUb0";  // modifiers: dnabound_Foxo1_Pa1_Pd1_Pe0_pUb0
  R390: $null => nucleus_RNA_SOD2; dnabound_Foxo1_Pa1_Pd1_Pe0_pUb0*R390_ktranscr*indicator_foxo; R390 is "transcription of SOD2 by dnabound_Foxo1_Pa1_Pd1_Pe0_pUb0";  // modifiers: dnabound_Foxo1_Pa1_Pd1_Pe0_pUb0
  R391: $null => nucleus_RNA_InR; dnabound_Foxo1_Pa1_Pd1_Pe0_pUb1*R391_ktranscr*indicator_foxo; R391 is "transcription of InR by dnabound_Foxo1_Pa1_Pd1_Pe0_pUb1";  // modifiers: dnabound_Foxo1_Pa1_Pd1_Pe0_pUb1
  R392: $null => nucleus_RNA_SOD2; dnabound_Foxo1_Pa1_Pd1_Pe0_pUb1*R392_ktranscr*indicator_foxo; R392 is "transcription of SOD2 by dnabound_Foxo1_Pa1_Pd1_Pe0_pUb1";  // modifiers: dnabound_Foxo1_Pa1_Pd1_Pe0_pUb1
  R393: $null => nucleus_RNA_InR; dnabound_Foxo1_Pa1_Pd1_Pe1_pUb0*R393_ktranscr*indicator_foxo; R393 is "transcription of InR by dnabound_Foxo1_Pa1_Pd1_Pe1_pUb0";  // modifiers: dnabound_Foxo1_Pa1_Pd1_Pe1_pUb0
  R394: $null => nucleus_RNA_SOD2; dnabound_Foxo1_Pa1_Pd1_Pe1_pUb0*R394_ktranscr*indicator_foxo; R394 is "transcription of SOD2 by dnabound_Foxo1_Pa1_Pd1_Pe1_pUb0";  // modifiers: dnabound_Foxo1_Pa1_Pd1_Pe1_pUb0
  R395: $null => nucleus_RNA_InR; dnabound_Foxo1_Pa1_Pd1_Pe1_pUb1*R395_ktranscr*indicator_foxo; R395 is "transcription of InR by dnabound_Foxo1_Pa1_Pd1_Pe1_pUb1";  // modifiers: dnabound_Foxo1_Pa1_Pd1_Pe1_pUb1
  R396: $null => nucleus_RNA_SOD2; dnabound_Foxo1_Pa1_Pd1_Pe1_pUb1*R396_ktranscr*indicator_foxo; R396 is "transcription of SOD2 by dnabound_Foxo1_Pa1_Pd1_Pe1_pUb1";  // modifiers: dnabound_Foxo1_Pa1_Pd1_Pe1_pUb1
  basal_transcription_of_InR: $null => nucleus_RNA_InR; R397_k_basal_transcr*indicator_foxo;
  export_of_InR_RNA: nucleus_RNA_InR => cytoplasm_RNA_InR; nucleus_RNA_InR*R398_kexp*indicator_foxo;
  cyto_degr_of_InR_RNA: cytoplasm_RNA_InR => $null; cytoplasm_RNA_InR*R399_kmdeg*indicator_foxo;
  translation_of_InR: $null => cytoplasm_InR; cytoplasm_RNA_InR*R400_ktransl*indicator_foxo;  // modifiers: cytoplasm_RNA_InR
  degradation_of_InR_protein: cytoplasm_InR => $null; cytoplasm_InR*R401_kpdeg*indicator_foxo;
  basal_transcription_of_SOD2: $null => nucleus_RNA_SOD2; R402_k_basal_transcr*indicator_foxo;
  export_of_SOD2_RNA: nucleus_RNA_SOD2 => cytoplasm_RNA_SOD2; nucleus_RNA_SOD2*R403_kexp*indicator_foxo;
  cyto_degr_of_SOD2_RNA: cytoplasm_RNA_SOD2 => $null; cytoplasm_RNA_SOD2*R404_kmdeg*indicator_foxo;
  translation_of_SOD2: $null => cytoplasm_SOD2; cytoplasm_RNA_SOD2*R405_ktransl*indicator_foxo;  // modifiers: cytoplasm_RNA_SOD2
  degradation_of_SOD2_protein: cytoplasm_SOD2 => $null; cytoplasm_SOD2*R406_kpdeg*indicator_foxo;

  // Events:
  insulin_stimulation_end: at (time >= t_ins): Ins = 0;
  insulin_restimulation_start: at (time >= 2880): Ins = 499999;
  insulin_restimulation_end: at (time >= 2895): Ins = 0;

  // Unit definitions:
  unit volume = litre;
  unit substance = item;
  unit time = 60 second;
end
