// SBML level 2 version 4

model Blasi_CellSystems2016()
  // PEtab implementation of the model from Blasi et al. (2016), Cell Systems;Volume 2, ISSUE 1, P49-58
  // isDescribedBy doi:10.1016/j.cels.2016.01.002

  // Compartments:
  compartment default = 1 volume;

  // Species:
  substanceOnly species x_0ac in default = 1*default; x_0ac is "H4";
  species x_k8 in default = 0; x_k8 is "H4";
  species x_k5 in default = 0; x_k5 is "H4";
  species x_k12 in default = 0; x_k12 is "H4";
  species x_k16 in default = 0; x_k16 is "H4";
  species x_k5k8 in default = 0; x_k5k8 is "H4";
  species x_k5k12 in default = 0; x_k5k12 is "H4";
  species x_k5k16 in default = 0; x_k5k16 is "H4";
  species x_k8k12 in default = 0; x_k8k12 is "H4";
  species x_k8k16 in default = 0; x_k8k16 is "H4";
  species x_k12k16 in default = 0; x_k12k16 is "H4";
  species x_k5k8k12 in default = 0; x_k5k8k12 is "H4";
  species x_k5k8k16 in default = 0; x_k5k8k16 is "H4";
  species x_k5k12k16 in default = 0; x_k5k12k16 is "H4";
  species x_k8k12k16 in default = 0; x_k8k12k16 is "H4";
  species x_4ac in default = 0; x_4ac is "H4";

  // Parameters:
  a_k5 has rate;
  d = 1 rate;
  a_k8 = 0.0273 rate;
  a_k12 has rate;
  a_k16 has rate;
  a_k5_k5k8 has rate;
  a_k5_k5k12 = 2.062 rate;
  a_k5_k5k16 has rate;
  a_k8_k5k8 has rate;
  a_k8_k8k12 has rate;
  a_k8_k8k16 has rate;
  a_k12_k5k12 = 0.552 rate;
  a_k12_k8k12 has rate;
  a_k12_k12k16 has rate;
  a_k16_k5k16 has rate;
  a_k16_k8k16 has rate;
  a_k16_k12k16 = 0.696 rate;
  a_k5k8_k5k8k12 has rate;
  a_k5k8_k5k8k16 has rate;
  a_k5k12_k5k8k12 = 0.325 rate;
  a_k5k12_k5k12k16 has rate;
  a_k5k16_k5k8k16 has rate;
  a_k5k16_k5k12k16 has rate;
  a_k8k12_k5k8k12 has rate;
  a_k8k12_k8k12k16 has rate;
  a_k8k16_k5k8k16 has rate;
  a_k8k16_k8k12k16 has rate;
  a_k12k16_k5k12k16 has rate;
  a_k12k16_k8k12k16 = 2.206 rate;
  a_k5k8k12_4ac has rate;
  a_k5k8k16_4ac has rate;
  a_k5k12k16_4ac has rate;
  a_k8k12k16_4ac = 3.5917 rate;
  a_basal = 0.067 rate;

  // Assignment rules:
  a_k5 := a_basal;
  a_k5_k5k8 := a_basal;
  a_k5_k5k16 := a_basal;
  a_k5k8_k5k8k12 := a_basal;
  a_k5k8_k5k8k16 := a_basal;
  a_k5k8k12_4ac := a_basal;
  a_k5k8k16_4ac := a_basal;
  a_k5k12_k5k12k16 := a_basal;
  a_k5k12k16_4ac := a_basal;
  a_k5k16_k5k8k16 := a_basal;
  a_k5k16_k5k12k16 := a_basal;
  a_k8_k5k8 := a_basal;
  a_k8_k8k12 := a_basal;
  a_k8_k8k16 := a_basal;
  a_k8k12_k5k8k12 := a_basal;
  a_k8k12_k8k12k16 := a_basal;
  a_k8k16_k5k8k16 := a_basal;
  a_k8k16_k8k12k16 := a_basal;
  a_k12 := a_basal;
  a_k12_k8k12 := a_basal;
  a_k12_k12k16 := a_basal;
  a_k12k16_k5k12k16 := a_basal;
  a_k16 := a_basal;
  a_k16_k5k16 := a_basal;
  a_k16_k8k16 := a_basal;

  // Reactions:
  _0ac_k5: x_0ac -> x_k5; a_k5*x_0ac - d*x_k5; _0ac_k5 is "0ac->k5";
  _0ac_k8: x_0ac -> x_k8; a_k8*x_0ac - d*x_k8; _0ac_k8 is "0ac->k8";
  _0ac_k12: x_0ac -> x_k12; a_k12*x_0ac - d*x_k12; _0ac_k12 is "0ac->k12";
  _0ac_k16: x_0ac -> x_k16; a_k16*x_0ac - d*x_k16; _0ac_k16 is "0ac->k16";
  k5_k5k8: x_k5 -> x_k5k8; a_k5_k5k8*x_k5 - d*x_k5k8; k5_k5k8 is "k5->k5k8";
  k5_k5k12: x_k5 -> x_k5k12; a_k5_k5k12*x_k5 - d*x_k5k12; k5_k5k12 is "k5->k5k12";
  k5_k5k16: x_k5 -> x_k5k16; a_k5_k5k16*x_k5 - d*x_k5k16; k5_k5k16 is "k5->k5k16";
  k8_k5k8: x_k8 -> x_k5k8; a_k8_k5k8*x_k8 - d*x_k5k8; k8_k5k8 is "k8->k5k8";
  k8_k8k12: x_k8 -> x_k8k12; a_k8_k8k12*x_k8 - d*x_k8k12; k8_k8k12 is "k8->k8k12";
  k8_k8k16: x_k8 -> x_k8k16; a_k8_k8k16*x_k8 - d*x_k8k16; k8_k8k16 is "k8->k8k16";
  k12_k5k12: x_k12 -> x_k5k12; a_k12_k5k12*x_k12 - d*x_k5k12; k12_k5k12 is "k12->k5k12";
  k12_k8k12: x_k12 -> x_k8k12; a_k12_k8k12*x_k12 - d*x_k8k12; k12_k8k12 is "k12->k8k12";
  k12_k12k16: x_k12 -> x_k12k16; a_k12_k12k16*x_k12 - d*x_k12k16; k12_k12k16 is "k12->k12k16";
  k16_k5k16: x_k16 -> x_k5k16; a_k16_k5k16*x_k16 - d*x_k5k16; k16_k5k16 is "k16->k5k16";
  k16_k8k16: x_k16 -> x_k8k16; a_k16_k8k16*x_k16 - d*x_k8k16; k16_k8k16 is "k16->k8k16";
  k16_k12k16: x_k16 -> x_k12k16; a_k16_k12k16*x_k16 - d*x_k12k16; k16_k12k16 is "k16->k12k16";
  k5k8_k5k8k12: x_k5k8 -> x_k5k8k12; a_k5k8_k5k8k12*x_k5k8 - d*x_k5k8k12; k5k8_k5k8k12 is "k5k8->k5k8k12";
  k5k8_k5k8k16: x_k5k8 -> x_k5k8k16; a_k5k8_k5k8k16*x_k5k8 - d*x_k5k8k16; k5k8_k5k8k16 is "k5k8->k5k8k16";
  k5k12_k5k8k12: x_k5k12 -> x_k5k8k12; a_k5k12_k5k8k12*x_k5k12 - d*x_k5k8k12; k5k12_k5k8k12 is "k5k12->k5k8k12";
  k5k12_k5k12k16: x_k5k12 -> x_k5k12k16; a_k5k12_k5k12k16*x_k5k12 - d*x_k5k12k16; k5k12_k5k12k16 is "k5k12->k5k12k16";
  k5k16_k5k8k16: x_k5k16 -> x_k5k8k16; a_k5k16_k5k8k16*x_k5k16 - d*x_k5k8k16; k5k16_k5k8k16 is "k5k16->k5k8k16";
  k5k16_k5k12k16: x_k5k16 -> x_k5k12k16; a_k5k16_k5k12k16*x_k5k16 - d*x_k5k12k16; k5k16_k5k12k16 is "k5k16->k5k12k16";
  k8k12_k5k8k12: x_k8k12 -> x_k5k8k12; a_k8k12_k5k8k12*x_k8k12 - d*x_k5k8k12; k8k12_k5k8k12 is "k8k12->k5k8k12";
  k8k12_k8k12k16: x_k8k12 -> x_k8k12k16; a_k8k12_k8k12k16*x_k8k12 - d*x_k8k12k16; k8k12_k8k12k16 is "k8k12->k8k12k16";
  k8k16_k5k8k16: x_k8k16 -> x_k5k8k16; a_k8k16_k5k8k16*x_k8k16 - d*x_k5k8k16; k8k16_k5k8k16 is "k8k16->k5k8k16";
  k8k16_k8k12k16: x_k8k16 -> x_k8k12k16; a_k8k16_k8k12k16*x_k8k16 - d*x_k8k12k16; k8k16_k8k12k16 is "k8k16->k8k12k16";
  k12k16_k5k12k16: x_k12k16 -> x_k5k12k16; a_k12k16_k5k12k16*x_k12k16 - d*x_k5k12k16; k12k16_k5k12k16 is "k12k16->k5k12k16";
  k12k16_k8k12k16: x_k12k16 -> x_k8k12k16; a_k12k16_k8k12k16*x_k12k16 - d*x_k8k12k16; k12k16_k8k12k16 is "k12k16>k8k12k16";
  k5k8k12_4ac: x_k5k8k12 -> x_4ac; a_k5k8k12_4ac*x_k5k8k12 - d*x_4ac; k5k8k12_4ac is "k5k8k12->4ac";
  k5k8k16_4ac: x_k5k8k16 -> x_4ac; a_k5k8k16_4ac*x_k5k8k16 - d*x_4ac; k5k8k16_4ac is "k5k8k16->4ac";
  k5k12k16_4ac: x_k5k12k16 -> x_4ac; a_k5k12k16_4ac*x_k5k12k16 - d*x_4ac; k5k12k16_4ac is "k5k12k16->4ac";
  k8k12k16_4ac: x_k8k12k16 -> x_4ac; a_k8k12k16_4ac*x_k8k12k16 - d*x_4ac; k8k12k16_4ac is "k8k12k16->4ac";

  // Unit definitions:
  unit substance = mole;
  unit volume = litre;
  unit area = metre^2;
  unit length = metre;
  unit time = second;
  unit rate = 1 / second;
end
